! ==============================================================================
! OPENDSS MASTER FILE: CIRCUITO ALIMENTADOR CN07 - SUBESTACAO SCN (CALIBRADO)
! Neoenergia Distribuicao Brasilia / BDGD ANEEL (Ground Truth Calibrado)
! Calibrado por: src/24_calibracao_ground_truth_15dp.py | RUN_TAG: 20261029_121213
! Infraestrutura Prioritária: 15ª Delegacia de Polícia (Ceilândia Centro)
! ==============================================================================

Clear
Set DefaultBaseFrequency=60

! --- 1. FONTE EQUIVALENTE DA SUBESTACAO SCN (138 kV) REGULADA A 1.04 pu ---
New Circuit.CN07 BasekV=138.0 pu=1.04 Angle=0.0 Frequency=60 Phases=3 Bus1=SCN_138kV

! --- 2. TRANSFORMADOR DE SUBESTACAO T-1_SCN (138 kV / 13.8 kV - 32 MVA) ---
New Transformer.T1_SCN Phases=3 Windings=2 XHL=10.0 %loadloss=0.5 %noloadloss=0.1
~ Wdg=1 Bus=SCN_138kV kV=138.0 kVA=32000 Conn=Delta %r=0.25
~ Wdg=2 Bus=SCN_CN07_SUB kV=13.8 kVA=32000 Conn=Wye %r=0.25 Tap=1.023

! --- 3. CONEXAO DO BARRAMENTO DA SE AO INICIO DO ALIMENTADOR (PAC_INI: CN_ALCN07) ---
New Line.L_ALIMENTADOR_INICIAL Phases=3 Bus1=SCN_CN07_SUB.1.2.3 Bus2=CN_ALCN07.1.2.3 Length=0.001 Units=km r1=0.001 x1=0.001 r0=0.002 x0=0.002

! --- 4. CATALOGO DE LINECODES (CONDUTORES SEGCON) ---
New LineCode.20_BT_2_1 nphases=3 r1=1.30800 x1=0.48060 r0=3.66240 x0=1.34568 units=km normamps=101.0 emergamps=101.0 ! C16Q
New LineCode.260_BT_1_1 nphases=3 r1=0.61300 x1=0.42880 r0=1.71640 x0=1.20064 units=km normamps=235.0 emergamps=235.0 ! 1xA1/0 POPPY//0//0//1xA2 IRIS
New LineCode.266_BT_3_1 nphases=3 r1=0.61300 x1=0.42880 r0=1.71640 x0=1.20064 units=km normamps=235.0 emergamps=235.0 ! 1xA1/0 POPPY//1xA1/0 POPPY//1xA1/0 POPPY//1xA1/0 POPPY
New LineCode.267_BT_3_1 nphases=3 r1=0.61300 x1=0.42880 r0=1.71640 x0=1.20064 units=km normamps=235.0 emergamps=235.0 ! 1xA1/0 POPPY//1xA1/0 POPPY//1xA1/0 POPPY//1xA2 IRIS
New LineCode.268_BT_3_1 nphases=3 r1=0.61300 x1=0.42880 r0=1.71640 x0=1.20064 units=km normamps=235.0 emergamps=235.0 ! 1xA1/0 POPPY//1xA1/0 POPPY//1xA1/0 POPPY//1xA4 ROSE
New LineCode.273_A4_3_1 nphases=3 r1=0.61300 x1=0.42880 r0=1.71640 x0=1.20064 units=km normamps=235.0 emergamps=235.0 ! 1xA1/0 POPPY-M//1xA1/0 POPPY-M//1xA1/0 POPPY-M//0
New LineCode.284_BT_1_1 nphases=3 r1=0.97500 x1=0.36700 r0=2.73000 x0=1.02760 units=km normamps=175.0 emergamps=175.0 ! 1xA2 IRIS//0//0//1xA1/0 POPPY
New LineCode.285_BT_1_1 nphases=3 r1=0.97500 x1=0.36700 r0=2.73000 x0=1.02760 units=km normamps=175.0 emergamps=175.0 ! 1xA2 IRIS//0//0//1xA2 IRIS
New LineCode.286_BT_1_1 nphases=3 r1=0.97500 x1=0.36700 r0=2.73000 x0=1.02760 units=km normamps=152.0 emergamps=152.0 ! 1xA2 IRIS//0//0//1xA4 ROSE
New LineCode.286_BT_2_1 nphases=3 r1=0.97500 x1=0.36700 r0=2.73000 x0=1.02760 units=km normamps=152.0 emergamps=152.0 ! Tab I -  2 AWG
New LineCode.289_BT_2_1 nphases=3 r1=0.97500 x1=0.36700 r0=2.73000 x0=1.02760 units=km normamps=175.0 emergamps=175.0 ! 1xA2 IRIS//0//1xA2 IRIS//1xA2 IRIS
New LineCode.296_BT_3_1 nphases=3 r1=0.97500 x1=0.36700 r0=2.73000 x0=1.02760 units=km normamps=175.0 emergamps=175.0 ! 1xA2 IRIS//1xA2 IRIS//1xA2 IRIS//1xA1/0 POPPY
New LineCode.297_BT_3_1 nphases=3 r1=0.97500 x1=0.36700 r0=2.73000 x0=1.02760 units=km normamps=175.0 emergamps=175.0 ! 1xA2 IRIS//1xA2 IRIS//1xA2 IRIS//1xA2 IRIS
New LineCode.299_BT_3_1 nphases=3 r1=0.97500 x1=0.36700 r0=2.73000 x0=1.02760 units=km normamps=152.0 emergamps=152.0 ! 1xA2 IRIS//1xA2 IRIS//1xA2 IRIS//1xA4 ROSE
New LineCode.323_BT_1_1 nphases=3 r1=1.55100 x1=0.46380 r0=4.34280 x0=1.29864 units=km normamps=58.0 emergamps=58.0 ! 1xA4 ROSE//0//0//1xA4 ROSE
New LineCode.332_BT_3_1 nphases=3 r1=1.55100 x1=0.46380 r0=4.34280 x0=1.29864 units=km normamps=130.0 emergamps=130.0 ! 1xA4 ROSE//1xA4 ROSE//1xA4 ROSE//1xA1/0 POPPY
New LineCode.333_BT_3_1 nphases=3 r1=1.55100 x1=0.46380 r0=4.34280 x0=1.29864 units=km normamps=130.0 emergamps=130.0 ! 1xA4 ROSE//1xA4 ROSE//1xA4 ROSE//1xA2 IRIS
New LineCode.334_BT_3_1 nphases=3 r1=1.55100 x1=0.46380 r0=4.34280 x0=1.29864 units=km normamps=58.0 emergamps=58.0 ! 1xA4 ROSE//1xA4 ROSE//1xA4 ROSE//1xA4 ROSE
New LineCode.349_A4_3_1 nphases=3 r1=1.55100 x1=0.46380 r0=4.34280 x0=1.29864 units=km normamps=130.0 emergamps=130.0 ! 1xA4 ROSE-M//1xA4 ROSE-M//1xA4 ROSE-M//0
New LineCode.360_BT_3_1 nphases=3 r1=0.30600 x1=0.40250 r0=0.85680 x0=1.12700 units=km normamps=365.0 emergamps=365.0 ! 1xA4/0 OXLIP//1xA4/0 OXLIP//1xA4/0 OXLIP//1xA1/0 POPPY
New LineCode.367_A4_3_1 nphases=3 r1=0.30600 x1=0.40250 r0=0.85680 x0=1.12700 units=km normamps=365.0 emergamps=365.0 ! 1xA4/0 OXLIP-M//1xA4/0 OXLIP-M//1xA4/0 OXLIP-M//0
New LineCode.511_A4_3_2 nphases=3 r1=0.44100 x1=0.15770 r0=1.23480 x0=0.44156 units=km normamps=136.7 emergamps=136.7 ! Tab III - 50 mm²
New LineCode.638_BT_3_1 nphases=3 r1=2.17900 x1=0.01330 r0=6.10120 x0=0.03724 units=km normamps=86.0 emergamps=86.0 ! A16D//A16D//A16D//A16D
New LineCode.650_BT_3_1 nphases=3 r1=2.17900 x1=0.01330 r0=6.10120 x0=0.03724 units=km normamps=86.0 emergamps=86.0 ! A16T//A16T//A16T//A16T
New LineCode.695_BT_3_1 nphases=3 r1=1.36900 x1=0.36670 r0=3.83320 x0=1.02676 units=km normamps=103.0 emergamps=103.0 ! A25Q//A25Q//A25Q//A25Q
New LineCode.722_BT_1_1 nphases=3 r1=0.99100 x1=0.36610 r0=2.77480 x0=1.02508 units=km normamps=129.0 emergamps=129.0 ! A35Q//0//0//A35Q
New LineCode.725_BT_3_1 nphases=3 r1=0.99100 x1=0.36610 r0=2.77480 x0=1.02508 units=km normamps=129.0 emergamps=129.0 ! A35Q//A35Q//A35Q//A35Q
New LineCode.744_A4_3_1 nphases=3 r1=0.50600 x1=0.29530 r0=1.41680 x0=0.82684 units=km normamps=312.0 emergamps=312.0 ! Tab II - 70 mm²
New LineCode.767_BT_1_1 nphases=3 r1=2.08200 x1=0.01880 r0=5.82960 x0=0.05264 units=km normamps=74.0 emergamps=74.0 ! C10Q//0//0//C10Q
New LineCode.770_BT_3_1 nphases=3 r1=2.08200 x1=0.01880 r0=5.82960 x0=0.05264 units=km normamps=74.0 emergamps=74.0 ! C10Q//C10Q//C10Q//C10Q
New LineCode.775_BT_1_1 nphases=3 r1=1.30800 x1=0.48060 r0=3.66240 x0=1.34568 units=km normamps=101.0 emergamps=101.0 ! C16Q//0//0//C16Q
New LineCode.775_BT_2_1 nphases=3 r1=1.30800 x1=0.48060 r0=3.66240 x0=1.34568 units=km normamps=101.0 emergamps=101.0 ! C16Q
New LineCode.778_BT_3_1 nphases=3 r1=1.30800 x1=0.48060 r0=3.66240 x0=1.34568 units=km normamps=101.0 emergamps=101.0 ! C16Q//C16Q//C16Q//C16Q
New LineCode.786_BT_3_1 nphases=3 r1=0.82700 x1=0.38110 r0=2.31560 x0=1.06708 units=km normamps=135.0 emergamps=135.0 ! C25Q//C25Q//C25Q//C25Q
New LineCode.791_BT_1_1 nphases=3 r1=5.24400 x1=0.38580 r0=14.68320 x0=1.08024 units=km normamps=50.0 emergamps=50.0 ! C4D//0//0//C4D
New LineCode.795_BT_1_1 nphases=3 r1=5.24400 x1=0.38580 r0=14.68320 x0=1.08024 units=km normamps=40.0 emergamps=40.0 ! C4Q//0//0//C4Q
New LineCode.795_BT_2_1 nphases=3 r1=5.24400 x1=0.38580 r0=14.68320 x0=1.08024 units=km normamps=40.0 emergamps=40.0 ! C4Q
New LineCode.798_BT_3_1 nphases=3 r1=5.24400 x1=0.38580 r0=14.68320 x0=1.08024 units=km normamps=40.0 emergamps=40.0 ! C4Q//C4Q//C4Q//C4Q
New LineCode.803_BT_1_1 nphases=3 r1=3.50400 x1=0.40330 r0=9.81120 x0=1.12924 units=km normamps=65.0 emergamps=65.0 ! C6D//0//0//C6D
New LineCode.812_BT_1_1 nphases=3 r1=0.28900 x1=0.32930 r0=0.80920 x0=0.92204 units=km normamps=296.0 emergamps=296.0 ! PB120N120-1KV-3//0//0//PB120N120-1KV-3
New LineCode.814_BT_3_1 nphases=3 r1=0.28900 x1=0.32930 r0=0.80920 x0=0.92204 units=km normamps=296.0 emergamps=296.0 ! PB120N120-1KV-3//PB120N120-1KV-3//PB120N120-1KV-3//PB120N120-1KV-3
New LineCode.839_BT_1_1 nphases=3 r1=0.73200 x1=0.64300 r0=2.04960 x0=1.80040 units=km normamps=159.0 emergamps=159.0 ! PB50-1KV-3//0//0//PB50-1KV-3
New LineCode.840_BT_2_1 nphases=3 r1=0.73200 x1=0.64300 r0=2.04960 x0=1.80040 units=km normamps=159.0 emergamps=159.0 ! PB50-1KV-3//0//PB50-1KV-3//PB50-1KV-3
New LineCode.842_BT_3_1 nphases=3 r1=0.73200 x1=0.64300 r0=2.04960 x0=1.80040 units=km normamps=159.0 emergamps=159.0 ! PB50-1KV-3//PB50-1KV-3//PB50-1KV-3//PB50-1KV-3
New LineCode.849_BT_3_1 nphases=3 r1=0.50600 x1=0.44500 r0=1.41680 x0=1.24600 units=km normamps=206.0 emergamps=206.0 ! PB70-1KV-3//PB70-1KV-3//PB70-1KV-3//PB70-1KV-3
New LineCode.860_BT_3_1 nphases=3 r1=0.50600 x1=0.44500 r0=1.41680 x0=1.24600 units=km normamps=206.0 emergamps=206.0 ! PB70N70-1KV-3//PB70N70-1KV-3//PB70N70-1KV-3//PB70N70-1KV-3
New LineCode.865_A4_3_2 nphases=3 r1=1.22900 x1=0.11000 r0=3.44120 x0=0.30800 units=km normamps=175.0 emergamps=175.0 ! TRECHO_SUB_FICTICIO//TRECHO_SUB_FICTICIO//TRECHO_SUB_FICTICIO//0
New LineCode.866_BT_3_2 nphases=3 r1=1.22900 x1=0.11000 r0=3.44120 x0=0.30800 units=km normamps=175.0 emergamps=175.0 ! TRECHO_SUB_FICTICIO//TRECHO_SUB_FICTICIO//TRECHO_SUB_FICTICIO//TRECHO_SUB_FICTICIO

! --- 5. REDIRECIONAMENTO DE COMPONENTES MODULARES (CALIBRADOS) ---
Redirect Lines_CN07_20261019_124919.dss
Redirect Transformers_CN07_20261019_124919.dss
Redirect Loads_CN07_Calibrado.dss
Redirect Switches_CN07_20261019_124919.dss
Buscoords Buscoords_CN07_20261019_124919.dss

! --- 6. DEFINICAO DE TENSOES BASE E REGIME DE OPERACAO ---
Set VoltageBases = [138.0, 13.8, 0.38, 0.22]
CalcVoltageBases

Set Mode=Snapshot
Set Maxiterations=100
Set Tolerance=0.0001

! Solve
