! OpenDSS Switches - Circuito CN07 (SE SCN) | RUN_TAG: 20261019_124715
! Total de Chaves: 138

New Line.SW_FZ4483 Phases=3 Bus1=SCN_CN07_9044_CEI280_ATV.1.2.3 Bus2=SCN_CN07_9044_CEI280_ATV_S.1.2.3 Length=0.001 Units=km r1=0.0001 x1=0.0001 r0=0.0002 x0=0.0002 normamps=600.0
New Line.SW_FX8569 Phases=3 Bus1=SCN_CN07_9143_CEI280_ATV.1.2.3 Bus2=SCN_CN07_9143_CEI280_ATV_S.1.2.3 Length=0.001 Units=km r1=0.0001 x1=0.0001 r0=0.0002 x0=0.0002 normamps=600.0
New Line.SW_FT3897 Phases=3 Bus1=SCN_CN07_9854_CEI026.1.2.3 Bus2=SCN_CN07_9854_CEI026_S.1.2.3 Length=0.001 Units=km r1=0.0001 x1=0.0001 r0=0.0002 x0=0.0002 normamps=600.0
New Line.SW_FT3895 Phases=3 Bus1=SCN_CN07_9808_CEI026.1.2.3 Bus2=SCN_CN07_9808_CEI026_S.1.2.3 Length=0.001 Units=km r1=0.0001 x1=0.0001 r0=0.0002 x0=0.0002 normamps=600.0
New Line.SW_FU1806 Phases=3 Bus1=SCN_CN07_9015_CEI13B.1.2.3 Bus2=SCN_CN07_9015_CEI13B_S.1.2.3 Length=0.001 Units=km r1=0.0001 x1=0.0001 r0=0.0002 x0=0.0002 normamps=600.0
New Line.SW_FT3909 Phases=3 Bus1=SCN_CN07_9036_CEIRJ002.1.2.3 Bus2=SCN_CN07_9036_CEIRJ002_S.1.2.3 Length=0.001 Units=km r1=0.0001 x1=0.0001 r0=0.0002 x0=0.0002 normamps=600.0
New Line.SW_FW2489 Phases=3 Bus1=SCN_CN07_9849_CEI026.1.2.3 Bus2=SCN_CN07_9849_CEI026_S.1.2.3 Length=0.001 Units=km r1=0.0001 x1=0.0001 r0=0.0002 x0=0.0002 normamps=600.0
New Line.SW_FW7553 Phases=3 Bus1=SCN_CN07_9823_CEI026.1.2.3 Bus2=SCN_CN07_9823_CEI026_S.1.2.3 Length=0.001 Units=km r1=0.0001 x1=0.0001 r0=0.0002 x0=0.0002 normamps=600.0
New Line.SW_FP0824 Phases=3 Bus1=SCN_CN07_9810_CEI026.1.2.3 Bus2=SCN_CN07_9810_CEI026_S.1.2.3 Length=0.001 Units=km r1=0.0001 x1=0.0001 r0=0.0002 x0=0.0002 normamps=600.0
New Line.SW_FZ7263 Phases=3 Bus1=SCN_CN07_9527_CEI026.1.2.3 Bus2=SCN_CN07_9527_CEI026_S.1.2.3 Length=0.001 Units=km r1=0.0001 x1=0.0001 r0=0.0002 x0=0.0002 normamps=600.0
New Line.SW_FA3526 Phases=3 Bus1=SCN_CN07_9248_CEI026.1.2.3 Bus2=SCN_CN07_9248_CEI026_S.1.2.3 Length=0.001 Units=km r1=0.0001 x1=0.0001 r0=0.0002 x0=0.0002 normamps=600.0
New Line.SW_FT3898 Phases=3 Bus1=SCN_CN07_9258_CEI026.1.2.3 Bus2=SCN_CN07_9258_CEI026_S.1.2.3 Length=0.001 Units=km r1=0.0001 x1=0.0001 r0=0.0002 x0=0.0002 normamps=600.0
New Line.SW_FT3896 Phases=3 Bus1=SCN_CN07_9806_CEI026.1.2.3 Bus2=SCN_CN07_9806_CEI026_S.1.2.3 Length=0.001 Units=km r1=0.0001 x1=0.0001 r0=0.0002 x0=0.0002 normamps=600.0
New Line.SW_FZ0787 Phases=3 Bus1=SCN_CN07_9073_CEI031.1.2.3 Bus2=SCN_CN07_9073_CEI031_S.1.2.3 Length=0.001 Units=km r1=0.0001 x1=0.0001 r0=0.0002 x0=0.0002 normamps=600.0
New Line.SW_FA3869 Phases=3 Bus1=SCN_CN07_9071_CEI031.1.2.3 Bus2=SCN_CN07_9071_CEI031_S.1.2.3 Length=0.001 Units=km r1=0.0001 x1=0.0001 r0=0.0002 x0=0.0002 normamps=600.0
New Line.SW_FZ7264 Phases=3 Bus1=SCN_CN07_9511_CEI026.1.2.3 Bus2=SCN_CN07_9511_CEI026_S.1.2.3 Length=0.001 Units=km r1=0.0001 x1=0.0001 r0=0.0002 x0=0.0002 normamps=600.0
New Line.SW_FIC5451 Phases=3 Bus1=SCN_CN07_9043_CEI280_ATV.1.2.3 Bus2=SCN_CN07_9043_CEI280_ATV_S.1.2.3 Length=0.001 Units=km r1=0.0001 x1=0.0001 r0=0.0002 x0=0.0002 normamps=600.0
New Line.SW_FIC5759 Phases=3 Bus1=SCN_CN07_9043_CEI280_ATV.1.2.3 Bus2=SCN_CN07_9043_CEI280_ATV_S.1.2.3 Length=0.001 Units=km r1=0.0001 x1=0.0001 r0=0.0002 x0=0.0002 normamps=600.0
New Line.SW_FA8909 Phases=3 Bus1=SCN_CN07_9114_CEI012.1.2.3 Bus2=SCN_CN07_9114_CEI012_S.1.2.3 Length=0.001 Units=km r1=0.0001 x1=0.0001 r0=0.0002 x0=0.0002 normamps=600.0
New Line.SW_FT3927 Phases=3 Bus1=SCN_CN07_9033_CEI031.1.2.3 Bus2=SCN_CN07_9033_CEI031_S.1.2.3 Length=0.001 Units=km r1=0.0001 x1=0.0001 r0=0.0002 x0=0.0002 normamps=600.0
New Line.SW_FT3908 Phases=3 Bus1=SCN_CN07_9078_CEI031.1.2.3 Bus2=SCN_CN07_9078_CEI031_S.1.2.3 Length=0.001 Units=km r1=0.0001 x1=0.0001 r0=0.0002 x0=0.0002 normamps=600.0
New Line.SW_FT3899 Phases=3 Bus1=SCN_CN07_9010_CEI13B.1.2.3 Bus2=SCN_CN07_9010_CEI13B_S.1.2.3 Length=0.001 Units=km r1=0.0001 x1=0.0001 r0=0.0002 x0=0.0002 normamps=600.0
New Line.SW_FA9445 Phases=3 Bus1=SCN_CN07_9539_CEI027.1.2.3 Bus2=SCN_CN07_9539_CEI027_S.1.2.3 Length=0.001 Units=km r1=0.0001 x1=0.0001 r0=0.0002 x0=0.0002 normamps=600.0
New Line.SW_FIC6034 Phases=3 Bus1=SCN_CN07_9034_CEI013.1.2.3 Bus2=SCN_CN07_9034_CEI013_S.1.2.3 Length=0.001 Units=km r1=0.0001 x1=0.0001 r0=0.0002 x0=0.0002 normamps=600.0
New Line.SW_FA3976 Phases=3 Bus1=SCN_CN07_9014_CEI13B.1.2.3 Bus2=SCN_CN07_9014_CEI13B_S.1.2.3 Length=0.001 Units=km r1=0.0001 x1=0.0001 r0=0.0002 x0=0.0002 normamps=600.0
New Line.SW_FA2008 Phases=3 Bus1=SCN_CN07_9016_CEI13B.1.2.3 Bus2=SCN_CN07_9016_CEI13B_S.1.2.3 Length=0.001 Units=km r1=0.0001 x1=0.0001 r0=0.0002 x0=0.0002 normamps=600.0
New Line.SW_FZ1324 Phases=3 Bus1=SCN_CN07_9250_CEI026.1.2.3 Bus2=SCN_CN07_9250_CEI026_S.1.2.3 Length=0.001 Units=km r1=0.0001 x1=0.0001 r0=0.0002 x0=0.0002 normamps=600.0
New Line.SW_FZ6245 Phases=3 Bus1=SCN_CN07_9065_CEI013.1.2.3 Bus2=SCN_CN07_9065_CEI013_S.1.2.3 Length=0.001 Units=km r1=0.0001 x1=0.0001 r0=0.0002 x0=0.0002 normamps=600.0
! Chave Aberta de Manobra: SW_FY0258B_DP_46885 Bus1=SCN_CN07_9109_CEI012 Bus2=SCN_CN07_9109_CEI012_S (NA)
New Line.SW_FIC6581 Phases=3 Bus1=SCN_CN07_9090_CEI031.1.2.3 Bus2=SCN_CN07_9090_CEI031_S.1.2.3 Length=0.001 Units=km r1=0.0001 x1=0.0001 r0=0.0002 x0=0.0002 normamps=600.0
! Chave Aberta de Manobra: SW_FY0516B Bus1=SCN_CN07_9032_CEI031 Bus2=SCN_CN07_9032_CEI031_S (NA)
New Line.SW_FY0516F Phases=3 Bus1=SCN_CN07_9032_CEI031.1.2.3 Bus2=SCN_CN07_9032_CEI031_S.1.2.3 Length=0.001 Units=km r1=0.0001 x1=0.0001 r0=0.0002 x0=0.0002 normamps=600.0
New Line.SW_FY0516C Phases=3 Bus1=SCN_CN07_9032_CEI031.1.2.3 Bus2=SCN_CN07_9032_CEI031_S.1.2.3 Length=0.001 Units=km r1=0.0001 x1=0.0001 r0=0.0002 x0=0.0002 normamps=600.0
New Line.SW_FY0258C_DP_47401 Phases=3 Bus1=SCN_CN07_9109_CEI012.1.2.3 Bus2=SCN_CN07_9109_CEI012_S.1.2.3 Length=0.001 Units=km r1=0.0001 x1=0.0001 r0=0.0002 x0=0.0002 normamps=600.0
New Line.SW_FY0258F_DP_47461 Phases=3 Bus1=SCN_CN07_9109_CEI012.1.2.3 Bus2=SCN_CN07_9109_CEI012_S.1.2.3 Length=0.001 Units=km r1=0.0001 x1=0.0001 r0=0.0002 x0=0.0002 normamps=600.0
New Line.SW_C11202_CHVPRI Phases=3 Bus1=SCN_CN07_PT_CH1_1357.1.2.3 Bus2=SCN_CN07_PT_CH1_1357_S.1.2.3 Length=0.001 Units=km r1=0.0001 x1=0.0001 r0=0.0002 x0=0.0002 normamps=600.0
New Line.SW_C11203_DP_1358_CHVPRI Phases=3 Bus1=SCN_CN07_PT_CH1_1358.1.2.3 Bus2=SCN_CN07_PT_CH1_1358_S.1.2.3 Length=0.001 Units=km r1=0.0001 x1=0.0001 r0=0.0002 x0=0.0002 normamps=600.0
New Line.SW_C11204_CHVPRI Phases=3 Bus1=SCN_CN07_PT_CH1_1359.1.2.3 Bus2=SCN_CN07_PT_CH1_1359_S.1.2.3 Length=0.001 Units=km r1=0.0001 x1=0.0001 r0=0.0002 x0=0.0002 normamps=600.0
New Line.SW_090021_RL Phases=3 Bus1=SCN_CN07_9090_CEI031.1.2.3 Bus2=SCN_CN07_9090_CEI031_S.1.2.3 Length=0.001 Units=km r1=0.0001 x1=0.0001 r0=0.0002 x0=0.0002 normamps=600.0
! Chave Aberta de Manobra: SW_FY0258_RL Bus1=SCN_CN07_9109_CEI012 Bus2=SCN_CN07_9109_CEI012_S (NA)
! Chave Aberta de Manobra: SW_RE0516_RL Bus1=SCN_CN07_9032_CEI031 Bus2=SCN_CN07_9032_CEI031_S (NA)
New Line.SW_2133_SCN Phases=3 Bus1=CN_BTS1138KV.1.2.3 Bus2=CN_ALCN07.1.2.3 Length=0.001 Units=km r1=0.0001 x1=0.0001 r0=0.0002 x0=0.0002 normamps=600.0
New Line.SW_2153_SCN Phases=3 Bus1=CN_DJCN07_CH2153.1.2.3 Bus2=CN_ALCN07.1.2.3 Length=0.001 Units=km r1=0.0001 x1=0.0001 r0=0.0002 x0=0.0002 normamps=600.0
New Line.SW_2075_SCN Phases=3 Bus1=CN_BPS1138KV.1.2.3 Bus2=CN_CH2075_DJCN07.1.2.3 Length=0.001 Units=km r1=0.0001 x1=0.0001 r0=0.0002 x0=0.0002 normamps=600.0
New Line.SW_CN07_SCN Phases=3 Bus1=CN_CH2075_DJCN07.1.2.3 Bus2=CN_DJCN07_CH2153.1.2.3 Length=0.001 Units=km r1=0.0001 x1=0.0001 r0=0.0002 x0=0.0002 normamps=600.0
New Line.SW_FA7087 Phases=3 Bus1=SCN_CN07_9545_CEI027.1.2.3 Bus2=SCN_CN07_9545_CEI027_S.1.2.3 Length=0.001 Units=km r1=0.0001 x1=0.0001 r0=0.0002 x0=0.0002 normamps=600.0
New Line.SW_FP6812 Phases=3 Bus1=SCN_CN07_9562_CEI027.1.2.3 Bus2=SCN_CN07_9562_CEI027_S.1.2.3 Length=0.001 Units=km r1=0.0001 x1=0.0001 r0=0.0002 x0=0.0002 normamps=600.0
New Line.SW_FW7083 Phases=3 Bus1=SCN_CN07_9592_CEI027.1.2.3 Bus2=SCN_CN07_9592_CEI027_S.1.2.3 Length=0.001 Units=km r1=0.0001 x1=0.0001 r0=0.0002 x0=0.0002 normamps=600.0
New Line.SW_FW2486 Phases=3 Bus1=SCN_CN07_9581_CEI027.1.2.3 Bus2=SCN_CN07_9581_CEI027_S.1.2.3 Length=0.001 Units=km r1=0.0001 x1=0.0001 r0=0.0002 x0=0.0002 normamps=600.0
New Line.SW_FIC3199 Phases=3 Bus1=SCN_CN07_9157_CEI054.1.2.3 Bus2=SCN_CN07_9157_CEI054_S.1.2.3 Length=0.001 Units=km r1=0.0001 x1=0.0001 r0=0.0002 x0=0.0002 normamps=600.0
New Line.SW_FT3887 Phases=3 Bus1=SCN_CN07_9316_CEI035.1.2.3 Bus2=SCN_CN07_9316_CEI035_S.1.2.3 Length=0.001 Units=km r1=0.0001 x1=0.0001 r0=0.0002 x0=0.0002 normamps=600.0
New Line.SW_FT3892 Phases=3 Bus1=SCN_CN07_9814_CEI053.1.2.3 Bus2=SCN_CN07_9814_CEI053_S.1.2.3 Length=0.001 Units=km r1=0.0001 x1=0.0001 r0=0.0002 x0=0.0002 normamps=600.0
New Line.SW_FT3915 Phases=3 Bus1=SCN_CN07_9070_CEI32A.1.2.3 Bus2=SCN_CN07_9070_CEI32A_S.1.2.3 Length=0.001 Units=km r1=0.0001 x1=0.0001 r0=0.0002 x0=0.0002 normamps=600.0
New Line.SW_FT3910 Phases=3 Bus1=SCN_CN07_9040_CEI031.1.2.3 Bus2=SCN_CN07_9040_CEI031_S.1.2.3 Length=0.001 Units=km r1=0.0001 x1=0.0001 r0=0.0002 x0=0.0002 normamps=600.0
New Line.SW_FT3781 Phases=3 Bus1=SCN_CN07_9171_CEI038.1.2.3 Bus2=SCN_CN07_9171_CEI038_S.1.2.3 Length=0.001 Units=km r1=0.0001 x1=0.0001 r0=0.0002 x0=0.0002 normamps=600.0
New Line.SW_FZ3124 Phases=3 Bus1=SCN_CN07_9143_CEI038.1.2.3 Bus2=SCN_CN07_9143_CEI038_S.1.2.3 Length=0.001 Units=km r1=0.0001 x1=0.0001 r0=0.0002 x0=0.0002 normamps=600.0
New Line.SW_FK0508 Phases=3 Bus1=SCN_CN07_9065_CEI041.1.2.3 Bus2=SCN_CN07_9065_CEI041_S.1.2.3 Length=0.001 Units=km r1=0.0001 x1=0.0001 r0=0.0002 x0=0.0002 normamps=600.0
New Line.SW_FT3888 Phases=3 Bus1=SCN_CN07_9315_CEI035.1.2.3 Bus2=SCN_CN07_9315_CEI035_S.1.2.3 Length=0.001 Units=km r1=0.0001 x1=0.0001 r0=0.0002 x0=0.0002 normamps=600.0
New Line.SW_FP8560 Phases=3 Bus1=SCN_CN07_9255_CEI041.1.2.3 Bus2=SCN_CN07_9255_CEI041_S.1.2.3 Length=0.001 Units=km r1=0.0001 x1=0.0001 r0=0.0002 x0=0.0002 normamps=600.0
New Line.SW_FT3782 Phases=3 Bus1=SCN_CN07_9168_CEI038.1.2.3 Bus2=SCN_CN07_9168_CEI038_S.1.2.3 Length=0.001 Units=km r1=0.0001 x1=0.0001 r0=0.0002 x0=0.0002 normamps=600.0
! Chave Aberta de Manobra: SW_FA3701 Bus1=SCN_CN07_9168_CEI041 Bus2=SCN_CN07_9168_CEI041_S (NA)
New Line.SW_FZ4255 Phases=3 Bus1=SCN_CN07_9586_CEI027.1.2.3 Bus2=SCN_CN07_9586_CEI027_S.1.2.3 Length=0.001 Units=km r1=0.0001 x1=0.0001 r0=0.0002 x0=0.0002 normamps=600.0
New Line.SW_FT3778 Phases=3 Bus1=SCN_CN07_9215_CEI038.1.2.3 Bus2=SCN_CN07_9215_CEI038_S.1.2.3 Length=0.001 Units=km r1=0.0001 x1=0.0001 r0=0.0002 x0=0.0002 normamps=600.0
New Line.SW_FU1847 Phases=3 Bus1=SCN_CN07_9027_CEI32A.1.2.3 Bus2=SCN_CN07_9027_CEI32A_S.1.2.3 Length=0.001 Units=km r1=0.0001 x1=0.0001 r0=0.0002 x0=0.0002 normamps=600.0
New Line.SW_FT3917 Phases=1 Bus1=SCN_CN07_9111_CEI32A.1.0 Bus2=SCN_CN07_9111_CEI32A_S.1.0 Length=0.001 Units=km r1=0.0001 x1=0.0001 r0=0.0002 x0=0.0002 normamps=600.0
! Chave Aberta de Manobra: SW_FA8955 Bus1=SCN_CN07_9139_CEI054 Bus2=SCN_CN07_9139_CEI054_S (NA)
New Line.SW_FT3772 Phases=3 Bus1=SCN_CN07_9060_CEI041.1.2.3 Bus2=SCN_CN07_9060_CEI041_S.1.2.3 Length=0.001 Units=km r1=0.0001 x1=0.0001 r0=0.0002 x0=0.0002 normamps=600.0
New Line.SW_FW3196 Phases=3 Bus1=SCN_CN07_9268_CEI041.1.2.3 Bus2=SCN_CN07_9268_CEI041_S.1.2.3 Length=0.001 Units=km r1=0.0001 x1=0.0001 r0=0.0002 x0=0.0002 normamps=600.0
New Line.SW_FW2609 Phases=3 Bus1=SCN_CN07_9164_CEI054.1.2.3 Bus2=SCN_CN07_9164_CEI054_S.1.2.3 Length=0.001 Units=km r1=0.0001 x1=0.0001 r0=0.0002 x0=0.0002 normamps=600.0
New Line.SW_FT3883 Phases=3 Bus1=SCN_CN07_9266_CEI041.1.2.3 Bus2=SCN_CN07_9266_CEI041_S.1.2.3 Length=0.001 Units=km r1=0.0001 x1=0.0001 r0=0.0002 x0=0.0002 normamps=600.0
New Line.SW_FZ0786 Phases=3 Bus1=SCN_CN07_9218_CEI038.1.2.3 Bus2=SCN_CN07_9218_CEI038_S.1.2.3 Length=0.001 Units=km r1=0.0001 x1=0.0001 r0=0.0002 x0=0.0002 normamps=600.0
New Line.SW_FZ0867 Phases=3 Bus1=SCN_CN07_9159_CEI041.1.2.3 Bus2=SCN_CN07_9159_CEI041_S.1.2.3 Length=0.001 Units=km r1=0.0001 x1=0.0001 r0=0.0002 x0=0.0002 normamps=600.0
New Line.SW_FT3788 Phases=3 Bus1=SCN_CN07_9128_CEI035.1.2.3 Bus2=SCN_CN07_9128_CEI035_S.1.2.3 Length=0.001 Units=km r1=0.0001 x1=0.0001 r0=0.0002 x0=0.0002 normamps=600.0
New Line.SW_FT3893 Phases=3 Bus1=SCN_CN07_9558_CEI027.1.2.3 Bus2=SCN_CN07_9558_CEI027_S.1.2.3 Length=0.001 Units=km r1=0.0001 x1=0.0001 r0=0.0002 x0=0.0002 normamps=600.0
New Line.SW_FX5059 Phases=3 Bus1=SCN_CN07_9138_CEI054.1.2.3 Bus2=SCN_CN07_9138_CEI054_S.1.2.3 Length=0.001 Units=km r1=0.0001 x1=0.0001 r0=0.0002 x0=0.0002 normamps=600.0
New Line.SW_FT3786 Phases=3 Bus1=SCN_CN07_9134_CEI035.1.2.3 Bus2=SCN_CN07_9134_CEI035_S.1.2.3 Length=0.001 Units=km r1=0.0001 x1=0.0001 r0=0.0002 x0=0.0002 normamps=600.0
New Line.SW_FT3920 Phases=3 Bus1=SCN_CN07_9147_CEI054.1.2.3 Bus2=SCN_CN07_9147_CEI054_S.1.2.3 Length=0.001 Units=km r1=0.0001 x1=0.0001 r0=0.0002 x0=0.0002 normamps=600.0
New Line.SW_FT3769 Phases=3 Bus1=SCN_CN07_9051_CEI041.1.2.3 Bus2=SCN_CN07_9051_CEI041_S.1.2.3 Length=0.001 Units=km r1=0.0001 x1=0.0001 r0=0.0002 x0=0.0002 normamps=600.0
New Line.SW_FT3891 Phases=3 Bus1=SCN_CN07_9813_CEI053.1.2.3 Bus2=SCN_CN07_9813_CEI053_S.1.2.3 Length=0.001 Units=km r1=0.0001 x1=0.0001 r0=0.0002 x0=0.0002 normamps=600.0
New Line.SW_FA3649 Phases=3 Bus1=SCN_CN07_9036_CEI031.1.2.3 Bus2=SCN_CN07_9036_CEI031_S.1.2.3 Length=0.001 Units=km r1=0.0001 x1=0.0001 r0=0.0002 x0=0.0002 normamps=600.0
! Chave Aberta de Manobra: SW_FU3617 Bus1=SCN_CN07_9143_CEI051 Bus2=SCN_CN07_9143_CEI051_S (NA)
New Line.SW_FT3884 Phases=3 Bus1=SCN_CN07_9269_CEI041.1.2.3 Bus2=SCN_CN07_9269_CEI041_S.1.2.3 Length=0.001 Units=km r1=0.0001 x1=0.0001 r0=0.0002 x0=0.0002 normamps=600.0
New Line.SW_FT3894 Phases=3 Bus1=SCN_CN07_9549_CEI027.1.2.3 Bus2=SCN_CN07_9549_CEI027_S.1.2.3 Length=0.001 Units=km r1=0.0001 x1=0.0001 r0=0.0002 x0=0.0002 normamps=600.0
New Line.SW_FT3768 Phases=3 Bus1=SCN_CN07_9048_CEI041.1.2.3 Bus2=SCN_CN07_9048_CEI041_S.1.2.3 Length=0.001 Units=km r1=0.0001 x1=0.0001 r0=0.0002 x0=0.0002 normamps=600.0
New Line.SW_FT3767 Phases=3 Bus1=SCN_CN07_9045_CEI041.1.2.3 Bus2=SCN_CN07_9045_CEI041_S.1.2.3 Length=0.001 Units=km r1=0.0001 x1=0.0001 r0=0.0002 x0=0.0002 normamps=600.0
New Line.SW_FT3761 Phases=3 Bus1=SCN_CN07_9165_CEI041.1.2.3 Bus2=SCN_CN07_9165_CEI041_S.1.2.3 Length=0.001 Units=km r1=0.0001 x1=0.0001 r0=0.0002 x0=0.0002 normamps=600.0
New Line.SW_FA7490 Phases=3 Bus1=SCN_CN07_9571_CEI027.1.2.3 Bus2=SCN_CN07_9571_CEI027_S.1.2.3 Length=0.001 Units=km r1=0.0001 x1=0.0001 r0=0.0002 x0=0.0002 normamps=600.0
New Line.SW_FT3779 Phases=3 Bus1=SCN_CN07_9195_CEI038.1.2.3 Bus2=SCN_CN07_9195_CEI038_S.1.2.3 Length=0.001 Units=km r1=0.0001 x1=0.0001 r0=0.0002 x0=0.0002 normamps=600.0
New Line.SW_FT3770 Phases=3 Bus1=SCN_CN07_9054_CEI041.1.2.3 Bus2=SCN_CN07_9054_CEI041_S.1.2.3 Length=0.001 Units=km r1=0.0001 x1=0.0001 r0=0.0002 x0=0.0002 normamps=600.0
New Line.SW_FIC5324 Phases=3 Bus1=SCN_CN07_9133_CEI038.1.2.3 Bus2=SCN_CN07_9133_CEI038_S.1.2.3 Length=0.001 Units=km r1=0.0001 x1=0.0001 r0=0.0002 x0=0.0002 normamps=600.0
New Line.SW_FT3890 Phases=3 Bus1=SCN_CN07_9818_CEI053.1.2.3 Bus2=SCN_CN07_9818_CEI053_S.1.2.3 Length=0.001 Units=km r1=0.0001 x1=0.0001 r0=0.0002 x0=0.0002 normamps=600.0
New Line.SW_FX1432 Phases=3 Bus1=SCN_CN07_9148_CEI041.1.2.3 Bus2=SCN_CN07_9148_CEI041_S.1.2.3 Length=0.001 Units=km r1=0.0001 x1=0.0001 r0=0.0002 x0=0.0002 normamps=600.0
New Line.SW_FT3763 Phases=3 Bus1=SCN_CN07_9153_CEI041.1.2.3 Bus2=SCN_CN07_9153_CEI041_S.1.2.3 Length=0.001 Units=km r1=0.0001 x1=0.0001 r0=0.0002 x0=0.0002 normamps=600.0
New Line.SW_FT1938 Phases=3 Bus1=SCN_CN07_9547_CEI027.1.2.3 Bus2=SCN_CN07_9547_CEI027_S.1.2.3 Length=0.001 Units=km r1=0.0001 x1=0.0001 r0=0.0002 x0=0.0002 normamps=600.0
New Line.SW_FP4501 Phases=3 Bus1=SCN_CN07_9267_CEI041.1.2.3 Bus2=SCN_CN07_9267_CEI041_S.1.2.3 Length=0.001 Units=km r1=0.0001 x1=0.0001 r0=0.0002 x0=0.0002 normamps=600.0
New Line.SW_FU3555 Phases=3 Bus1=SCN_CN07_9820_CEI053.1.2.3 Bus2=SCN_CN07_9820_CEI053_S.1.2.3 Length=0.001 Units=km r1=0.0001 x1=0.0001 r0=0.0002 x0=0.0002 normamps=600.0
New Line.SW_FK0546 Phases=3 Bus1=SCN_CN07_9166_CEI038.1.2.3 Bus2=SCN_CN07_9166_CEI038_S.1.2.3 Length=0.001 Units=km r1=0.0001 x1=0.0001 r0=0.0002 x0=0.0002 normamps=600.0
New Line.SW_FIC5468 Phases=3 Bus1=SCN_CN07_9044_CEI32A.1.2.3 Bus2=SCN_CN07_9044_CEI32A_S.1.2.3 Length=0.001 Units=km r1=0.0001 x1=0.0001 r0=0.0002 x0=0.0002 normamps=600.0
New Line.SW_FIC5507 Phases=3 Bus1=SCN_CN07_9002_CEI035.1.2.3 Bus2=SCN_CN07_9002_CEI035_S.1.2.3 Length=0.001 Units=km r1=0.0001 x1=0.0001 r0=0.0002 x0=0.0002 normamps=600.0
New Line.SW_FK0465 Phases=3 Bus1=SCN_CN07_9289_CEI035.1.2.3 Bus2=SCN_CN07_9289_CEI035_S.1.2.3 Length=0.001 Units=km r1=0.0001 x1=0.0001 r0=0.0002 x0=0.0002 normamps=600.0
New Line.SW_FK0318 Phases=3 Bus1=SCN_CN07_9005_CEI035.1.2.3 Bus2=SCN_CN07_9005_CEI035_S.1.2.3 Length=0.001 Units=km r1=0.0001 x1=0.0001 r0=0.0002 x0=0.0002 normamps=600.0
New Line.SW_FM1066 Phases=3 Bus1=SCN_CN07_9108_CEI038.1.2.3 Bus2=SCN_CN07_9108_CEI038_S.1.2.3 Length=0.001 Units=km r1=0.0001 x1=0.0001 r0=0.0002 x0=0.0002 normamps=600.0
New Line.SW_FT3918 Phases=3 Bus1=SCN_CN07_9168_CEI054.1.2.3 Bus2=SCN_CN07_9168_CEI054_S.1.2.3 Length=0.001 Units=km r1=0.0001 x1=0.0001 r0=0.0002 x0=0.0002 normamps=600.0
New Line.SW_FX1397 Phases=3 Bus1=SCN_CN07_9050_CEI035.1.2.3 Bus2=SCN_CN07_9050_CEI035_S.1.2.3 Length=0.001 Units=km r1=0.0001 x1=0.0001 r0=0.0002 x0=0.0002 normamps=600.0
New Line.SW_FT1934 Phases=3 Bus1=SCN_CN07_9583_CEI027.1.2.3 Bus2=SCN_CN07_9583_CEI027_S.1.2.3 Length=0.001 Units=km r1=0.0001 x1=0.0001 r0=0.0002 x0=0.0002 normamps=600.0
New Line.SW_FA3632 Phases=3 Bus1=SCN_CN07_9302_CEI035.1.2.3 Bus2=SCN_CN07_9302_CEI035_S.1.2.3 Length=0.001 Units=km r1=0.0001 x1=0.0001 r0=0.0002 x0=0.0002 normamps=600.0
New Line.SW_FA3524 Phases=3 Bus1=SCN_CN07_9301_CEI035.1.2.3 Bus2=SCN_CN07_9301_CEI035_S.1.2.3 Length=0.001 Units=km r1=0.0001 x1=0.0001 r0=0.0002 x0=0.0002 normamps=600.0
New Line.SW_FU3618 Phases=3 Bus1=SCN_CN07_9258_CEI041.1.2.3 Bus2=SCN_CN07_9258_CEI041_S.1.2.3 Length=0.001 Units=km r1=0.0001 x1=0.0001 r0=0.0002 x0=0.0002 normamps=600.0
New Line.SW_FT3773 Phases=3 Bus1=SCN_CN07_9063_CEI041.1.2.3 Bus2=SCN_CN07_9063_CEI041_S.1.2.3 Length=0.001 Units=km r1=0.0001 x1=0.0001 r0=0.0002 x0=0.0002 normamps=600.0
New Line.SW_FT3885 Phases=3 Bus1=SCN_CN07_9118_CEI038.1.2.3 Bus2=SCN_CN07_9118_CEI038_S.1.2.3 Length=0.001 Units=km r1=0.0001 x1=0.0001 r0=0.0002 x0=0.0002 normamps=600.0
New Line.SW_FIC6071 Phases=3 Bus1=SCN_CN07_9019_CEI035.1.2.3 Bus2=SCN_CN07_9019_CEI035_S.1.2.3 Length=0.001 Units=km r1=0.0001 x1=0.0001 r0=0.0002 x0=0.0002 normamps=600.0
New Line.SW_FU3614 Phases=3 Bus1=SCN_CN07_9020_CEI035.1.2.3 Bus2=SCN_CN07_9020_CEI035_S.1.2.3 Length=0.001 Units=km r1=0.0001 x1=0.0001 r0=0.0002 x0=0.0002 normamps=600.0
New Line.SW_FT3913 Phases=3 Bus1=SCN_CN07_9046_CEI32A.1.2.3 Bus2=SCN_CN07_9046_CEI32A_S.1.2.3 Length=0.001 Units=km r1=0.0001 x1=0.0001 r0=0.0002 x0=0.0002 normamps=600.0
New Line.SW_FT3916 Phases=3 Bus1=SCN_CN07_9106_CEI32A.1.2.3 Bus2=SCN_CN07_9106_CEI32A_S.1.2.3 Length=0.001 Units=km r1=0.0001 x1=0.0001 r0=0.0002 x0=0.0002 normamps=600.0
New Line.SW_FP0808 Phases=3 Bus1=SCN_CN07_9579_CEI027.1.2.3 Bus2=SCN_CN07_9579_CEI027_S.1.2.3 Length=0.001 Units=km r1=0.0001 x1=0.0001 r0=0.0002 x0=0.0002 normamps=600.0
New Line.SW_FM1383 Phases=3 Bus1=SCN_CN07_9192_CEI038.1.2.3 Bus2=SCN_CN07_9192_CEI038_S.1.2.3 Length=0.001 Units=km r1=0.0001 x1=0.0001 r0=0.0002 x0=0.0002 normamps=600.0
New Line.SW_FIC6094 Phases=3 Bus1=SCN_CN07_9009_CEI035.1.2.3 Bus2=SCN_CN07_9009_CEI035_S.1.2.3 Length=0.001 Units=km r1=0.0001 x1=0.0001 r0=0.0002 x0=0.0002 normamps=600.0
New Line.SW_FT3771 Phases=3 Bus1=SCN_CN07_9057_CEI041.1.2.3 Bus2=SCN_CN07_9057_CEI041_S.1.2.3 Length=0.001 Units=km r1=0.0001 x1=0.0001 r0=0.0002 x0=0.0002 normamps=600.0
New Line.SW_FW0429 Phases=3 Bus1=SCN_CN07_9318_CEI035.1.2.3 Bus2=SCN_CN07_9318_CEI035_S.1.2.3 Length=0.001 Units=km r1=0.0001 x1=0.0001 r0=0.0002 x0=0.0002 normamps=600.0
New Line.SW_FT3776 Phases=3 Bus1=SCN_CN07_9238_CEI038.1.2.3 Bus2=SCN_CN07_9238_CEI038_S.1.2.3 Length=0.001 Units=km r1=0.0001 x1=0.0001 r0=0.0002 x0=0.0002 normamps=600.0
New Line.SW_FT3787 Phases=3 Bus1=SCN_CN07_9131_CEI035.1.2.3 Bus2=SCN_CN07_9131_CEI035_S.1.2.3 Length=0.001 Units=km r1=0.0001 x1=0.0001 r0=0.0002 x0=0.0002 normamps=600.0
New Line.SW_FP4076 Phases=3 Bus1=SCN_CN07_9319_CEI035.1.2.3 Bus2=SCN_CN07_9319_CEI035_S.1.2.3 Length=0.001 Units=km r1=0.0001 x1=0.0001 r0=0.0002 x0=0.0002 normamps=600.0
New Line.SW_FIC1318 Phases=3 Bus1=SCN_CN07_9141_CEI051.1.2.3 Bus2=SCN_CN07_9141_CEI051_S.1.2.3 Length=0.001 Units=km r1=0.0001 x1=0.0001 r0=0.0002 x0=0.0002 normamps=600.0
! Chave Aberta de Manobra: SW_FY1019B Bus1=SCN_CN07_9069_CEI031 Bus2=SCN_CN07_9069_CEI031_S (NA)
! Chave Aberta de Manobra: SW_FY0266 Bus1=SCN_CN07_9272_CEI041 Bus2=SCN_CN07_9272_CEI041_S (NA)
New Line.SW_FY0247F Phases=3 Bus1=SCN_CN07_9304_CEI035.1.2.3 Bus2=SCN_CN07_9304_CEI035_S.1.2.3 Length=0.001 Units=km r1=0.0001 x1=0.0001 r0=0.0002 x0=0.0002 normamps=600.0
New Line.SW_FY0266C Phases=3 Bus1=SCN_CN07_9272_CEI041.1.2.3 Bus2=SCN_CN07_9272_CEI041_S.1.2.3 Length=0.001 Units=km r1=0.0001 x1=0.0001 r0=0.0002 x0=0.0002 normamps=600.0
New Line.SW_FY1019c Phases=3 Bus1=SCN_CN07_9069_CEI031.1.2.3 Bus2=SCN_CN07_9069_CEI031_S.1.2.3 Length=0.001 Units=km r1=0.0001 x1=0.0001 r0=0.0002 x0=0.0002 normamps=600.0
! Chave Aberta de Manobra: SW_FA9943 Bus1=SCN_CN07_419188_CEI Bus2=SCN_CN07_419188_CEI_S (NA)
New Line.SW_FY0266F Phases=3 Bus1=SCN_CN07_9272_CEI041.1.2.3 Bus2=SCN_CN07_9272_CEI041_S.1.2.3 Length=0.001 Units=km r1=0.0001 x1=0.0001 r0=0.0002 x0=0.0002 normamps=600.0
New Line.SW_FY0247C Phases=3 Bus1=SCN_CN07_9304_CEI035.1.2.3 Bus2=SCN_CN07_9304_CEI035_S.1.2.3 Length=0.001 Units=km r1=0.0001 x1=0.0001 r0=0.0002 x0=0.0002 normamps=600.0
! Chave Aberta de Manobra: SW_FY0247B Bus1=SCN_CN07_9304_CEI035 Bus2=SCN_CN07_9304_CEI035_S (NA)
New Line.SW_C11360_CHVPRI Phases=3 Bus1=SCN_CN07_PT_CH1_1369.1.2.3 Bus2=SCN_CN07_PT_CH1_1369_S.1.2.3 Length=0.001 Units=km r1=0.0001 x1=0.0001 r0=0.0002 x0=0.0002 normamps=600.0
New Line.SW_C11361_CHVPRI Phases=3 Bus1=SCN_CN07_PT_CH1_1370.1.2.3 Bus2=SCN_CN07_PT_CH1_1370_S.1.2.3 Length=0.001 Units=km r1=0.0001 x1=0.0001 r0=0.0002 x0=0.0002 normamps=600.0
! Chave Aberta de Manobra: SW_095421_RL Bus1=SCN_CN07_9135_CEI054 Bus2=SCN_CN07_9135_CEI054_S (NA)
New Line.SW_RE0247_RL Phases=3 Bus1=SCN_CN07_9304_CEI035.1.2.3 Bus2=SCN_CN07_9304_CEI035_S.1.2.3 Length=0.001 Units=km r1=0.0001 x1=0.0001 r0=0.0002 x0=0.0002 normamps=600.0
New Line.SW_RE0266_RL Phases=3 Bus1=SCN_CN07_9272_CEI041.1.2.3 Bus2=SCN_CN07_9272_CEI041_S.1.2.3 Length=0.001 Units=km r1=0.0001 x1=0.0001 r0=0.0002 x0=0.0002 normamps=600.0
New Line.SW_RE1019_RL Phases=3 Bus1=SCN_CN07_9069_CEI031.1.2.3 Bus2=SCN_CN07_9069_CEI031_S.1.2.3 Length=0.001 Units=km r1=0.0001 x1=0.0001 r0=0.0002 x0=0.0002 normamps=600.0
