! OpenDSS Switches - Subestacao SBG (02_BGC1 / BG_01C2) | RUN_TAG: 20261028_120647
! Total de Chaves: 316

New Line.SW_4075_S01 Phases=3 Bus1=01_CH4065_CH4027_CH4075.1.2.3 Bus2=01_CH4075_DJ4044.1.2.3 Length=0.001 Units=km r1=0.0001 x1=0.0001 r0=0.0002 x0=0.0002 normamps=800.0
New Line.SW_4065_S01 Phases=3 Bus1=01_DJ4034_CH4065.1.2.3 Bus2=01_CH4065_CH4027_CH4075.1.2.3 Length=0.001 Units=km r1=0.0001 x1=0.0001 r0=0.0002 x0=0.0002 normamps=800.0
New Line.SW_4027_S01 Phases=3 Bus1=01_CH4065_CH4027_CH4075.1.2.3 Bus2=01_CH4027_ETR2AT.1.2.3 Length=0.001 Units=km r1=0.0001 x1=0.0001 r0=0.0002 x0=0.0002 normamps=800.0
New Line.SW_4044_S01 Phases=3 Bus1=01_CH4075_DJ4044.1.2.3 Bus2=01_CJ4044_CH4085.1.2.3 Length=0.001 Units=km r1=0.0001 x1=0.0001 r0=0.0002 x0=0.0002 normamps=800.0
New Line.SW_4023_S01 Phases=3 Bus1=01_ELBG2.1.2.3 Bus2=01_CH4045_CH4023_CH4055.1.2.3 Length=0.001 Units=km r1=0.0001 x1=0.0001 r0=0.0002 x0=0.0002 normamps=800.0
New Line.SW_4024_S01 Phases=3 Bus1=01_CH4035_DJ4024.1.2.3 Bus2=01_DJ4024_CH4045.1.2.3 Length=0.001 Units=km r1=0.0001 x1=0.0001 r0=0.0002 x0=0.0002 normamps=800.0
New Line.SW_4025_S01 Phases=3 Bus1=01_DJ4014_CH4025.1.2.3 Bus2=01_CH4025_CH4017_CH4035.1.2.3 Length=0.001 Units=km r1=0.0001 x1=0.0001 r0=0.0002 x0=0.0002 normamps=800.0
New Line.SW_4017_S01 Phases=3 Bus1=01_CH4025_CH4017_CH4035.1.2.3 Bus2=01_CH4017_ETR1AT.1.2.3 Length=0.001 Units=km r1=0.0001 x1=0.0001 r0=0.0002 x0=0.0002 normamps=800.0
New Line.SW_4034_S01 Phases=3 Bus1=01_CH4055_DJ4034.1.2.3 Bus2=01_DJ4034_CH4065.1.2.3 Length=0.001 Units=km r1=0.0001 x1=0.0001 r0=0.0002 x0=0.0002 normamps=800.0
New Line.SW_4035_S01 Phases=3 Bus1=01_CH4025_CH4017_CH4035.1.2.3 Bus2=01_CH4035_DJ4024.1.2.3 Length=0.001 Units=km r1=0.0001 x1=0.0001 r0=0.0002 x0=0.0002 normamps=800.0
New Line.SW_4045_S01 Phases=3 Bus1=01_DJ4024_CH4045.1.2.3 Bus2=01_CH4045_CH4023_CH4055.1.2.3 Length=0.001 Units=km r1=0.0001 x1=0.0001 r0=0.0002 x0=0.0002 normamps=800.0
New Line.SW_4055_S01 Phases=3 Bus1=01_CH4045_CH4023_CH4055.1.2.3 Bus2=01_CH4055_DJ4034.1.2.3 Length=0.001 Units=km r1=0.0001 x1=0.0001 r0=0.0002 x0=0.0002 normamps=800.0
New Line.SW_0214_S02 Phases=3 Bus1=02_BA2138KV.1.2.3 Bus2=02_AL0214.1.2.3 Length=0.001 Units=km r1=0.0001 x1=0.0001 r0=0.0002 x0=0.0002 normamps=800.0
New Line.SW_0215_S02 Phases=3 Bus1=02_BA3138KV.1.2.3 Bus2=02_AL0215.1.2.3 Length=0.001 Units=km r1=0.0001 x1=0.0001 r0=0.0002 x0=0.0002 normamps=800.0
New Line.SW_0216_S02 Phases=3 Bus1=02_BA1138KV.1.2.3 Bus2=02_AL0216.1.2.3 Length=0.001 Units=km r1=0.0001 x1=0.0001 r0=0.0002 x0=0.0002 normamps=800.0
New Line.SW_0217_S02 Phases=3 Bus1=02_BA2138KV.1.2.3 Bus2=02_AL0217.1.2.3 Length=0.001 Units=km r1=0.0001 x1=0.0001 r0=0.0002 x0=0.0002 normamps=800.0
New Line.SW_0218_S02 Phases=3 Bus1=02_BA3138KV.1.2.3 Bus2=02_AL0218.1.2.3 Length=0.001 Units=km r1=0.0001 x1=0.0001 r0=0.0002 x0=0.0002 normamps=800.0
New Line.SW_0219_S02 Phases=3 Bus1=02_BA1138KV.1.2.3 Bus2=02_AL0219.1.2.3 Length=0.001 Units=km r1=0.0001 x1=0.0001 r0=0.0002 x0=0.0002 normamps=800.0
New Line.SW_0220_S02 Phases=3 Bus1=02_BA2138KV.1.2.3 Bus2=02_AL0220.1.2.3 Length=0.001 Units=km r1=0.0001 x1=0.0001 r0=0.0002 x0=0.0002 normamps=800.0
New Line.SW_0221_S02 Phases=3 Bus1=02_BA3138KV.1.2.3 Bus2=02_AL0221.1.2.3 Length=0.001 Units=km r1=0.0001 x1=0.0001 r0=0.0002 x0=0.0002 normamps=800.0
New Line.SW_0222_S02 Phases=3 Bus1=02_BA3138KV.1.2.3 Bus2=02_AL0222.1.2.3 Length=0.001 Units=km r1=0.0001 x1=0.0001 r0=0.0002 x0=0.0002 normamps=800.0
New Line.SW_0223_S02 Phases=3 Bus1=02_BA2138KV.1.2.3 Bus2=02_AL0223.1.2.3 Length=0.001 Units=km r1=0.0001 x1=0.0001 r0=0.0002 x0=0.0002 normamps=800.0
New Line.SW_0224_S02 Phases=3 Bus1=02_BA3138KV.1.2.3 Bus2=02_AL0224.1.2.3 Length=0.001 Units=km r1=0.0001 x1=0.0001 r0=0.0002 x0=0.0002 normamps=800.0
New Line.SW_0225_S02 Phases=3 Bus1=02_BA3138KV.1.2.3 Bus2=02_AL0225.1.2.3 Length=0.001 Units=km r1=0.0001 x1=0.0001 r0=0.0002 x0=0.0002 normamps=800.0
New Line.SW_02FUT_S02 Phases=3 Bus1=02_BA1138KV.1.2.3 Bus2=02_AL02FUT.1.2.3 Length=0.001 Units=km r1=0.0001 x1=0.0001 r0=0.0002 x0=0.0002 normamps=800.0
New Line.SW_0201_S02 Phases=3 Bus1=02_BA1138KV.1.2.3 Bus2=02_AL0201.1.2.3 Length=0.001 Units=km r1=0.0001 x1=0.0001 r0=0.0002 x0=0.0002 normamps=800.0
New Line.SW_0209_S02 Phases=3 Bus1=02_BA3138KV.1.2.3 Bus2=02_AL0209.1.2.3 Length=0.001 Units=km r1=0.0001 x1=0.0001 r0=0.0002 x0=0.0002 normamps=800.0
New Line.SW_4105_S02 Phases=3 Bus1=02_DJ4054_CH4105.1.2.3 Bus2=02_CH4105_CH4037_CH4115.1.2.3 Length=0.001 Units=km r1=0.0001 x1=0.0001 r0=0.0002 x0=0.0002 normamps=800.0
New Line.SW_2027_S02 Phases=3 Bus1=02_BA3138KV.1.2.3 Bus2=02_CH2027_FUTSA2.1.2.3 Length=0.001 Units=km r1=0.0001 x1=0.0001 r0=0.0002 x0=0.0002 normamps=800.0
New Line.SW_2041T_S02 Phases=3 Bus1=02_CHCO4_BCE4_CH2041T.1.2.3 Bus2=02_CH2041T.1.2.3 Length=0.001 Units=km r1=0.0001 x1=0.0001 r0=0.0002 x0=0.0002 normamps=800.0
New Line.SW_4064_S02 Phases=3 Bus1=02_CH4115_DJ4064.1.2.3 Bus2=02_DJ4064_CH4125.1.2.3 Length=0.001 Units=km r1=0.0001 x1=0.0001 r0=0.0002 x0=0.0002 normamps=800.0
New Line.SW_4065_S02 Phases=3 Bus1=02_DJ4034_CH4065.1.2.3 Bus2=02_CH4035_CH4027_CH4075.1.2.3 Length=0.001 Units=km r1=0.0001 x1=0.0001 r0=0.0002 x0=0.0002 normamps=800.0
New Line.SW_2026_S02 Phases=3 Bus1=02_BA2138KV.1.2.3 Bus2=02_BA3138KV.1.2.3 Length=0.001 Units=km r1=0.0001 x1=0.0001 r0=0.0002 x0=0.0002 normamps=800.0
New Line.SW_FP2753 Phases=3 Bus1=S02_0225_9175_BSB068.1.2.3 Bus2=S02_0225_9175_BSB068_S.1.2.3 Length=0.001 Units=km r1=0.0001 x1=0.0001 r0=0.0002 x0=0.0002 normamps=800.0
New Line.SW_FT0334 Phases=3 Bus1=S02_0225_9211_BSB068.1.2.3 Bus2=S02_0225_9211_BSB068_S.1.2.3 Length=0.001 Units=km r1=0.0001 x1=0.0001 r0=0.0002 x0=0.0002 normamps=800.0
New Line.SW_FT0333 Phases=3 Bus1=S02_0225_9124_BSB055.1.2.3 Bus2=S02_0225_9124_BSB055_S.1.2.3 Length=0.001 Units=km r1=0.0001 x1=0.0001 r0=0.0002 x0=0.0002 normamps=800.0
New Line.SW_FW3010 Phases=3 Bus1=S02_0225_9012_BSB068.1.2.3 Bus2=S02_0225_9012_BSB068_S.1.2.3 Length=0.001 Units=km r1=0.0001 x1=0.0001 r0=0.0002 x0=0.0002 normamps=800.0
New Line.SW_FA0025 Phases=3 Bus1=S02_0225_9060_BSB068.1.2.3 Bus2=S02_0225_9060_BSB068_S.1.2.3 Length=0.001 Units=km r1=0.0001 x1=0.0001 r0=0.0002 x0=0.0002 normamps=800.0
New Line.SW_FW0176 Phases=3 Bus1=S02_0225_9066_BSB068.1.2.3 Bus2=S02_0225_9066_BSB068_S.1.2.3 Length=0.001 Units=km r1=0.0001 x1=0.0001 r0=0.0002 x0=0.0002 normamps=800.0
New Line.SW_FA7692 Phases=3 Bus1=S02_0225_9032_BSB090.1.2.3 Bus2=S02_0225_9032_BSB090_S.1.2.3 Length=0.001 Units=km r1=0.0001 x1=0.0001 r0=0.0002 x0=0.0002 normamps=800.0
New Line.SW_FW3021 Phases=3 Bus1=S02_0225_9050_BSB071.1.2.3 Bus2=S02_0225_9050_BSB071_S.1.2.3 Length=0.001 Units=km r1=0.0001 x1=0.0001 r0=0.0002 x0=0.0002 normamps=800.0
New Line.SW_FU0399 Phases=3 Bus1=S02_0225_9017_BSB088.1.2.3 Bus2=S02_0225_9017_BSB088_S.1.2.3 Length=0.001 Units=km r1=0.0001 x1=0.0001 r0=0.0002 x0=0.0002 normamps=800.0
New Line.SW_FIC1989 Phases=3 Bus1=S02_0225_9023_BSB090.1.2.3 Bus2=S02_0225_9023_BSB090_S.1.2.3 Length=0.001 Units=km r1=0.0001 x1=0.0001 r0=0.0002 x0=0.0002 normamps=800.0
New Line.SW_FIC1990 Phases=3 Bus1=S02_0225_9002_BSB090.1.2.3 Bus2=S02_0225_9002_BSB090_S.1.2.3 Length=0.001 Units=km r1=0.0001 x1=0.0001 r0=0.0002 x0=0.0002 normamps=800.0
New Line.SW_4074_S02 Phases=3 Bus1=02_CH4135_DJ4074.1.2.3 Bus2=02_DJ4074_CH4145.1.2.3 Length=0.001 Units=km r1=0.0001 x1=0.0001 r0=0.0002 x0=0.0002 normamps=800.0
New Line.SW_2010_S02 Phases=3 Bus1=02_BA1138KV.1.2.3 Bus2=02_DJ2010_CH2019.1.2.3 Length=0.001 Units=km r1=0.0001 x1=0.0001 r0=0.0002 x0=0.0002 normamps=800.0
New Line.SW_0203_S02 Phases=3 Bus1=02_BA3138KV.1.2.3 Bus2=02_AL0203.1.2.3 Length=0.001 Units=km r1=0.0001 x1=0.0001 r0=0.0002 x0=0.0002 normamps=800.0
New Line.SW_0202_S02 Phases=3 Bus1=02_BA2138KV.1.2.3 Bus2=02_AL0202.1.2.3 Length=0.001 Units=km r1=0.0001 x1=0.0001 r0=0.0002 x0=0.0002 normamps=800.0
New Line.SW_0207_S02 Phases=3 Bus1=02_BA1138KV.1.2.3 Bus2=02_AL0207.1.2.3 Length=0.001 Units=km r1=0.0001 x1=0.0001 r0=0.0002 x0=0.0002 normamps=800.0
New Line.SW_4027_S02 Phases=3 Bus1=02_CH4035_CH4027_CH4075.1.2.3 Bus2=02_CH4027_ETR2AT.1.2.3 Length=0.001 Units=km r1=0.0001 x1=0.0001 r0=0.0002 x0=0.0002 normamps=800.0
New Line.SW_4037_S02 Phases=3 Bus1=02_CH4105_CH4037_CH4115.1.2.3 Bus2=02_CH4037_ETR3AT.1.2.3 Length=0.001 Units=km r1=0.0001 x1=0.0001 r0=0.0002 x0=0.0002 normamps=800.0
New Line.SW_4043_S02 Phases=3 Bus1=02_CH4125_CH4043_CH4135.1.2.3 Bus2=02_EL05.1.2.3 Length=0.001 Units=km r1=0.0001 x1=0.0001 r0=0.0002 x0=0.0002 normamps=800.0
New Line.SW_4044_S02 Phases=3 Bus1=02_CH4075_DJ4044.1.2.3 Bus2=02_DJ4044_CH4085.1.2.3 Length=0.001 Units=km r1=0.0001 x1=0.0001 r0=0.0002 x0=0.0002 normamps=800.0
New Line.SW_CO4_S02 Phases=3 Bus1=02_CH2049_CHCO4.1.2.3 Bus2=02_CHCO4_BCE4_CH2041T.1.2.3 Length=0.001 Units=km r1=0.0001 x1=0.0001 r0=0.0002 x0=0.0002 normamps=800.0
New Line.SW_CO5_S02 Phases=3 Bus1=02_CH2059_CHCO5.1.2.3 Bus2=02_CHCO5_BCE5_CH2051T.1.2.3 Length=0.001 Units=km r1=0.0001 x1=0.0001 r0=0.0002 x0=0.0002 normamps=800.0
New Line.SW_2028_S02 Phases=3 Bus1=02_ETR2BT_DJ2028.1.2.3 Bus2=02_BA2138KV.1.2.3 Length=0.001 Units=km r1=0.0001 x1=0.0001 r0=0.0002 x0=0.0002 normamps=800.0
New Line.SW_2029_S02 Phases=3 Bus1=02_DJ2030_CH2029_CH2039.1.2.3 Bus2=02_CH2029_CHCO2.1.2.3 Length=0.001 Units=km r1=0.0001 x1=0.0001 r0=0.0002 x0=0.0002 normamps=800.0
New Line.SW_2030_S02 Phases=3 Bus1=02_BA3138KV.1.2.3 Bus2=02_DJ2030_CH2029_CH2039.1.2.3 Length=0.001 Units=km r1=0.0001 x1=0.0001 r0=0.0002 x0=0.0002 normamps=800.0
New Line.SW_4023_S02 Phases=3 Bus1=02_CH4045_CH4023_CH4055.1.2.3 Bus2=02_ELBG2.1.2.3 Length=0.001 Units=km r1=0.0001 x1=0.0001 r0=0.0002 x0=0.0002 normamps=800.0
New Line.SW_4024_S02 Phases=3 Bus1=02_CH4035_DJ4024.1.2.3 Bus2=02_DJ4024_CH4045.1.2.3 Length=0.001 Units=km r1=0.0001 x1=0.0001 r0=0.0002 x0=0.0002 normamps=800.0
New Line.SW_4025_S02 Phases=3 Bus1=02_DJ4014_CH4025.1.2.3 Bus2=02_CH4025_CH4017_CH4035.1.2.3 Length=0.001 Units=km r1=0.0001 x1=0.0001 r0=0.0002 x0=0.0002 normamps=800.0
New Line.SW_2031T_S02 Phases=3 Bus1=02_CHCO3_BCE3_CH2031T.1.2.3 Bus2=02_CH2031T.1.2.3 Length=0.001 Units=km r1=0.0001 x1=0.0001 r0=0.0002 x0=0.0002 normamps=800.0
New Line.SW_CO3_S02 Phases=3 Bus1=02_CH2039_CHCO3.1.2.3 Bus2=02_CHCO3_BCE3_CH2031T.1.2.3 Length=0.001 Units=km r1=0.0001 x1=0.0001 r0=0.0002 x0=0.0002 normamps=800.0
New Line.SW_0210_S02 Phases=3 Bus1=02_BA1138KV.1.2.3 Bus2=02_AL0210.1.2.3 Length=0.001 Units=km r1=0.0001 x1=0.0001 r0=0.0002 x0=0.0002 normamps=800.0
New Line.SW_0211_S02 Phases=3 Bus1=02_BA2138KV.1.2.3 Bus2=02_AL0211.1.2.3 Length=0.001 Units=km r1=0.0001 x1=0.0001 r0=0.0002 x0=0.0002 normamps=800.0
New Line.SW_0212_S02 Phases=3 Bus1=02_BA3138KV.1.2.3 Bus2=02_AL0212.1.2.3 Length=0.001 Units=km r1=0.0001 x1=0.0001 r0=0.0002 x0=0.0002 normamps=800.0
New Line.SW_0213_S02 Phases=3 Bus1=02_BA1138KV.1.2.3 Bus2=02_AL0213.1.2.3 Length=0.001 Units=km r1=0.0001 x1=0.0001 r0=0.0002 x0=0.0002 normamps=800.0
New Line.SW_0208_S02 Phases=3 Bus1=02_BA2138KV.1.2.3 Bus2=02_AL0208.1.2.3 Length=0.001 Units=km r1=0.0001 x1=0.0001 r0=0.0002 x0=0.0002 normamps=800.0
New Line.SW_2011T_S02 Phases=3 Bus1=02_CHCO1_BCE1_CH2011T.1.2.3 Bus2=02_CH2011T.1.2.3 Length=0.001 Units=km r1=0.0001 x1=0.0001 r0=0.0002 x0=0.0002 normamps=800.0
New Line.SW_2020_S02 Phases=3 Bus1=02_BA2138KV.1.2.3 Bus2=02_DJ2020_CH2049_CH2059.1.2.3 Length=0.001 Units=km r1=0.0001 x1=0.0001 r0=0.0002 x0=0.0002 normamps=800.0
New Line.SW_2021T_S02 Phases=3 Bus1=02_CHCO2_BCE2_CH2021T.1.2.3 Bus2=02_CH2021T.1.2.3 Length=0.001 Units=km r1=0.0001 x1=0.0001 r0=0.0002 x0=0.0002 normamps=800.0
New Line.SW_0204_S02 Phases=3 Bus1=02_BA1138KV.1.2.3 Bus2=02_AL0204.1.2.3 Length=0.001 Units=km r1=0.0001 x1=0.0001 r0=0.0002 x0=0.0002 normamps=800.0
New Line.SW_2019_S02 Phases=3 Bus1=02_DJ2010_CH2019.1.2.3 Bus2=02_CH2019_CHCO1.1.2.3 Length=0.001 Units=km r1=0.0001 x1=0.0001 r0=0.0002 x0=0.0002 normamps=800.0
New Line.SW_2038_S02 Phases=3 Bus1=02_ETR3BT_DJ2038.1.2.3 Bus2=02_BA3138KV.1.2.3 Length=0.001 Units=km r1=0.0001 x1=0.0001 r0=0.0002 x0=0.0002 normamps=800.0
New Line.SW_4017_S02 Phases=3 Bus1=02_CH4025_CH4017_CH4035.1.2.3 Bus2=02_CH4017_ETR1AT.1.2.3 Length=0.001 Units=km r1=0.0001 x1=0.0001 r0=0.0002 x0=0.0002 normamps=800.0
New Line.SW_4015_S02 Phases=3 Bus1=02_CH4015_CH4033_CH4145.1.2.3 Bus2=02_CH4015_DJ4014.1.2.3 Length=0.001 Units=km r1=0.0001 x1=0.0001 r0=0.0002 x0=0.0002 normamps=800.0
New Line.SW_4033_S02 Phases=3 Bus1=02_CH4015_CH4033_CH4145.1.2.3 Bus2=02_ELBG3.1.2.3 Length=0.001 Units=km r1=0.0001 x1=0.0001 r0=0.0002 x0=0.0002 normamps=800.0
New Line.SW_4034_S02 Phases=3 Bus1=02_CH4055_DJ4034.1.2.3 Bus2=02_DJ4034_CH4065.1.2.3 Length=0.001 Units=km r1=0.0001 x1=0.0001 r0=0.0002 x0=0.0002 normamps=800.0
New Line.SW_4035_S02 Phases=3 Bus1=02_CH4025_CH4017_CH4035.1.2.3 Bus2=02_CH4035_DJ4024.1.2.3 Length=0.001 Units=km r1=0.0001 x1=0.0001 r0=0.0002 x0=0.0002 normamps=800.0
New Line.SW_2039_S02 Phases=3 Bus1=02_DJ2030_CH2029_CH2039.1.2.3 Bus2=02_CH2039_CHCO3.1.2.3 Length=0.001 Units=km r1=0.0001 x1=0.0001 r0=0.0002 x0=0.0002 normamps=800.0
New Line.SW_4013_S02 Phases=3 Bus1=02_CH4085_CH4013_CH4095.1.2.3 Bus2=02_ELBG1.1.2.3 Length=0.001 Units=km r1=0.0001 x1=0.0001 r0=0.0002 x0=0.0002 normamps=800.0
New Line.SW_4045_S02 Phases=3 Bus1=02_DJ4024_CH4045.1.2.3 Bus2=02_CH4045_CH4023_CH4055.1.2.3 Length=0.001 Units=km r1=0.0001 x1=0.0001 r0=0.0002 x0=0.0002 normamps=800.0
New Line.SW_4054_S02 Phases=3 Bus1=02_CH4095_DJ4054.1.2.3 Bus2=02_DJ4054_CH4105.1.2.3 Length=0.001 Units=km r1=0.0001 x1=0.0001 r0=0.0002 x0=0.0002 normamps=800.0
New Line.SW_4055_S02 Phases=3 Bus1=02_CH4045_CH4023_CH4055.1.2.3 Bus2=02_CH4055_DJ4034.1.2.3 Length=0.001 Units=km r1=0.0001 x1=0.0001 r0=0.0002 x0=0.0002 normamps=800.0
New Line.SW_4115_S02 Phases=3 Bus1=02_CH4105_CH4037_CH4115.1.2.3 Bus2=02_CH4115_DJ4064.1.2.3 Length=0.001 Units=km r1=0.0001 x1=0.0001 r0=0.0002 x0=0.0002 normamps=800.0
New Line.SW_4125_S02 Phases=3 Bus1=02_DJ4064_CH4125.1.2.3 Bus2=02_CH4125_CH4043_CH4135.1.2.3 Length=0.001 Units=km r1=0.0001 x1=0.0001 r0=0.0002 x0=0.0002 normamps=800.0
New Line.SW_4135_S02 Phases=3 Bus1=02_CH4125_CH4043_CH4135.1.2.3 Bus2=02_CH4135_DJ4074.1.2.3 Length=0.001 Units=km r1=0.0001 x1=0.0001 r0=0.0002 x0=0.0002 normamps=800.0
New Line.SW_2051T_S02 Phases=3 Bus1=02_CHCO5_BCE5_CH2051T.1.2.3 Bus2=02_CH2051T.1.2.3 Length=0.001 Units=km r1=0.0001 x1=0.0001 r0=0.0002 x0=0.0002 normamps=800.0
New Line.SW_4075_S02 Phases=3 Bus1=02_CH4035_CH4027_CH4075.1.2.3 Bus2=02_CH4075_DJ4044.1.2.3 Length=0.001 Units=km r1=0.0001 x1=0.0001 r0=0.0002 x0=0.0002 normamps=800.0
New Line.SW_4085_S02 Phases=3 Bus1=02_DJ4044_CH4085.1.2.3 Bus2=02_CH4085_CH4013_CH4095.1.2.3 Length=0.001 Units=km r1=0.0001 x1=0.0001 r0=0.0002 x0=0.0002 normamps=800.0
New Line.SW_4095_S02 Phases=3 Bus1=02_CH4085_CH4013_CH4095.1.2.3 Bus2=02_CH4095_DJ4054.1.2.3 Length=0.001 Units=km r1=0.0001 x1=0.0001 r0=0.0002 x0=0.0002 normamps=800.0
New Line.SW_CO2_S02 Phases=3 Bus1=02_CH2029_CHCO2.1.2.3 Bus2=02_CHCO2_BCE2_CH2021T.1.2.3 Length=0.001 Units=km r1=0.0001 x1=0.0001 r0=0.0002 x0=0.0002 normamps=800.0
New Line.SW_4014_S02 Phases=3 Bus1=02_CH4015_DJ4014.1.2.3 Bus2=02_DJ4014_CH4025.1.2.3 Length=0.001 Units=km r1=0.0001 x1=0.0001 r0=0.0002 x0=0.0002 normamps=800.0
New Line.SW_2016_S02 Phases=3 Bus1=02_BA1138KV.1.2.3 Bus2=02_BA2138KV.1.2.3 Length=0.001 Units=km r1=0.0001 x1=0.0001 r0=0.0002 x0=0.0002 normamps=800.0
New Line.SW_4145_S02 Phases=3 Bus1=02_DJ4074_CH4145.1.2.3 Bus2=02_CH4015_CH4033_CH4145.1.2.3 Length=0.001 Units=km r1=0.0001 x1=0.0001 r0=0.0002 x0=0.0002 normamps=800.0
New Line.SW_2018_S02 Phases=3 Bus1=02_ETR1BT_DJ2018.1.2.3 Bus2=02_BA1138KV.1.2.3 Length=0.001 Units=km r1=0.0001 x1=0.0001 r0=0.0002 x0=0.0002 normamps=800.0
New Line.SW_2049_S02 Phases=3 Bus1=02_DJ2020_CH2049_CH2059.1.2.3 Bus2=02_CH2049_CHCO4.1.2.3 Length=0.001 Units=km r1=0.0001 x1=0.0001 r0=0.0002 x0=0.0002 normamps=800.0
New Line.SW_CO1_S02 Phases=3 Bus1=02_CH2019_CHCO1.1.2.3 Bus2=02_CHCO1_BCE1_CH2011T.1.2.3 Length=0.001 Units=km r1=0.0001 x1=0.0001 r0=0.0002 x0=0.0002 normamps=800.0
New Line.SW_2017_S02 Phases=3 Bus1=02_BA1138KV.1.2.3 Bus2=02_CH2017_FUTSA1.1.2.3 Length=0.001 Units=km r1=0.0001 x1=0.0001 r0=0.0002 x0=0.0002 normamps=800.0
New Line.SW_2059_S02 Phases=3 Bus1=02_DJ2020_CH2049_CH2059.1.2.3 Bus2=02_CH2059_CHCO5.1.2.3 Length=0.001 Units=km r1=0.0001 x1=0.0001 r0=0.0002 x0=0.0002 normamps=800.0
New Line.SW_FT0346 Phases=3 Bus1=S02_0225_9052_BSB088.1.2.3 Bus2=S02_0225_9052_BSB088_S.1.2.3 Length=0.001 Units=km r1=0.0001 x1=0.0001 r0=0.0002 x0=0.0002 normamps=800.0
New Line.SW_FA8142 Phases=3 Bus1=S02_0225_9200_BSB068.1.2.3 Bus2=S02_0225_9200_BSB068_S.1.2.3 Length=0.001 Units=km r1=0.0001 x1=0.0001 r0=0.0002 x0=0.0002 normamps=800.0
New Line.SW_FW9585 Phases=3 Bus1=S02_0225_9221_BSB068.1.2.3 Bus2=S02_0225_9221_BSB068_S.1.2.3 Length=0.001 Units=km r1=0.0001 x1=0.0001 r0=0.0002 x0=0.0002 normamps=800.0
New Line.SW_FW2906 Phases=3 Bus1=S02_0225_9057_BSB068.1.2.3 Bus2=S02_0225_9057_BSB068_S.1.2.3 Length=0.001 Units=km r1=0.0001 x1=0.0001 r0=0.0002 x0=0.0002 normamps=800.0
New Line.SW_FF3138F Phases=3 Bus1=S02_0225_9134_BSB071.1.2.3 Bus2=S02_0225_9134_BSB071_S.1.2.3 Length=0.001 Units=km r1=0.0001 x1=0.0001 r0=0.0002 x0=0.0002 normamps=800.0
New Line.SW_FP6426 Phases=3 Bus1=S02_0225_9050_BSB068.1.2.3 Bus2=S02_0225_9050_BSB068_S.1.2.3 Length=0.001 Units=km r1=0.0001 x1=0.0001 r0=0.0002 x0=0.0002 normamps=800.0
New Line.SW_FP4027 Phases=3 Bus1=S02_0225_9005_BSB090.1.2.3 Bus2=S02_0225_9005_BSB090_S.1.2.3 Length=0.001 Units=km r1=0.0001 x1=0.0001 r0=0.0002 x0=0.0002 normamps=800.0
New Line.SW_FU3022 Phases=3 Bus1=S02_0225_9039_BSB088.1.2.3 Bus2=S02_0225_9039_BSB088_S.1.2.3 Length=0.001 Units=km r1=0.0001 x1=0.0001 r0=0.0002 x0=0.0002 normamps=800.0
! Chave Aberta de Manobra: SW_FA0028 Bus1=S02_0225_9039_BSB090 Bus2=S02_0225_9039_BSB090_S (NA)
New Line.SW_FP2786 Phases=3 Bus1=S02_0225_9012_BSB088.1.2.3 Bus2=S02_0225_9012_BSB088_S.1.2.3 Length=0.001 Units=km r1=0.0001 x1=0.0001 r0=0.0002 x0=0.0002 normamps=800.0
New Line.SW_FP2755 Phases=3 Bus1=S02_0225_9024_BSB068.1.2.3 Bus2=S02_0225_9024_BSB068_S.1.2.3 Length=0.001 Units=km r1=0.0001 x1=0.0001 r0=0.0002 x0=0.0002 normamps=800.0
New Line.SW_FP2787 Phases=3 Bus1=S02_0225_9001_BSB090.1.2.3 Bus2=S02_0225_9001_BSB090_S.1.2.3 Length=0.001 Units=km r1=0.0001 x1=0.0001 r0=0.0002 x0=0.0002 normamps=800.0
New Line.SW_FT0335 Phases=3 Bus1=S02_0225_9170_BSB068.1.2.3 Bus2=S02_0225_9170_BSB068_S.1.2.3 Length=0.001 Units=km r1=0.0001 x1=0.0001 r0=0.0002 x0=0.0002 normamps=800.0
New Line.SW_FP5612 Phases=3 Bus1=S02_0225_9045_BSB088.1.2.3 Bus2=S02_0225_9045_BSB088_S.1.2.3 Length=0.001 Units=km r1=0.0001 x1=0.0001 r0=0.0002 x0=0.0002 normamps=800.0
New Line.SW_FW6600 Phases=3 Bus1=S02_0225_9022_BSB068.1.2.3 Bus2=S02_0225_9022_BSB068_S.1.2.3 Length=0.001 Units=km r1=0.0001 x1=0.0001 r0=0.0002 x0=0.0002 normamps=800.0
New Line.SW_FK0631 Phases=3 Bus1=S02_0225_9047_BSB088.1.2.3 Bus2=S02_0225_9047_BSB088_S.1.2.3 Length=0.001 Units=km r1=0.0001 x1=0.0001 r0=0.0002 x0=0.0002 normamps=800.0
New Line.SW_FIC4922 Phases=3 Bus1=S02_0225_9020_BSB088.1.2.3 Bus2=S02_0225_9020_BSB088_S.1.2.3 Length=0.001 Units=km r1=0.0001 x1=0.0001 r0=0.0002 x0=0.0002 normamps=800.0
New Line.SW_FW3009 Phases=3 Bus1=S02_0225_9171_BSB068.1.2.3 Bus2=S02_0225_9171_BSB068_S.1.2.3 Length=0.001 Units=km r1=0.0001 x1=0.0001 r0=0.0002 x0=0.0002 normamps=800.0
New Line.SW_FP4152 Phases=3 Bus1=S02_0225_9018_BSB088.1.2.3 Bus2=S02_0225_9018_BSB088_S.1.2.3 Length=0.001 Units=km r1=0.0001 x1=0.0001 r0=0.0002 x0=0.0002 normamps=800.0
New Line.SW_FW0166F Phases=3 Bus1=S02_0225_9154_BSB071.1.2.3 Bus2=S02_0225_9154_BSB071_S.1.2.3 Length=0.001 Units=km r1=0.0001 x1=0.0001 r0=0.0002 x0=0.0002 normamps=800.0
New Line.SW_FU0115 Phases=3 Bus1=S02_0225_9168_BSB068.1.2.3 Bus2=S02_0225_9168_BSB068_S.1.2.3 Length=0.001 Units=km r1=0.0001 x1=0.0001 r0=0.0002 x0=0.0002 normamps=800.0
New Line.SW_FIC5093 Phases=3 Bus1=S02_0225_9048_BSB088.1.2.3 Bus2=S02_0225_9048_BSB088_S.1.2.3 Length=0.001 Units=km r1=0.0001 x1=0.0001 r0=0.0002 x0=0.0002 normamps=800.0
New Line.SW_FZ2215 Phases=3 Bus1=S02_0225_9232_BSB068.1.2.3 Bus2=S02_0225_9232_BSB068_S.1.2.3 Length=0.001 Units=km r1=0.0001 x1=0.0001 r0=0.0002 x0=0.0002 normamps=800.0
New Line.SW_FT6630 Phases=3 Bus1=S02_0225_9035_BSB090.1.2.3 Bus2=S02_0225_9035_BSB090_S.1.2.3 Length=0.001 Units=km r1=0.0001 x1=0.0001 r0=0.0002 x0=0.0002 normamps=800.0
New Line.SW_FW0166 Phases=3 Bus1=S02_0225_9154_BSB071.1.2.3 Bus2=S02_0225_9154_BSB071_S.1.2.3 Length=0.001 Units=km r1=0.0001 x1=0.0001 r0=0.0002 x0=0.0002 normamps=800.0
New Line.SW_FF3138 Phases=3 Bus1=S02_0225_9156_BSB071.1.2.3 Bus2=S02_0225_9156_BSB071_S.1.2.3 Length=0.001 Units=km r1=0.0001 x1=0.0001 r0=0.0002 x0=0.0002 normamps=800.0
New Line.SW_FT0349 Phases=3 Bus1=S02_0225_9008_BSB090.1.2.3 Bus2=S02_0225_9008_BSB090_S.1.2.3 Length=0.001 Units=km r1=0.0001 x1=0.0001 r0=0.0002 x0=0.0002 normamps=800.0
New Line.SW_FP2752 Phases=3 Bus1=S02_0225_9172_BSB068.1.2.3 Bus2=S02_0225_9172_BSB068_S.1.2.3 Length=0.001 Units=km r1=0.0001 x1=0.0001 r0=0.0002 x0=0.0002 normamps=800.0
New Line.SW_FU0020 Phases=3 Bus1=S02_0225_9046_BSB068.1.2.3 Bus2=S02_0225_9046_BSB068_S.1.2.3 Length=0.001 Units=km r1=0.0001 x1=0.0001 r0=0.0002 x0=0.0002 normamps=800.0
New Line.SW_FT6595 Phases=3 Bus1=S02_0225_9006_BSB068.1.2.3 Bus2=S02_0225_9006_BSB068_S.1.2.3 Length=0.001 Units=km r1=0.0001 x1=0.0001 r0=0.0002 x0=0.0002 normamps=800.0
New Line.SW_FT6573 Phases=3 Bus1=S02_0225_9229_BSB068.1.2.3 Bus2=S02_0225_9229_BSB068_S.1.2.3 Length=0.001 Units=km r1=0.0001 x1=0.0001 r0=0.0002 x0=0.0002 normamps=800.0
New Line.SW_FIC5520 Phases=3 Bus1=S02_0225_9023_BSB068.1.2.3 Bus2=S02_0225_9023_BSB068_S.1.2.3 Length=0.001 Units=km r1=0.0001 x1=0.0001 r0=0.0002 x0=0.0002 normamps=800.0
New Line.SW_FT0348 Phases=3 Bus1=S02_0225_9014_BSB088.1.2.3 Bus2=S02_0225_9014_BSB088_S.1.2.3 Length=0.001 Units=km r1=0.0001 x1=0.0001 r0=0.0002 x0=0.0002 normamps=800.0
New Line.SW_FP6003 Phases=3 Bus1=S02_0225_9106_BSB068.1.2.3 Bus2=S02_0225_9106_BSB068_S.1.2.3 Length=0.001 Units=km r1=0.0001 x1=0.0001 r0=0.0002 x0=0.0002 normamps=800.0
New Line.SW_FU0853 Phases=3 Bus1=S02_0225_9038_BSB088.1.2.3 Bus2=S02_0225_9038_BSB088_S.1.2.3 Length=0.001 Units=km r1=0.0001 x1=0.0001 r0=0.0002 x0=0.0002 normamps=800.0
New Line.SW_FP2784 Phases=3 Bus1=S02_0225_9197_BSBRJ001B_ATV.1.2.3 Bus2=S02_0225_9197_BSBRJ001B_ATV_S.1.2.3 Length=0.001 Units=km r1=0.0001 x1=0.0001 r0=0.0002 x0=0.0002 normamps=800.0
New Line.SW_FP2754 Phases=3 Bus1=S02_0225_9101_BSB068.1.2.3 Bus2=S02_0225_9101_BSB068_S.1.2.3 Length=0.001 Units=km r1=0.0001 x1=0.0001 r0=0.0002 x0=0.0002 normamps=800.0
New Line.SW_FU0630 Phases=3 Bus1=S02_0225_9107_BSB068.1.2.3 Bus2=S02_0225_9107_BSB068_S.1.2.3 Length=0.001 Units=km r1=0.0001 x1=0.0001 r0=0.0002 x0=0.0002 normamps=800.0
New Line.SW_FA0210 Phases=3 Bus1=S02_0225_9213_BSB071.1.2.3 Bus2=S02_0225_9213_BSB071_S.1.2.3 Length=0.001 Units=km r1=0.0001 x1=0.0001 r0=0.0002 x0=0.0002 normamps=800.0
New Line.SW_FIC5869 Phases=3 Bus1=S02_0225_9058_BSB068.1.2.3 Bus2=S02_0225_9058_BSB068_S.1.2.3 Length=0.001 Units=km r1=0.0001 x1=0.0001 r0=0.0002 x0=0.0002 normamps=800.0
New Line.SW_FP4341 Phases=3 Bus1=S02_0225_9104_BSB068.1.2.3 Bus2=S02_0225_9104_BSB068_S.1.2.3 Length=0.001 Units=km r1=0.0001 x1=0.0001 r0=0.0002 x0=0.0002 normamps=800.0
New Line.SW_FA0209 Phases=3 Bus1=S02_0225_9023_BSB088.1.2.3 Bus2=S02_0225_9023_BSB088_S.1.2.3 Length=0.001 Units=km r1=0.0001 x1=0.0001 r0=0.0002 x0=0.0002 normamps=800.0
New Line.SW_FA7199 Phases=3 Bus1=S02_0225_9214_BSB071.1.2.3 Bus2=S02_0225_9214_BSB071_S.1.2.3 Length=0.001 Units=km r1=0.0001 x1=0.0001 r0=0.0002 x0=0.0002 normamps=800.0
New Line.SW_FC0278 Phases=3 Bus1=S02_0225_9043_BSB088.1.2.3 Bus2=S02_0225_9043_BSB088_S.1.2.3 Length=0.001 Units=km r1=0.0001 x1=0.0001 r0=0.0002 x0=0.0002 normamps=800.0
New Line.SW_FK2078 Phases=3 Bus1=S02_0225_26584_PG_F0002495.1.2.3 Bus2=S02_0225_26584_PG_F0002495_S.1.2.3 Length=0.001 Units=km r1=0.0001 x1=0.0001 r0=0.0002 x0=0.0002 normamps=800.0
New Line.SW_CDM32_CHVPRI Phases=3 Bus1=S02_0213_11240292.1.2.3 Bus2=S02_0213_11240292_S.1.2.3 Length=0.001 Units=km r1=0.0001 x1=0.0001 r0=0.0002 x0=0.0002 normamps=800.0
New Line.SW_CDM33_CHVPRI Phases=3 Bus1=S02_0213_11240292.1.2.3 Bus2=S02_0213_11240292_S.1.2.3 Length=0.001 Units=km r1=0.0001 x1=0.0001 r0=0.0002 x0=0.0002 normamps=800.0
New Line.SW_CDM17_CHVPRI Phases=3 Bus1=S02_0205_11226228.1.2.3 Bus2=S02_0205_11226228_S.1.2.3 Length=0.001 Units=km r1=0.0001 x1=0.0001 r0=0.0002 x0=0.0002 normamps=800.0
New Line.SW_CDM22_CHVPRI Phases=3 Bus1=S02_0211_11260092.1.2.3 Bus2=S02_0211_11260092_S.1.2.3 Length=0.001 Units=km r1=0.0001 x1=0.0001 r0=0.0002 x0=0.0002 normamps=800.0
New Line.SW_CDM38_CHVPRI Phases=3 Bus1=S02_0222_11260294.1.2.3 Bus2=S02_0222_11260294_S.1.2.3 Length=0.001 Units=km r1=0.0001 x1=0.0001 r0=0.0002 x0=0.0002 normamps=800.0
New Line.SW_CDM48_CHVPRI Phases=3 Bus1=S02_0203_11260187.1.2.3 Bus2=S02_0203_11260187_S.1.2.3 Length=0.001 Units=km r1=0.0001 x1=0.0001 r0=0.0002 x0=0.0002 normamps=800.0
New Line.SW_CDM49_CHVPRI Phases=3 Bus1=S02_0222_11260187.1.2.3 Bus2=S02_0222_11260187_S.1.2.3 Length=0.001 Units=km r1=0.0001 x1=0.0001 r0=0.0002 x0=0.0002 normamps=800.0
New Line.SW_C11011_CHVPRI Phases=3 Bus1=S02_0202_PT_CH1_1607.1.2.3 Bus2=S02_0202_PT_CH1_1607_S.1.2.3 Length=0.001 Units=km r1=0.0001 x1=0.0001 r0=0.0002 x0=0.0002 normamps=800.0
New Line.SW_C13203_CHVPRI Phases=3 Bus1=S02_0207_PT_CH1_1608.1.2.3 Bus2=S02_0207_PT_CH1_1608_S.1.2.3 Length=0.001 Units=km r1=0.0001 x1=0.0001 r0=0.0002 x0=0.0002 normamps=800.0
New Line.SW_C13200_CHVPRI Phases=3 Bus1=S02_0203_PT_CH1_1609.1.2.3 Bus2=S02_0203_PT_CH1_1609_S.1.2.3 Length=0.001 Units=km r1=0.0001 x1=0.0001 r0=0.0002 x0=0.0002 normamps=800.0
New Line.SW_C11017_CHVPRI Phases=3 Bus1=S02_0202_PT_CH1_1610.1.2.3 Bus2=S02_0202_PT_CH1_1610_S.1.2.3 Length=0.001 Units=km r1=0.0001 x1=0.0001 r0=0.0002 x0=0.0002 normamps=800.0
New Line.SW_FU3022_CHVPRI Phases=3 Bus1=S02_0225_PT_CH1_16.1.2.3 Bus2=S02_0225_PT_CH1_16_S.1.2.3 Length=0.001 Units=km r1=0.0001 x1=0.0001 r0=0.0002 x0=0.0002 normamps=800.0
New Line.SW_FIC17_CHVPRI Phases=3 Bus1=S02_0211_PT_CH1_17.1.2.3 Bus2=S02_0211_PT_CH1_17_S.1.2.3 Length=0.001 Units=km r1=0.0001 x1=0.0001 r0=0.0002 x0=0.0002 normamps=800.0
New Line.SW_FIC18_CHVPRI Phases=3 Bus1=S02_0225_PT_CH1_18.1.2.3 Bus2=S02_0225_PT_CH1_18_S.1.2.3 Length=0.001 Units=km r1=0.0001 x1=0.0001 r0=0.0002 x0=0.0002 normamps=800.0
New Line.SW_C10671_CHVPRI Phases=3 Bus1=S02_0225_PT_CH1_246.1.2.3 Bus2=S02_0225_PT_CH1_246_S.1.2.3 Length=0.001 Units=km r1=0.0001 x1=0.0001 r0=0.0002 x0=0.0002 normamps=800.0
New Line.SW_C10332_CHVPRI Phases=3 Bus1=S02_0225_PT_CH1_332.1.2.3 Bus2=S02_0225_PT_CH1_332_S.1.2.3 Length=0.001 Units=km r1=0.0001 x1=0.0001 r0=0.0002 x0=0.0002 normamps=800.0
New Line.SW_FIC336_CHVPRI Phases=3 Bus1=S02_0225_PT_CH1_335.1.2.3 Bus2=S02_0225_PT_CH1_335_S.1.2.3 Length=0.001 Units=km r1=0.0001 x1=0.0001 r0=0.0002 x0=0.0002 normamps=800.0
New Line.SW_C13887_CHVPRI Phases=3 Bus1=S02_0202_PT_CH1_929.1.2.3 Bus2=S02_0202_PT_CH1_929_S.1.2.3 Length=0.001 Units=km r1=0.0001 x1=0.0001 r0=0.0002 x0=0.0002 normamps=800.0
New Line.SW_C10190_CHVPRI Phases=3 Bus1=S02_0202_PT_CH1_930.1.2.3 Bus2=S02_0202_PT_CH1_930_S.1.2.3 Length=0.001 Units=km r1=0.0001 x1=0.0001 r0=0.0002 x0=0.0002 normamps=800.0
New Line.SW_C10869_CHVPRI Phases=3 Bus1=S02_0203_PT_CH1_931.1.2.3 Bus2=S02_0203_PT_CH1_931_S.1.2.3 Length=0.001 Units=km r1=0.0001 x1=0.0001 r0=0.0002 x0=0.0002 normamps=800.0
New Line.SW_C10868_CHVPRI Phases=3 Bus1=S02_0207_PT_CH1_932.1.2.3 Bus2=S02_0207_PT_CH1_932_S.1.2.3 Length=0.001 Units=km r1=0.0001 x1=0.0001 r0=0.0002 x0=0.0002 normamps=800.0
New Line.SW_C13625_CHVPRI Phases=3 Bus1=S02_0225_PT_CH1_19.1.2.3 Bus2=S02_0225_PT_CH1_19_S.1.2.3 Length=0.001 Units=km r1=0.0001 x1=0.0001 r0=0.0002 x0=0.0002 normamps=800.0
New Line.SW_C13624_CHVPRI Phases=3 Bus1=S02_0225_PT_CH1_20.1.2.3 Bus2=S02_0225_PT_CH1_20_S.1.2.3 Length=0.001 Units=km r1=0.0001 x1=0.0001 r0=0.0002 x0=0.0002 normamps=800.0
New Line.SW_C10755_CHVPRI Phases=3 Bus1=S02_0211_PT_CH1_895.1.2.3 Bus2=S02_0211_PT_CH1_895_S.1.2.3 Length=0.001 Units=km r1=0.0001 x1=0.0001 r0=0.0002 x0=0.0002 normamps=800.0
New Line.SW_C10765_CHVPRI Phases=3 Bus1=S02_0211_PT_CH1_896.1.2.3 Bus2=S02_0211_PT_CH1_896_S.1.2.3 Length=0.001 Units=km r1=0.0001 x1=0.0001 r0=0.0002 x0=0.0002 normamps=800.0
New Line.SW_C10768_CHVPRI Phases=3 Bus1=S02_0201_PT_CH1_897.1.2.3 Bus2=S02_0201_PT_CH1_897_S.1.2.3 Length=0.001 Units=km r1=0.0001 x1=0.0001 r0=0.0002 x0=0.0002 normamps=800.0
New Line.SW_C10836_CHVPRI Phases=3 Bus1=S02_0201_PT_CH1_898.1.2.3 Bus2=S02_0201_PT_CH1_898_S.1.2.3 Length=0.001 Units=km r1=0.0001 x1=0.0001 r0=0.0002 x0=0.0002 normamps=800.0
New Line.SW_C10445_CHVPRI Phases=3 Bus1=S02_0211_PT_CH1_899.1.2.3 Bus2=S02_0211_PT_CH1_899_S.1.2.3 Length=0.001 Units=km r1=0.0001 x1=0.0001 r0=0.0002 x0=0.0002 normamps=800.0
New Line.SW_C10432_CHVPRI Phases=3 Bus1=S02_0222_PT_CH1_900.1.2.3 Bus2=S02_0222_PT_CH1_900_S.1.2.3 Length=0.001 Units=km r1=0.0001 x1=0.0001 r0=0.0002 x0=0.0002 normamps=800.0
New Line.SW_C10340_CHVPRI Phases=3 Bus1=S02_0211_PT_CH1_901.1.2.3 Bus2=S02_0211_PT_CH1_901_S.1.2.3 Length=0.001 Units=km r1=0.0001 x1=0.0001 r0=0.0002 x0=0.0002 normamps=800.0
New Line.SW_C13044_CHVPRI Phases=3 Bus1=S02_0202_PT_CH1_902.1.2.3 Bus2=S02_0202_PT_CH1_902_S.1.2.3 Length=0.001 Units=km r1=0.0001 x1=0.0001 r0=0.0002 x0=0.0002 normamps=800.0
New Line.SW_C13045_CHVPRI Phases=3 Bus1=S02_0203_PT_CH1_903.1.2.3 Bus2=S02_0203_PT_CH1_903_S.1.2.3 Length=0.001 Units=km r1=0.0001 x1=0.0001 r0=0.0002 x0=0.0002 normamps=800.0
New Line.SW_C10009_CHVPRI Phases=3 Bus1=S02_0213_PT_CH1_319.1.2.3 Bus2=S02_0213_PT_CH1_319_S.1.2.3 Length=0.001 Units=km r1=0.0001 x1=0.0001 r0=0.0002 x0=0.0002 normamps=800.0
New Line.SW_C13046_CHVPRI Phases=3 Bus1=S02_0207_PT_CH1_904.1.2.3 Bus2=S02_0207_PT_CH1_904_S.1.2.3 Length=0.001 Units=km r1=0.0001 x1=0.0001 r0=0.0002 x0=0.0002 normamps=800.0
New Line.SW_C13047_CHVPRI Phases=3 Bus1=S02_0207_PT_CH1_905.1.2.3 Bus2=S02_0207_PT_CH1_905_S.1.2.3 Length=0.001 Units=km r1=0.0001 x1=0.0001 r0=0.0002 x0=0.0002 normamps=800.0
New Line.SW_C13048_CHVPRI Phases=3 Bus1=S02_0203_PT_CH1_906.1.2.3 Bus2=S02_0203_PT_CH1_906_S.1.2.3 Length=0.001 Units=km r1=0.0001 x1=0.0001 r0=0.0002 x0=0.0002 normamps=800.0
New Line.SW_C13049_CHVPRI Phases=3 Bus1=S02_0202_PT_CH1_907.1.2.3 Bus2=S02_0202_PT_CH1_907_S.1.2.3 Length=0.001 Units=km r1=0.0001 x1=0.0001 r0=0.0002 x0=0.0002 normamps=800.0
New Line.SW_C10010_CHVPRI Phases=3 Bus1=S02_0213_PT_CH1_311.1.2.3 Bus2=S02_0213_PT_CH1_311_S.1.2.3 Length=0.001 Units=km r1=0.0001 x1=0.0001 r0=0.0002 x0=0.0002 normamps=800.0
New Line.SW_C10011_CHVPRI Phases=3 Bus1=S02_0214_PT_CH1_312.1.2.3 Bus2=S02_0214_PT_CH1_312_S.1.2.3 Length=0.001 Units=km r1=0.0001 x1=0.0001 r0=0.0002 x0=0.0002 normamps=800.0
New Line.SW_C10169_CHVPRI Phases=3 Bus1=S02_0213_PT_CH1_313.1.2.3 Bus2=S02_0213_PT_CH1_313_S.1.2.3 Length=0.001 Units=km r1=0.0001 x1=0.0001 r0=0.0002 x0=0.0002 normamps=800.0
New Line.SW_C10060_CHVPRI Phases=3 Bus1=S02_0214_PT_CH1_314.1.2.3 Bus2=S02_0214_PT_CH1_314_S.1.2.3 Length=0.001 Units=km r1=0.0001 x1=0.0001 r0=0.0002 x0=0.0002 normamps=800.0
New Line.SW_C10008_CHVPRI Phases=3 Bus1=S02_0214_PT_CH1_318.1.2.3 Bus2=S02_0214_PT_CH1_318_S.1.2.3 Length=0.001 Units=km r1=0.0001 x1=0.0001 r0=0.0002 x0=0.0002 normamps=800.0
New Line.SW_FIC880_CHVPRI Phases=3 Bus1=S02_0201_PT_CH1_880.1.2.3 Bus2=S02_0201_PT_CH1_880_S.1.2.3 Length=0.001 Units=km r1=0.0001 x1=0.0001 r0=0.0002 x0=0.0002 normamps=800.0
New Line.SW_C10594_CHVPRI Phases=3 Bus1=S02_0211_PT_CH1_881.1.2.3 Bus2=S02_0211_PT_CH1_881_S.1.2.3 Length=0.001 Units=km r1=0.0001 x1=0.0001 r0=0.0002 x0=0.0002 normamps=800.0
New Line.SW_C10146_CHVPRI Phases=3 Bus1=S02_0222_PT_CH1_882.1.2.3 Bus2=S02_0222_PT_CH1_882_S.1.2.3 Length=0.001 Units=km r1=0.0001 x1=0.0001 r0=0.0002 x0=0.0002 normamps=800.0
New Line.SW_C10147_CHVPRI Phases=3 Bus1=S02_0201_PT_CH1_883.1.2.3 Bus2=S02_0201_PT_CH1_883_S.1.2.3 Length=0.001 Units=km r1=0.0001 x1=0.0001 r0=0.0002 x0=0.0002 normamps=800.0
New Line.SW_C10852_CHVPRI Phases=3 Bus1=S02_0211_PT_CH1_884.1.2.3 Bus2=S02_0211_PT_CH1_884_S.1.2.3 Length=0.001 Units=km r1=0.0001 x1=0.0001 r0=0.0002 x0=0.0002 normamps=800.0
New Line.SW_C10847_CHVPRI Phases=3 Bus1=S02_0223_PT_CH1_885.1.2.3 Bus2=S02_0223_PT_CH1_885_S.1.2.3 Length=0.001 Units=km r1=0.0001 x1=0.0001 r0=0.0002 x0=0.0002 normamps=800.0
New Line.SW_C10274_CHVPRI Phases=3 Bus1=S02_0222_PT_CH1_886.1.2.3 Bus2=S02_0222_PT_CH1_886_S.1.2.3 Length=0.001 Units=km r1=0.0001 x1=0.0001 r0=0.0002 x0=0.0002 normamps=800.0
New Line.SW_FIC938_CHVPRI Phases=3 Bus1=S02_0202_PT_CH1_938.1.2.3 Bus2=S02_0202_PT_CH1_938_S.1.2.3 Length=0.001 Units=km r1=0.0001 x1=0.0001 r0=0.0002 x0=0.0002 normamps=800.0
New Line.SW_S10022_CHVPRI Phases=3 Bus1=S02_0203_PT_CH1_939.1.2.3 Bus2=S02_0203_PT_CH1_939_S.1.2.3 Length=0.001 Units=km r1=0.0001 x1=0.0001 r0=0.0002 x0=0.0002 normamps=800.0
New Line.SW_FIC940_CHVPRI Phases=3 Bus1=S02_0207_PT_CH1_940.1.2.3 Bus2=S02_0207_PT_CH1_940_S.1.2.3 Length=0.001 Units=km r1=0.0001 x1=0.0001 r0=0.0002 x0=0.0002 normamps=800.0
New Line.SW_C10020_DP_941_CHVPRI Phases=3 Bus1=S02_0202_PT_CH1_941.1.2.3 Bus2=S02_0202_PT_CH1_941_S.1.2.3 Length=0.001 Units=km r1=0.0001 x1=0.0001 r0=0.0002 x0=0.0002 normamps=800.0
New Line.SW_S10019_CHVPRI Phases=3 Bus1=S02_0203_PT_CH1_942.1.2.3 Bus2=S02_0203_PT_CH1_942_S.1.2.3 Length=0.001 Units=km r1=0.0001 x1=0.0001 r0=0.0002 x0=0.0002 normamps=800.0
New Line.SW_FIC943_CHVPRI Phases=3 Bus1=S02_0207_PT_CH1_943.1.2.3 Bus2=S02_0207_PT_CH1_943_S.1.2.3 Length=0.001 Units=km r1=0.0001 x1=0.0001 r0=0.0002 x0=0.0002 normamps=800.0
New Line.SW_C10882_CHVPRI Phases=3 Bus1=S02_0211_PT_CH1_887.1.2.3 Bus2=S02_0211_PT_CH1_887_S.1.2.3 Length=0.001 Units=km r1=0.0001 x1=0.0001 r0=0.0002 x0=0.0002 normamps=800.0
New Line.SW_C10883_CHVPRI Phases=3 Bus1=S02_0201_PT_CH1_888.1.2.3 Bus2=S02_0201_PT_CH1_888_S.1.2.3 Length=0.001 Units=km r1=0.0001 x1=0.0001 r0=0.0002 x0=0.0002 normamps=800.0
New Line.SW_C10930_CHVPRI Phases=3 Bus1=S02_0222_PT_CH1_889.1.2.3 Bus2=S02_0222_PT_CH1_889_S.1.2.3 Length=0.001 Units=km r1=0.0001 x1=0.0001 r0=0.0002 x0=0.0002 normamps=800.0
New Line.SW_C10906_CHVPRI Phases=3 Bus1=S02_0211_PT_CH1_890.1.2.3 Bus2=S02_0211_PT_CH1_890_S.1.2.3 Length=0.001 Units=km r1=0.0001 x1=0.0001 r0=0.0002 x0=0.0002 normamps=800.0
New Line.SW_C10929_CHVPRI Phases=3 Bus1=S02_0201_PT_CH1_891.1.2.3 Bus2=S02_0201_PT_CH1_891_S.1.2.3 Length=0.001 Units=km r1=0.0001 x1=0.0001 r0=0.0002 x0=0.0002 normamps=800.0
New Line.SW_C10881_CHVPRI Phases=3 Bus1=S02_0222_PT_CH1_892.1.2.3 Bus2=S02_0222_PT_CH1_892_S.1.2.3 Length=0.001 Units=km r1=0.0001 x1=0.0001 r0=0.0002 x0=0.0002 normamps=800.0
New Line.SW_C10762_CHVPRI Phases=3 Bus1=S02_0201_PT_CH1_893.1.2.3 Bus2=S02_0201_PT_CH1_893_S.1.2.3 Length=0.001 Units=km r1=0.0001 x1=0.0001 r0=0.0002 x0=0.0002 normamps=800.0
New Line.SW_C10764_CHVPRI Phases=3 Bus1=S02_0222_PT_CH1_894.1.2.3 Bus2=S02_0222_PT_CH1_894_S.1.2.3 Length=0.001 Units=km r1=0.0001 x1=0.0001 r0=0.0002 x0=0.0002 normamps=800.0
New Line.SW_C13174_CHVPRI Phases=3 Bus1=S02_0203_PT_CH1_924.1.2.3 Bus2=S02_0203_PT_CH1_924_S.1.2.3 Length=0.001 Units=km r1=0.0001 x1=0.0001 r0=0.0002 x0=0.0002 normamps=800.0
New Line.SW_C13886_CHVPRI Phases=3 Bus1=S02_0207_PT_CH1_925.1.2.3 Bus2=S02_0207_PT_CH1_925_S.1.2.3 Length=0.001 Units=km r1=0.0001 x1=0.0001 r0=0.0002 x0=0.0002 normamps=800.0
New Line.SW_C13182_CHVPRI Phases=3 Bus1=S02_0203_PT_CH1_926.1.2.3 Bus2=S02_0203_PT_CH1_926_S.1.2.3 Length=0.001 Units=km r1=0.0001 x1=0.0001 r0=0.0002 x0=0.0002 normamps=800.0
New Line.SW_C13885_CHVPRI Phases=3 Bus1=S02_0202_PT_CH1_927.1.2.3 Bus2=S02_0202_PT_CH1_927_S.1.2.3 Length=0.001 Units=km r1=0.0001 x1=0.0001 r0=0.0002 x0=0.0002 normamps=800.0
New Line.SW_C13884_CHVPRI Phases=3 Bus1=S02_0207_PT_CH1_928.1.2.3 Bus2=S02_0207_PT_CH1_928_S.1.2.3 Length=0.001 Units=km r1=0.0001 x1=0.0001 r0=0.0002 x0=0.0002 normamps=800.0
New Line.SW_C11212_CHVPRI Phases=3 Bus1=S02_0207_PT_CH1_1511.1.2.3 Bus2=S02_0207_PT_CH1_1511_S.1.2.3 Length=0.001 Units=km r1=0.0001 x1=0.0001 r0=0.0002 x0=0.0002 normamps=800.0
New Line.SW_C11210_CHVPRI Phases=3 Bus1=S02_0203_PT_CH1_1512.1.2.3 Bus2=S02_0203_PT_CH1_1512_S.1.2.3 Length=0.001 Units=km r1=0.0001 x1=0.0001 r0=0.0002 x0=0.0002 normamps=800.0
New Line.SW_C11211_CHVPRI Phases=3 Bus1=S02_0202_PT_CH1_1513.1.2.3 Bus2=S02_0202_PT_CH1_1513_S.1.2.3 Length=0.001 Units=km r1=0.0001 x1=0.0001 r0=0.0002 x0=0.0002 normamps=800.0
New Line.SW_C11016_CHVPRI Phases=3 Bus1=S02_0207_PT_CH1_1611.1.2.3 Bus2=S02_0207_PT_CH1_1611_S.1.2.3 Length=0.001 Units=km r1=0.0001 x1=0.0001 r0=0.0002 x0=0.0002 normamps=800.0
New Line.SW_C11012_CHVPRI Phases=3 Bus1=S02_0203_PT_CH1_1612.1.2.3 Bus2=S02_0203_PT_CH1_1612_S.1.2.3 Length=0.001 Units=km r1=0.0001 x1=0.0001 r0=0.0002 x0=0.0002 normamps=800.0
New Line.SW_C11015_CHVPRI Phases=3 Bus1=S02_0203_PT_CH1_1613.1.2.3 Bus2=S02_0203_PT_CH1_1613_S.1.2.3 Length=0.001 Units=km r1=0.0001 x1=0.0001 r0=0.0002 x0=0.0002 normamps=800.0
New Line.SW_C11014_CHVPRI Phases=3 Bus1=S02_0202_PT_CH1_1614.1.2.3 Bus2=S02_0202_PT_CH1_1614_S.1.2.3 Length=0.001 Units=km r1=0.0001 x1=0.0001 r0=0.0002 x0=0.0002 normamps=800.0
New Line.SW_C11013_CHVPRI Phases=3 Bus1=S02_0207_PT_CH1_1615.1.2.3 Bus2=S02_0207_PT_CH1_1615_S.1.2.3 Length=0.001 Units=km r1=0.0001 x1=0.0001 r0=0.0002 x0=0.0002 normamps=800.0
New Line.SW_C30724_CHVPRI Phases=3 Bus1=S02_0211_PT_CH1_935.1.2.3 Bus2=S02_0211_PT_CH1_935_S.1.2.3 Length=0.001 Units=km r1=0.0001 x1=0.0001 r0=0.0002 x0=0.0002 normamps=800.0
New Line.SW_C30522_CHVPRI Phases=3 Bus1=S02_0222_PT_CH1_936.1.2.3 Bus2=S02_0222_PT_CH1_936_S.1.2.3 Length=0.001 Units=km r1=0.0001 x1=0.0001 r0=0.0002 x0=0.0002 normamps=800.0
New Line.SW_C30827_CHVPRI Phases=3 Bus1=S02_0222_PT_CH1_937.1.2.3 Bus2=S02_0222_PT_CH1_937_S.1.2.3 Length=0.001 Units=km r1=0.0001 x1=0.0001 r0=0.0002 x0=0.0002 normamps=800.0
New Line.SW_CDM3_CHVPRI Phases=3 Bus1=S02_0212_11231302.1.2.3 Bus2=S02_0212_11231302_S.1.2.3 Length=0.001 Units=km r1=0.0001 x1=0.0001 r0=0.0002 x0=0.0002 normamps=800.0
New Line.SW_CDM4_CHVPRI Phases=3 Bus1=S02_0210_11231302.1.2.3 Bus2=S02_0210_11231302_S.1.2.3 Length=0.001 Units=km r1=0.0001 x1=0.0001 r0=0.0002 x0=0.0002 normamps=800.0
New Line.SW_CDM5_CHVPRI Phases=3 Bus1=S02_0210_11231618.1.2.3 Bus2=S02_0210_11231618_S.1.2.3 Length=0.001 Units=km r1=0.0001 x1=0.0001 r0=0.0002 x0=0.0002 normamps=800.0
New Line.SW_CDM6_CHVPRI Phases=3 Bus1=S02_0218_11231617.1.2.3 Bus2=S02_0218_11231617_S.1.2.3 Length=0.001 Units=km r1=0.0001 x1=0.0001 r0=0.0002 x0=0.0002 normamps=800.0
New Line.SW_CDM7_CHVPRI Phases=3 Bus1=S02_0210_11231618.1.2.3 Bus2=S02_0210_11231618_S.1.2.3 Length=0.001 Units=km r1=0.0001 x1=0.0001 r0=0.0002 x0=0.0002 normamps=800.0
New Line.SW_C13109_CHVPRI Phases=3 Bus1=S02_0214_PT_CH1_328.1.2.3 Bus2=S02_0214_PT_CH1_328_S.1.2.3 Length=0.001 Units=km r1=0.0001 x1=0.0001 r0=0.0002 x0=0.0002 normamps=800.0
New Line.SW_C13108_CHVPRI Phases=3 Bus1=S02_0213_PT_CH1_329.1.2.3 Bus2=S02_0213_PT_CH1_329_S.1.2.3 Length=0.001 Units=km r1=0.0001 x1=0.0001 r0=0.0002 x0=0.0002 normamps=800.0
New Line.SW_C10293_CHVPRI Phases=3 Bus1=S02_0213_PT_CH1_330.1.2.3 Bus2=S02_0213_PT_CH1_330_S.1.2.3 Length=0.001 Units=km r1=0.0001 x1=0.0001 r0=0.0002 x0=0.0002 normamps=800.0
New Line.SW_C10292_CHVPRI Phases=3 Bus1=S02_0214_PT_CH1_331.1.2.3 Bus2=S02_0214_PT_CH1_331_S.1.2.3 Length=0.001 Units=km r1=0.0001 x1=0.0001 r0=0.0002 x0=0.0002 normamps=800.0
New Line.SW_C10337_CHVPRI Phases=3 Bus1=S02_0216_PT_CH1_118.1.2.3 Bus2=S02_0216_PT_CH1_118_S.1.2.3 Length=0.001 Units=km r1=0.0001 x1=0.0001 r0=0.0002 x0=0.0002 normamps=800.0
New Line.SW_C10336_CHVPRI Phases=3 Bus1=S02_0217_PT_CH1_119.1.2.3 Bus2=S02_0217_PT_CH1_119_S.1.2.3 Length=0.001 Units=km r1=0.0001 x1=0.0001 r0=0.0002 x0=0.0002 normamps=800.0
New Line.SW_C10335_CHVPRI Phases=3 Bus1=S02_0224_PT_CH1_120.1.2.3 Bus2=S02_0224_PT_CH1_120_S.1.2.3 Length=0.001 Units=km r1=0.0001 x1=0.0001 r0=0.0002 x0=0.0002 normamps=800.0
New Line.SW_C10062_CHVPRI Phases=3 Bus1=S02_0213_PT_CH1_320.1.2.3 Bus2=S02_0213_PT_CH1_320_S.1.2.3 Length=0.001 Units=km r1=0.0001 x1=0.0001 r0=0.0002 x0=0.0002 normamps=800.0
New Line.SW_C10063_CHVPRI Phases=3 Bus1=S02_0214_PT_CH1_321.1.2.3 Bus2=S02_0214_PT_CH1_321_S.1.2.3 Length=0.001 Units=km r1=0.0001 x1=0.0001 r0=0.0002 x0=0.0002 normamps=800.0
New Line.SW_C10006_CHVPRI Phases=3 Bus1=S02_0213_PT_CH1_322.1.2.3 Bus2=S02_0213_PT_CH1_322_S.1.2.3 Length=0.001 Units=km r1=0.0001 x1=0.0001 r0=0.0002 x0=0.0002 normamps=800.0
New Line.SW_C10007_CHVPRI Phases=3 Bus1=S02_0214_PT_CH1_323.1.2.3 Bus2=S02_0214_PT_CH1_323_S.1.2.3 Length=0.001 Units=km r1=0.0001 x1=0.0001 r0=0.0002 x0=0.0002 normamps=800.0
New Line.SW_C10598_CHVPRI Phases=3 Bus1=S02_0212_PT_CH1_324.1.2.3 Bus2=S02_0212_PT_CH1_324_S.1.2.3 Length=0.001 Units=km r1=0.0001 x1=0.0001 r0=0.0002 x0=0.0002 normamps=800.0
New Line.SW_C10662_CHVPRI Phases=3 Bus1=S02_0213_PT_CH1_325.1.2.3 Bus2=S02_0213_PT_CH1_325_S.1.2.3 Length=0.001 Units=km r1=0.0001 x1=0.0001 r0=0.0002 x0=0.0002 normamps=800.0
New Line.SW_C10073_CHVPRI Phases=3 Bus1=S02_0214_PT_CH1_326.1.2.3 Bus2=S02_0214_PT_CH1_326_S.1.2.3 Length=0.001 Units=km r1=0.0001 x1=0.0001 r0=0.0002 x0=0.0002 normamps=800.0
New Line.SW_C13111_CHVPRI Phases=3 Bus1=S02_0212_PT_CH1_327.1.2.3 Bus2=S02_0212_PT_CH1_327_S.1.2.3 Length=0.001 Units=km r1=0.0001 x1=0.0001 r0=0.0002 x0=0.0002 normamps=800.0
New Line.SW_C13066_DP_97_CHVPRI Phases=3 Bus1=S02_0209_PT_CH1_97.1.2.3 Bus2=S02_0209_PT_CH1_97_S.1.2.3 Length=0.001 Units=km r1=0.0001 x1=0.0001 r0=0.0002 x0=0.0002 normamps=800.0
New Line.SW_C11039_CHVPRI Phases=3 Bus1=S02_0217_PT_CH1_98.1.2.3 Bus2=S02_0217_PT_CH1_98_S.1.2.3 Length=0.001 Units=km r1=0.0001 x1=0.0001 r0=0.0002 x0=0.0002 normamps=800.0
New Line.SW_C11040_CHVPRI Phases=3 Bus1=S02_0216_PT_CH1_99.1.2.3 Bus2=S02_0216_PT_CH1_99_S.1.2.3 Length=0.001 Units=km r1=0.0001 x1=0.0001 r0=0.0002 x0=0.0002 normamps=800.0
New Line.SW_C11041_CHVPRI Phases=3 Bus1=S02_0224_PT_CH1_100.1.2.3 Bus2=S02_0224_PT_CH1_100_S.1.2.3 Length=0.001 Units=km r1=0.0001 x1=0.0001 r0=0.0002 x0=0.0002 normamps=800.0
New Line.SW_C11037_CHVPRI Phases=3 Bus1=S02_0217_PT_CH1_101.1.2.3 Bus2=S02_0217_PT_CH1_101_S.1.2.3 Length=0.001 Units=km r1=0.0001 x1=0.0001 r0=0.0002 x0=0.0002 normamps=800.0
New Line.SW_C11036_CHVPRI Phases=3 Bus1=S02_0216_PT_CH1_102.1.2.3 Bus2=S02_0216_PT_CH1_102_S.1.2.3 Length=0.001 Units=km r1=0.0001 x1=0.0001 r0=0.0002 x0=0.0002 normamps=800.0
New Line.SW_C11038_CHVPRI Phases=3 Bus1=S02_0224_PT_CH1_103.1.2.3 Bus2=S02_0224_PT_CH1_103_S.1.2.3 Length=0.001 Units=km r1=0.0001 x1=0.0001 r0=0.0002 x0=0.0002 normamps=800.0
New Line.SW_C10069_CHVPRI Phases=3 Bus1=S02_0210_PT_CH1_147.1.2.3 Bus2=S02_0210_PT_CH1_147_S.1.2.3 Length=0.001 Units=km r1=0.0001 x1=0.0001 r0=0.0002 x0=0.0002 normamps=800.0
New Line.SW_C10070_CHVPRI Phases=3 Bus1=S02_0212_PT_CH1_148.1.2.3 Bus2=S02_0212_PT_CH1_148_S.1.2.3 Length=0.001 Units=km r1=0.0001 x1=0.0001 r0=0.0002 x0=0.0002 normamps=800.0
New Line.SW_C10116_CHVPRI Phases=3 Bus1=S02_0210_PT_CH1_149.1.2.3 Bus2=S02_0210_PT_CH1_149_S.1.2.3 Length=0.001 Units=km r1=0.0001 x1=0.0001 r0=0.0002 x0=0.0002 normamps=800.0
New Line.SW_C10117_CHVPRI Phases=3 Bus1=S02_0212_PT_CH1_150.1.2.3 Bus2=S02_0212_PT_CH1_150_S.1.2.3 Length=0.001 Units=km r1=0.0001 x1=0.0001 r0=0.0002 x0=0.0002 normamps=800.0
New Line.SW_C10067_CHVPRI Phases=3 Bus1=S02_0210_PT_CH1_151.1.2.3 Bus2=S02_0210_PT_CH1_151_S.1.2.3 Length=0.001 Units=km r1=0.0001 x1=0.0001 r0=0.0002 x0=0.0002 normamps=800.0
New Line.SW_C10068_CHVPRI Phases=3 Bus1=S02_0212_PT_CH1_152.1.2.3 Bus2=S02_0212_PT_CH1_152_S.1.2.3 Length=0.001 Units=km r1=0.0001 x1=0.0001 r0=0.0002 x0=0.0002 normamps=800.0
New Line.SW_C10065_CHVPRI Phases=3 Bus1=S02_0210_PT_CH1_153.1.2.3 Bus2=S02_0210_PT_CH1_153_S.1.2.3 Length=0.001 Units=km r1=0.0001 x1=0.0001 r0=0.0002 x0=0.0002 normamps=800.0
New Line.SW_C10066_CHVPRI Phases=3 Bus1=S02_0212_PT_CH1_154.1.2.3 Bus2=S02_0212_PT_CH1_154_S.1.2.3 Length=0.001 Units=km r1=0.0001 x1=0.0001 r0=0.0002 x0=0.0002 normamps=800.0
New Line.SW_C12934_CHVPRI Phases=3 Bus1=S02_0210_PT_CH1_155.1.2.3 Bus2=S02_0210_PT_CH1_155_S.1.2.3 Length=0.001 Units=km r1=0.0001 x1=0.0001 r0=0.0002 x0=0.0002 normamps=800.0
New Line.SW_C10003_CHVPRI Phases=3 Bus1=S02_0212_PT_CH1_315.1.2.3 Bus2=S02_0212_PT_CH1_315_S.1.2.3 Length=0.001 Units=km r1=0.0001 x1=0.0001 r0=0.0002 x0=0.0002 normamps=800.0
New Line.SW_C10267_CHVPRI Phases=3 Bus1=S02_0214_PT_CH1_316.1.2.3 Bus2=S02_0214_PT_CH1_316_S.1.2.3 Length=0.001 Units=km r1=0.0001 x1=0.0001 r0=0.0002 x0=0.0002 normamps=800.0
New Line.SW_C10005_CHVPRI Phases=3 Bus1=S02_0213_PT_CH1_317.1.2.3 Bus2=S02_0213_PT_CH1_317_S.1.2.3 Length=0.001 Units=km r1=0.0001 x1=0.0001 r0=0.0002 x0=0.0002 normamps=800.0
New Line.SW_C10201_CHVPRI Phases=3 Bus1=S02_0209_PT_CH1_88.1.2.3 Bus2=S02_0209_PT_CH1_88_S.1.2.3 Length=0.001 Units=km r1=0.0001 x1=0.0001 r0=0.0002 x0=0.0002 normamps=800.0
New Line.SW_C10200_CHVPRI Phases=3 Bus1=S02_0224_PT_CH1_89.1.2.3 Bus2=S02_0224_PT_CH1_89_S.1.2.3 Length=0.001 Units=km r1=0.0001 x1=0.0001 r0=0.0002 x0=0.0002 normamps=800.0
New Line.SW_C10682_CHVPRI Phases=3 Bus1=S02_0217_PT_CH1_90.1.2.3 Bus2=S02_0217_PT_CH1_90_S.1.2.3 Length=0.001 Units=km r1=0.0001 x1=0.0001 r0=0.0002 x0=0.0002 normamps=800.0
New Line.SW_C13068_DP_92_CHVPRI Phases=3 Bus1=S02_0217_PT_CH1_92.1.2.3 Bus2=S02_0217_PT_CH1_92_S.1.2.3 Length=0.001 Units=km r1=0.0001 x1=0.0001 r0=0.0002 x0=0.0002 normamps=800.0
New Line.SW_C13067_DP_93_CHVPRI Phases=3 Bus1=S02_0216_PT_CH1_93.1.2.3 Bus2=S02_0216_PT_CH1_93_S.1.2.3 Length=0.001 Units=km r1=0.0001 x1=0.0001 r0=0.0002 x0=0.0002 normamps=800.0
New Line.SW_C13066D_CHVPRI Phases=3 Bus1=S02_0209_PT_CH1_94.1.2.3 Bus2=S02_0209_PT_CH1_94_S.1.2.3 Length=0.001 Units=km r1=0.0001 x1=0.0001 r0=0.0002 x0=0.0002 normamps=800.0
New Line.SW_C13068D_CHVPRI Phases=3 Bus1=S02_0217_PT_CH1_95.1.2.3 Bus2=S02_0217_PT_CH1_95_S.1.2.3 Length=0.001 Units=km r1=0.0001 x1=0.0001 r0=0.0002 x0=0.0002 normamps=800.0
New Line.SW_C13067_DP_96_CHVPRI Phases=3 Bus1=S02_0216_PT_CH1_96.1.2.3 Bus2=S02_0216_PT_CH1_96_S.1.2.3 Length=0.001 Units=km r1=0.0001 x1=0.0001 r0=0.0002 x0=0.0002 normamps=800.0
New Line.SW_C10114_CHVPRI Phases=3 Bus1=S02_0210_PT_CH1_145.1.2.3 Bus2=S02_0210_PT_CH1_145_S.1.2.3 Length=0.001 Units=km r1=0.0001 x1=0.0001 r0=0.0002 x0=0.0002 normamps=800.0
New Line.SW_C10115_CHVPRI Phases=3 Bus1=S02_0212_PT_CH1_146.1.2.3 Bus2=S02_0212_PT_CH1_146_S.1.2.3 Length=0.001 Units=km r1=0.0001 x1=0.0001 r0=0.0002 x0=0.0002 normamps=800.0
New Line.SW_C11232_CHVPRI Phases=3 Bus1=S02_0224_PT_CH1_131.1.2.3 Bus2=S02_0224_PT_CH1_131_S.1.2.3 Length=0.001 Units=km r1=0.0001 x1=0.0001 r0=0.0002 x0=0.0002 normamps=800.0
New Line.SW_C11230_CHVPRI Phases=3 Bus1=S02_0217_PT_CH1_132.1.2.3 Bus2=S02_0217_PT_CH1_132_S.1.2.3 Length=0.001 Units=km r1=0.0001 x1=0.0001 r0=0.0002 x0=0.0002 normamps=800.0
New Line.SW_C11227_CHVPRI Phases=3 Bus1=S02_0209_PT_CH1_133.1.2.3 Bus2=S02_0209_PT_CH1_133_S.1.2.3 Length=0.001 Units=km r1=0.0001 x1=0.0001 r0=0.0002 x0=0.0002 normamps=800.0
New Line.SW_C11231_CHVPRI Phases=3 Bus1=S02_0224_PT_CH1_134.1.2.3 Bus2=S02_0224_PT_CH1_134_S.1.2.3 Length=0.001 Units=km r1=0.0001 x1=0.0001 r0=0.0002 x0=0.0002 normamps=800.0
New Line.SW_C11229_CHVPRI Phases=3 Bus1=S02_0217_PT_CH1_135.1.2.3 Bus2=S02_0217_PT_CH1_135_S.1.2.3 Length=0.001 Units=km r1=0.0001 x1=0.0001 r0=0.0002 x0=0.0002 normamps=800.0
New Line.SW_C11228_CHVPRI Phases=3 Bus1=S02_0209_PT_CH1_136.1.2.3 Bus2=S02_0209_PT_CH1_136_S.1.2.3 Length=0.001 Units=km r1=0.0001 x1=0.0001 r0=0.0002 x0=0.0002 normamps=800.0
New Line.SW_C12935_CHVPRI Phases=3 Bus1=S02_0212_PT_CH1_156.1.2.3 Bus2=S02_0212_PT_CH1_156_S.1.2.3 Length=0.001 Units=km r1=0.0001 x1=0.0001 r0=0.0002 x0=0.0002 normamps=800.0
New Line.SW_C10368_CHVPRI Phases=3 Bus1=S02_0216_PT_CH1_82.1.2.3 Bus2=S02_0216_PT_CH1_82_S.1.2.3 Length=0.001 Units=km r1=0.0001 x1=0.0001 r0=0.0002 x0=0.0002 normamps=800.0
New Line.SW_C10333_CHVPRI Phases=3 Bus1=S02_0217_PT_CH1_83.1.2.3 Bus2=S02_0217_PT_CH1_83_S.1.2.3 Length=0.001 Units=km r1=0.0001 x1=0.0001 r0=0.0002 x0=0.0002 normamps=800.0
New Line.SW_C10691_CHVPRI Phases=3 Bus1=S02_0209_PT_CH1_84.1.2.3 Bus2=S02_0209_PT_CH1_84_S.1.2.3 Length=0.001 Units=km r1=0.0001 x1=0.0001 r0=0.0002 x0=0.0002 normamps=800.0
New Line.SW_C10242_CHVPRI Phases=3 Bus1=S02_0217_PT_CH1_85.1.2.3 Bus2=S02_0217_PT_CH1_85_S.1.2.3 Length=0.001 Units=km r1=0.0001 x1=0.0001 r0=0.0002 x0=0.0002 normamps=800.0
New Line.SW_C10241_CHVPRI Phases=3 Bus1=S02_0209_PT_CH1_86.1.2.3 Bus2=S02_0209_PT_CH1_86_S.1.2.3 Length=0.001 Units=km r1=0.0001 x1=0.0001 r0=0.0002 x0=0.0002 normamps=800.0
New Line.SW_C10265_CHVPRI Phases=3 Bus1=S02_0216_PT_CH1_87.1.2.3 Bus2=S02_0216_PT_CH1_87_S.1.2.3 Length=0.001 Units=km r1=0.0001 x1=0.0001 r0=0.0002 x0=0.0002 normamps=800.0
New Line.SW_C10833_CHVPRI Phases=3 Bus1=S02_0224_PT_CH1_128.1.2.3 Bus2=S02_0224_PT_CH1_128_S.1.2.3 Length=0.001 Units=km r1=0.0001 x1=0.0001 r0=0.0002 x0=0.0002 normamps=800.0
New Line.SW_C10831_CHVPRI Phases=3 Bus1=S02_0217_PT_CH1_129.1.2.3 Bus2=S02_0217_PT_CH1_129_S.1.2.3 Length=0.001 Units=km r1=0.0001 x1=0.0001 r0=0.0002 x0=0.0002 normamps=800.0
New Line.SW_C10424_CHVPRI Phases=3 Bus1=S02_0201_PT_CH1_908.1.2.3 Bus2=S02_0201_PT_CH1_908_S.1.2.3 Length=0.001 Units=km r1=0.0001 x1=0.0001 r0=0.0002 x0=0.0002 normamps=800.0
New Line.SW_C10438_CHVPRI Phases=3 Bus1=S02_0224_PT_CH1_909.1.2.3 Bus2=S02_0224_PT_CH1_909_S.1.2.3 Length=0.001 Units=km r1=0.0001 x1=0.0001 r0=0.0002 x0=0.0002 normamps=800.0
New Line.SW_FIC910_CHVPRI Phases=3 Bus1=S02_0201_PT_CH1_910.1.2.3 Bus2=S02_0201_PT_CH1_910_S.1.2.3 Length=0.001 Units=km r1=0.0001 x1=0.0001 r0=0.0002 x0=0.0002 normamps=800.0
New Line.SW_FIC911_CHVPRI Phases=3 Bus1=S02_0201_PT_CH1_911.1.2.3 Bus2=S02_0201_PT_CH1_911_S.1.2.3 Length=0.001 Units=km r1=0.0001 x1=0.0001 r0=0.0002 x0=0.0002 normamps=800.0
New Line.SW_C10183_CHVPRI Phases=3 Bus1=S02_0224_PT_CH1_912.1.2.3 Bus2=S02_0224_PT_CH1_912_S.1.2.3 Length=0.001 Units=km r1=0.0001 x1=0.0001 r0=0.0002 x0=0.0002 normamps=800.0
New Line.SW_C10629_CHVPRI Phases=3 Bus1=S02_0222_PT_CH1_913.1.2.3 Bus2=S02_0222_PT_CH1_913_S.1.2.3 Length=0.001 Units=km r1=0.0001 x1=0.0001 r0=0.0002 x0=0.0002 normamps=800.0
New Line.SW_C10611_CHVPRI Phases=3 Bus1=S02_0223_PT_CH1_914.1.2.3 Bus2=S02_0223_PT_CH1_914_S.1.2.3 Length=0.001 Units=km r1=0.0001 x1=0.0001 r0=0.0002 x0=0.0002 normamps=800.0
New Line.SW_C10182_CHVPRI Phases=3 Bus1=S02_0223_PT_CH1_915.1.2.3 Bus2=S02_0223_PT_CH1_915_S.1.2.3 Length=0.001 Units=km r1=0.0001 x1=0.0001 r0=0.0002 x0=0.0002 normamps=800.0
New Line.SW_C10289_CHVPRI Phases=3 Bus1=S02_0222_PT_CH1_916.1.2.3 Bus2=S02_0222_PT_CH1_916_S.1.2.3 Length=0.001 Units=km r1=0.0001 x1=0.0001 r0=0.0002 x0=0.0002 normamps=800.0
New Line.SW_C10290_CHVPRI Phases=3 Bus1=S02_0201_PT_CH1_917.1.2.3 Bus2=S02_0201_PT_CH1_917_S.1.2.3 Length=0.001 Units=km r1=0.0001 x1=0.0001 r0=0.0002 x0=0.0002 normamps=800.0
New Line.SW_C10624_CHVPRI Phases=3 Bus1=S02_0223_PT_CH1_918.1.2.3 Bus2=S02_0223_PT_CH1_918_S.1.2.3 Length=0.001 Units=km r1=0.0001 x1=0.0001 r0=0.0002 x0=0.0002 normamps=800.0
New Line.SW_C10856_CHVPRI Phases=3 Bus1=S02_0209_PT_CH1_919.1.2.3 Bus2=S02_0209_PT_CH1_919_S.1.2.3 Length=0.001 Units=km r1=0.0001 x1=0.0001 r0=0.0002 x0=0.0002 normamps=800.0
New Line.SW_C10718_CHVPRI Phases=3 Bus1=S02_0216_PT_CH1_920.1.2.3 Bus2=S02_0216_PT_CH1_920_S.1.2.3 Length=0.001 Units=km r1=0.0001 x1=0.0001 r0=0.0002 x0=0.0002 normamps=800.0
New Line.SW_C10921_CHVPRI Phases=3 Bus1=S02_0217_PT_CH1_139.1.2.3 Bus2=S02_0217_PT_CH1_139_S.1.2.3 Length=0.001 Units=km r1=0.0001 x1=0.0001 r0=0.0002 x0=0.0002 normamps=800.0
New Line.SW_C10934_CHVPRI Phases=3 Bus1=S02_0209_PT_CH1_140.1.2.3 Bus2=S02_0209_PT_CH1_140_S.1.2.3 Length=0.001 Units=km r1=0.0001 x1=0.0001 r0=0.0002 x0=0.0002 normamps=800.0
New Line.SW_C10154_CHVPRI Phases=3 Bus1=S02_0209_PT_CH1_141.1.2.3 Bus2=S02_0209_PT_CH1_141_S.1.2.3 Length=0.001 Units=km r1=0.0001 x1=0.0001 r0=0.0002 x0=0.0002 normamps=800.0
New Line.SW_C10155_CHVPRI Phases=3 Bus1=S02_0216_PT_CH1_142.1.2.3 Bus2=S02_0216_PT_CH1_142_S.1.2.3 Length=0.001 Units=km r1=0.0001 x1=0.0001 r0=0.0002 x0=0.0002 normamps=800.0
New Line.SW_C11407_CHVPRI Phases=3 Bus1=S02_0209_PT_CH1_1675.1.2.3 Bus2=S02_0209_PT_CH1_1675_S.1.2.3 Length=0.001 Units=km r1=0.0001 x1=0.0001 r0=0.0002 x0=0.0002 normamps=800.0
New Line.SW_C10151_CHVPRI Phases=3 Bus1=S02_0216_PT_CH1_1692.1.2.3 Bus2=S02_0216_PT_CH1_1692_S.1.2.3 Length=0.001 Units=km r1=0.0001 x1=0.0001 r0=0.0002 x0=0.0002 normamps=800.0
New Line.SW_C10832_CHVPRI Phases=3 Bus1=S02_0209_PT_CH1_130.1.2.3 Bus2=S02_0209_PT_CH1_130_S.1.2.3 Length=0.001 Units=km r1=0.0001 x1=0.0001 r0=0.0002 x0=0.0002 normamps=800.0
New Line.SW_C13037_CHVPRI Phases=3 Bus1=S02_0217_PT_CH1_137.1.2.3 Bus2=S02_0217_PT_CH1_137_S.1.2.3 Length=0.001 Units=km r1=0.0001 x1=0.0001 r0=0.0002 x0=0.0002 normamps=800.0
New Line.SW_C13036_CHVPRI Phases=3 Bus1=S02_0216_PT_CH1_138.1.2.3 Bus2=S02_0216_PT_CH1_138_S.1.2.3 Length=0.001 Units=km r1=0.0001 x1=0.0001 r0=0.0002 x0=0.0002 normamps=800.0
New Line.SW_C10754_CHVPRI Phases=3 Bus1=S02_0223_PT_CH1_921.1.2.3 Bus2=S02_0223_PT_CH1_921_S.1.2.3 Length=0.001 Units=km r1=0.0001 x1=0.0001 r0=0.0002 x0=0.0002 normamps=800.0
New Line.SW_C10936_CHVPRI Phases=3 Bus1=S02_0209_PT_CH1_922.1.2.3 Bus2=S02_0209_PT_CH1_922_S.1.2.3 Length=0.001 Units=km r1=0.0001 x1=0.0001 r0=0.0002 x0=0.0002 normamps=800.0
New Line.SW_C12957_CHVPRI Phases=3 Bus1=S02_0216_PT_CH1_923.1.2.3 Bus2=S02_0216_PT_CH1_923_S.1.2.3 Length=0.001 Units=km r1=0.0001 x1=0.0001 r0=0.0002 x0=0.0002 normamps=800.0
New Line.SW_C10202_CHVPRI Phases=3 Bus1=S02_0216_PT_CH1_125.1.2.3 Bus2=S02_0216_PT_CH1_125_S.1.2.3 Length=0.001 Units=km r1=0.0001 x1=0.0001 r0=0.0002 x0=0.0002 normamps=800.0
New Line.SW_C10203_CHVPRI Phases=3 Bus1=S02_0217_PT_CH1_126.1.2.3 Bus2=S02_0217_PT_CH1_126_S.1.2.3 Length=0.001 Units=km r1=0.0001 x1=0.0001 r0=0.0002 x0=0.0002 normamps=800.0
New Line.SW_C10204_CHVPRI Phases=3 Bus1=S02_0209_PT_CH1_127.1.2.3 Bus2=S02_0209_PT_CH1_127_S.1.2.3 Length=0.001 Units=km r1=0.0001 x1=0.0001 r0=0.0002 x0=0.0002 normamps=800.0
