! OpenDSS Switches - Subestacao SHP (HP03 / HP04) | RUN_TAG: 20261028_101044
! Total de Chaves: 125

New Line.SW_FP2738 Phases=3 Bus1=SHP_HP03_9195_BSB040.1.2.3 Bus2=SHP_HP03_9195_BSB040_S.1.2.3 Length=0.001 Units=km r1=0.0001 x1=0.0001 r0=0.0002 x0=0.0002 normamps=800.0
New Line.SW_FT0395 Phases=3 Bus1=SHP_HP03_9007_BSB034.1.2.3 Bus2=SHP_HP03_9007_BSB034_S.1.2.3 Length=0.001 Units=km r1=0.0001 x1=0.0001 r0=0.0002 x0=0.0002 normamps=800.0
New Line.SW_FW3018 Phases=3 Bus1=SHP_HP03_9075_BSB029.1.2.3 Bus2=SHP_HP03_9075_BSB029_S.1.2.3 Length=0.001 Units=km r1=0.0001 x1=0.0001 r0=0.0002 x0=0.0002 normamps=800.0
New Line.SW_FIC2459 Phases=3 Bus1=SHP_HP03_9179_BSB040.1.2.3 Bus2=SHP_HP03_9179_BSB040_S.1.2.3 Length=0.001 Units=km r1=0.0001 x1=0.0001 r0=0.0002 x0=0.0002 normamps=800.0
New Line.SW_FIC2475 Phases=3 Bus1=SHP_HP03_9183_BSB040.1.2.3 Bus2=SHP_HP03_9183_BSB040_S.1.2.3 Length=0.001 Units=km r1=0.0001 x1=0.0001 r0=0.0002 x0=0.0002 normamps=800.0
New Line.SW_FT0390 Phases=3 Bus1=SHP_HP03_9174_BSB040.1.2.3 Bus2=SHP_HP03_9174_BSB040_S.1.2.3 Length=0.001 Units=km r1=0.0001 x1=0.0001 r0=0.0002 x0=0.0002 normamps=800.0
New Line.SW_FA1250 Phases=3 Bus1=SHP_HP04_9098_BSB27A.1.2.3 Bus2=SHP_HP04_9098_BSB27A_S.1.2.3 Length=0.001 Units=km r1=0.0001 x1=0.0001 r0=0.0002 x0=0.0002 normamps=800.0
New Line.SW_FW9074 Phases=3 Bus1=SHP_HP03_9009_BSB034.1.2.3 Bus2=SHP_HP03_9009_BSB034_S.1.2.3 Length=0.001 Units=km r1=0.0001 x1=0.0001 r0=0.0002 x0=0.0002 normamps=800.0
New Line.SW_FIC2501 Phases=3 Bus1=SHP_HP03_9078_BSB029.1.2.3 Bus2=SHP_HP03_9078_BSB029_S.1.2.3 Length=0.001 Units=km r1=0.0001 x1=0.0001 r0=0.0002 x0=0.0002 normamps=800.0
New Line.SW_FIC2502 Phases=3 Bus1=SHP_HP03_9004_BSB030.1.2.3 Bus2=SHP_HP03_9004_BSB030_S.1.2.3 Length=0.001 Units=km r1=0.0001 x1=0.0001 r0=0.0002 x0=0.0002 normamps=800.0
New Line.SW_FT4518 Phases=3 Bus1=SHP_HP03_9283_BSB025.1.2.3 Bus2=SHP_HP03_9283_BSB025_S.1.2.3 Length=0.001 Units=km r1=0.0001 x1=0.0001 r0=0.0002 x0=0.0002 normamps=800.0
New Line.SW_FP6355 Phases=3 Bus1=SHP_HP03_9201_BSB040.1.2.3 Bus2=SHP_HP03_9201_BSB040_S.1.2.3 Length=0.001 Units=km r1=0.0001 x1=0.0001 r0=0.0002 x0=0.0002 normamps=800.0
New Line.SW_FA7737 Phases=3 Bus1=SHP_HP03_9002_BSB034.1.2.3 Bus2=SHP_HP03_9002_BSB034_S.1.2.3 Length=0.001 Units=km r1=0.0001 x1=0.0001 r0=0.0002 x0=0.0002 normamps=800.0
New Line.SW_FA8348 Phases=3 Bus1=SHP_HP03_9052_BSB027.1.2.3 Bus2=SHP_HP03_9052_BSB027_S.1.2.3 Length=0.001 Units=km r1=0.0001 x1=0.0001 r0=0.0002 x0=0.0002 normamps=800.0
New Line.SW_FT4721 Phases=3 Bus1=SHP_HP03_9264_BSB025.1.2.3 Bus2=SHP_HP03_9264_BSB025_S.1.2.3 Length=0.001 Units=km r1=0.0001 x1=0.0001 r0=0.0002 x0=0.0002 normamps=800.0
! Chave Aberta de Manobra: SW_FA8626 Bus1=SHP_HP03_9029_BSB027 Bus2=SHP_HP03_9029_BSB027_S (NA)
New Line.SW_FT5362 Phases=3 Bus1=SHP_HP03_9012_BSB025.1.2.3 Bus2=SHP_HP03_9012_BSB025_S.1.2.3 Length=0.001 Units=km r1=0.0001 x1=0.0001 r0=0.0002 x0=0.0002 normamps=800.0
New Line.SW_FA9679 Phases=3 Bus1=SHP_HP03_9104_BSB028.1.2.3 Bus2=SHP_HP03_9104_BSB028_S.1.2.3 Length=0.001 Units=km r1=0.0001 x1=0.0001 r0=0.0002 x0=0.0002 normamps=800.0
New Line.SW_FX5361 Phases=3 Bus1=SHP_HP03_9119_BSB029.1.2.3 Bus2=SHP_HP03_9119_BSB029_S.1.2.3 Length=0.001 Units=km r1=0.0001 x1=0.0001 r0=0.0002 x0=0.0002 normamps=800.0
New Line.SW_FA7922 Phases=3 Bus1=SHP_HP04_9042_BSB027.1.2.3 Bus2=SHP_HP04_9042_BSB027_S.1.2.3 Length=0.001 Units=km r1=0.0001 x1=0.0001 r0=0.0002 x0=0.0002 normamps=800.0
New Line.SW_HP03_SHP Phases=3 Bus1=HP_BA1138KV.1.2.3 Bus2=HP_ALHP03.1.2.3 Length=0.001 Units=km r1=0.0001 x1=0.0001 r0=0.0002 x0=0.0002 normamps=800.0
New Line.SW_HP04_SHP Phases=3 Bus1=HP_BA2138KV.1.2.3 Bus2=HP_ALHP04.1.2.3 Length=0.001 Units=km r1=0.0001 x1=0.0001 r0=0.0002 x0=0.0002 normamps=800.0
New Line.SW_FP2741 Phases=3 Bus1=SHP_HP03_9223_BSB029.1.2.3 Bus2=SHP_HP03_9223_BSB029_S.1.2.3 Length=0.001 Units=km r1=0.0001 x1=0.0001 r0=0.0002 x0=0.0002 normamps=800.0
New Line.SW_FZ5617 Phases=3 Bus1=SHP_HP03_9015_BSB035.1.2.3 Bus2=SHP_HP03_9015_BSB035_S.1.2.3 Length=0.001 Units=km r1=0.0001 x1=0.0001 r0=0.0002 x0=0.0002 normamps=800.0
New Line.SW_FT0402 Phases=3 Bus1=SHP_HP03_9138_BSBRJ001B_ATV.1.2.3 Bus2=SHP_HP03_9138_BSBRJ001B_ATV_S.1.2.3 Length=0.001 Units=km r1=0.0001 x1=0.0001 r0=0.0002 x0=0.0002 normamps=800.0
New Line.SW_FW1734 Phases=3 Bus1=SHP_HP03_9113_BSB029.1.2.3 Bus2=SHP_HP03_9113_BSB029_S.1.2.3 Length=0.001 Units=km r1=0.0001 x1=0.0001 r0=0.0002 x0=0.0002 normamps=800.0
New Line.SW_FA9346 Phases=3 Bus1=SHP_HP03_9294_BSB025.1.2.3 Bus2=SHP_HP03_9294_BSB025_S.1.2.3 Length=0.001 Units=km r1=0.0001 x1=0.0001 r0=0.0002 x0=0.0002 normamps=800.0
New Line.SW_FA7934 Phases=3 Bus1=SHP_HP03_9074_BSB27A.1.2.3 Bus2=SHP_HP03_9074_BSB27A_S.1.2.3 Length=0.001 Units=km r1=0.0001 x1=0.0001 r0=0.0002 x0=0.0002 normamps=800.0
New Line.SW_FA7736 Phases=3 Bus1=SHP_HP03_9002_BSB035.1.2.3 Bus2=SHP_HP03_9002_BSB035_S.1.2.3 Length=0.001 Units=km r1=0.0001 x1=0.0001 r0=0.0002 x0=0.0002 normamps=800.0
New Line.SW_FT2676 Phases=3 Bus1=SHP_HP04_9029_BSB27A.1.2.3 Bus2=SHP_HP04_9029_BSB27A_S.1.2.3 Length=0.001 Units=km r1=0.0001 x1=0.0001 r0=0.0002 x0=0.0002 normamps=800.0
New Line.SW_FZ6743 Phases=3 Bus1=SHP_HP04_9427_BSB025.1.2.3 Bus2=SHP_HP04_9427_BSB025_S.1.2.3 Length=0.001 Units=km r1=0.0001 x1=0.0001 r0=0.0002 x0=0.0002 normamps=800.0
New Line.SW_FT0406 Phases=3 Bus1=SHP_HP03_9212_BSB029.1.2.3 Bus2=SHP_HP03_9212_BSB029_S.1.2.3 Length=0.001 Units=km r1=0.0001 x1=0.0001 r0=0.0002 x0=0.0002 normamps=800.0
New Line.SW_FA7166 Phases=3 Bus1=SHP_HP03_9076_BSB029.1.2.3 Bus2=SHP_HP03_9076_BSB029_S.1.2.3 Length=0.001 Units=km r1=0.0001 x1=0.0001 r0=0.0002 x0=0.0002 normamps=800.0
New Line.SW_FA7163 Phases=3 Bus1=SHP_HP03_9216_BSB029.1.2.3 Bus2=SHP_HP03_9216_BSB029_S.1.2.3 Length=0.001 Units=km r1=0.0001 x1=0.0001 r0=0.0002 x0=0.0002 normamps=800.0
! Chave Aberta de Manobra: SW_FA1241 Bus1=SHP_HP03_9158_BSB031 Bus2=SHP_HP03_9158_BSB031_S (NA)
New Line.SW_FZ4213 Phases=3 Bus1=SHP_HP03_9001_BSB030.1.2.3 Bus2=SHP_HP03_9001_BSB030_S.1.2.3 Length=0.001 Units=km r1=0.0001 x1=0.0001 r0=0.0002 x0=0.0002 normamps=800.0
New Line.SW_FIC3713 Phases=3 Bus1=SHP_HP03_9252_BSB025.1.2.3 Bus2=SHP_HP03_9252_BSB025_S.1.2.3 Length=0.001 Units=km r1=0.0001 x1=0.0001 r0=0.0002 x0=0.0002 normamps=800.0
New Line.SW_FIC3714 Phases=3 Bus1=SHP_HP03_9010_BSB030.1.2.3 Bus2=SHP_HP03_9010_BSB030_S.1.2.3 Length=0.001 Units=km r1=0.0001 x1=0.0001 r0=0.0002 x0=0.0002 normamps=800.0
New Line.SW_FZ3311 Phases=3 Bus1=SHP_HP04_9141_BSB029.1.2.3 Bus2=SHP_HP04_9141_BSB029_S.1.2.3 Length=0.001 Units=km r1=0.0001 x1=0.0001 r0=0.0002 x0=0.0002 normamps=800.0
New Line.SW_FA7351 Phases=3 Bus1=SHP_HP04_9428_BSB025.1.2.3 Bus2=SHP_HP04_9428_BSB025_S.1.2.3 Length=0.001 Units=km r1=0.0001 x1=0.0001 r0=0.0002 x0=0.0002 normamps=800.0
New Line.SW_FK0888 Phases=1 Bus1=SHP_HP04_9201_BSB27A.1 Bus2=SHP_HP04_9201_BSB27A_S.1 Length=0.001 Units=km r1=0.0001 x1=0.0001 r0=0.0002 x0=0.0002 normamps=800.0
New Line.SW_FP6342 Phases=3 Bus1=SHP_HP04_9025_BSB27A.1.2.3 Bus2=SHP_HP04_9025_BSB27A_S.1.2.3 Length=0.001 Units=km r1=0.0001 x1=0.0001 r0=0.0002 x0=0.0002 normamps=800.0
New Line.SW_FU0067 Phases=3 Bus1=SHP_HP04_9034_BSB27A.1.2.3 Bus2=SHP_HP04_9034_BSB27A_S.1.2.3 Length=0.001 Units=km r1=0.0001 x1=0.0001 r0=0.0002 x0=0.0002 normamps=800.0
New Line.SW_FP8181 Phases=3 Bus1=SHP_HP04_9086_BSB27A.1.2.3 Bus2=SHP_HP04_9086_BSB27A_S.1.2.3 Length=0.001 Units=km r1=0.0001 x1=0.0001 r0=0.0002 x0=0.0002 normamps=800.0
New Line.SW_FU0005 Phases=3 Bus1=SHP_HP04_9437_BSB025.1.2.3 Bus2=SHP_HP04_9437_BSB025_S.1.2.3 Length=0.001 Units=km r1=0.0001 x1=0.0001 r0=0.0002 x0=0.0002 normamps=800.0
New Line.SW_FP0778 Phases=3 Bus1=SHP_HP04_9050_BSB026.1.2.3 Bus2=SHP_HP04_9050_BSB026_S.1.2.3 Length=0.001 Units=km r1=0.0001 x1=0.0001 r0=0.0002 x0=0.0002 normamps=800.0
New Line.SW_FIC3801 Phases=3 Bus1=SHP_HP04_9442_BSB025.1.2.3 Bus2=SHP_HP04_9442_BSB025_S.1.2.3 Length=0.001 Units=km r1=0.0001 x1=0.0001 r0=0.0002 x0=0.0002 normamps=800.0
New Line.SW_FZ5921 Phases=3 Bus1=SHP_HP04_9108_BSB028.1.2.3 Bus2=SHP_HP04_9108_BSB028_S.1.2.3 Length=0.001 Units=km r1=0.0001 x1=0.0001 r0=0.0002 x0=0.0002 normamps=800.0
New Line.SW_FZ6744 Phases=1 Bus1=SHP_HP04_9041_BSB026.1 Bus2=SHP_HP04_9041_BSB026_S.1 Length=0.001 Units=km r1=0.0001 x1=0.0001 r0=0.0002 x0=0.0002 normamps=800.0
New Line.SW_FW9798 Phases=3 Bus1=SHP_HP04_9110_BSB028.1.2.3 Bus2=SHP_HP04_9110_BSB028_S.1.2.3 Length=0.001 Units=km r1=0.0001 x1=0.0001 r0=0.0002 x0=0.0002 normamps=800.0
New Line.SW_FW9476 Phases=3 Bus1=SHP_HP04_9085_BSB27A.1.2.3 Bus2=SHP_HP04_9085_BSB27A_S.1.2.3 Length=0.001 Units=km r1=0.0001 x1=0.0001 r0=0.0002 x0=0.0002 normamps=800.0
New Line.SW_FZ1927 Phases=3 Bus1=SHP_HP04_9061_BSB027.1.2.3 Bus2=SHP_HP04_9061_BSB027_S.1.2.3 Length=0.001 Units=km r1=0.0001 x1=0.0001 r0=0.0002 x0=0.0002 normamps=800.0
New Line.SW_FA9629 Phases=3 Bus1=SHP_HP03_9318_BSB041.1.2.3 Bus2=SHP_HP03_9318_BSB041_S.1.2.3 Length=0.001 Units=km r1=0.0001 x1=0.0001 r0=0.0002 x0=0.0002 normamps=800.0
New Line.SW_FP2743 Phases=3 Bus1=SHP_HP04_9181_BSB27A.1.2.3 Bus2=SHP_HP04_9181_BSB27A_S.1.2.3 Length=0.001 Units=km r1=0.0001 x1=0.0001 r0=0.0002 x0=0.0002 normamps=800.0
New Line.SW_CT0200 Phases=3 Bus1=SHP_HP03_9318_BSB041.1.2.3 Bus2=SHP_HP03_9318_BSB041_S.1.2.3 Length=0.001 Units=km r1=0.0001 x1=0.0001 r0=0.0002 x0=0.0002 normamps=800.0
New Line.SW_FIC3863 Phases=3 Bus1=SHP_HP03_9104_BSB029.1.2.3 Bus2=SHP_HP03_9104_BSB029_S.1.2.3 Length=0.001 Units=km r1=0.0001 x1=0.0001 r0=0.0002 x0=0.0002 normamps=800.0
New Line.SW_FW8045 Phases=3 Bus1=SHP_HP04_9027_BSB27A.1.2.3 Bus2=SHP_HP04_9027_BSB27A_S.1.2.3 Length=0.001 Units=km r1=0.0001 x1=0.0001 r0=0.0002 x0=0.0002 normamps=800.0
New Line.SW_FU1905 Phases=3 Bus1=SHP_HP04_9060_BSB027.1.2.3 Bus2=SHP_HP04_9060_BSB027_S.1.2.3 Length=0.001 Units=km r1=0.0001 x1=0.0001 r0=0.0002 x0=0.0002 normamps=800.0
New Line.SW_FW7341 Phases=3 Bus1=SHP_HP04_9024_BSB27A.1.2.3 Bus2=SHP_HP04_9024_BSB27A_S.1.2.3 Length=0.001 Units=km r1=0.0001 x1=0.0001 r0=0.0002 x0=0.0002 normamps=800.0
New Line.SW_FW0210 Phases=3 Bus1=SHP_HP04_9063_BSB027.1.2.3 Bus2=SHP_HP04_9063_BSB027_S.1.2.3 Length=0.001 Units=km r1=0.0001 x1=0.0001 r0=0.0002 x0=0.0002 normamps=800.0
New Line.SW_FA0009 Phases=3 Bus1=SHP_HP04_9425_BSB025.1.2.3 Bus2=SHP_HP04_9425_BSB025_S.1.2.3 Length=0.001 Units=km r1=0.0001 x1=0.0001 r0=0.0002 x0=0.0002 normamps=800.0
New Line.SW_FT0413 Phases=3 Bus1=SHP_HP04_9426_BSB025.1.2.3 Bus2=SHP_HP04_9426_BSB025_S.1.2.3 Length=0.001 Units=km r1=0.0001 x1=0.0001 r0=0.0002 x0=0.0002 normamps=800.0
New Line.SW_FT0412 Phases=3 Bus1=SHP_HP04_9435_BSB025.1.2.3 Bus2=SHP_HP04_9435_BSB025_S.1.2.3 Length=0.001 Units=km r1=0.0001 x1=0.0001 r0=0.0002 x0=0.0002 normamps=800.0
New Line.SW_FU0008 Phases=3 Bus1=SHP_HP04_9429_BSB025.1.2.3 Bus2=SHP_HP04_9429_BSB025_S.1.2.3 Length=0.001 Units=km r1=0.0001 x1=0.0001 r0=0.0002 x0=0.0002 normamps=800.0
New Line.SW_FW0610 Phases=3 Bus1=SHP_HP04_9182_BSBRJ001B_ATV.1.2.3 Bus2=SHP_HP04_9182_BSBRJ001B_ATV_S.1.2.3 Length=0.001 Units=km r1=0.0001 x1=0.0001 r0=0.0002 x0=0.0002 normamps=800.0
New Line.SW_FT0407_DP_26568 Phases=3 Bus1=SHP_HP04_9056_BSB027.1.2.3 Bus2=SHP_HP04_9056_BSB027_S.1.2.3 Length=0.001 Units=km r1=0.0001 x1=0.0001 r0=0.0002 x0=0.0002 normamps=800.0
New Line.SW_FZ9448 Phases=3 Bus1=SHP_HP04_9425_BSB025.1.2.3 Bus2=SHP_HP04_9425_BSB025_S.1.2.3 Length=0.001 Units=km r1=0.0001 x1=0.0001 r0=0.0002 x0=0.0002 normamps=800.0
New Line.SW_FF2755 Phases=3 Bus1=SHP_HP04_9083_BSB27A.1.2.3 Bus2=SHP_HP04_9083_BSB27A_S.1.2.3 Length=0.001 Units=km r1=0.0001 x1=0.0001 r0=0.0002 x0=0.0002 normamps=800.0
New Line.SW_FT0383 Phases=3 Bus1=SHP_HP04_9146_BSB029.1.2.3 Bus2=SHP_HP04_9146_BSB029_S.1.2.3 Length=0.001 Units=km r1=0.0001 x1=0.0001 r0=0.0002 x0=0.0002 normamps=800.0
New Line.SW_FT0409 Phases=3 Bus1=SHP_HP04_9438_BSB025.1.2.3 Bus2=SHP_HP04_9438_BSB025_S.1.2.3 Length=0.001 Units=km r1=0.0001 x1=0.0001 r0=0.0002 x0=0.0002 normamps=800.0
New Line.SW_FU0011 Phases=3 Bus1=SHP_HP04_9066_BSB27A.1.2.3 Bus2=SHP_HP04_9066_BSB27A_S.1.2.3 Length=0.001 Units=km r1=0.0001 x1=0.0001 r0=0.0002 x0=0.0002 normamps=800.0
New Line.SW_FP6885 Phases=3 Bus1=SHP_HP04_9051_BSB27A.1.2.3 Bus2=SHP_HP04_9051_BSB27A_S.1.2.3 Length=0.001 Units=km r1=0.0001 x1=0.0001 r0=0.0002 x0=0.0002 normamps=800.0
New Line.SW_FK0890 Phases=1 Bus1=SHP_HP04_9207_BSB27A.1 Bus2=SHP_HP04_9207_BSB27A_S.1 Length=0.001 Units=km r1=0.0001 x1=0.0001 r0=0.0002 x0=0.0002 normamps=800.0
New Line.SW_FIC5513 Phases=3 Bus1=SHP_HP04_9441_BSB025.1.2.3 Bus2=SHP_HP04_9441_BSB025_S.1.2.3 Length=0.001 Units=km r1=0.0001 x1=0.0001 r0=0.0002 x0=0.0002 normamps=800.0
New Line.SW_FIC5515 Phases=3 Bus1=SHP_HP04_9058_BSB026.1.2.3 Bus2=SHP_HP04_9058_BSB026_S.1.2.3 Length=0.001 Units=km r1=0.0001 x1=0.0001 r0=0.0002 x0=0.0002 normamps=800.0
New Line.SW_FT0393 Phases=3 Bus1=SHP_HP03_9004_BSB035.1.2.3 Bus2=SHP_HP03_9004_BSB035_S.1.2.3 Length=0.001 Units=km r1=0.0001 x1=0.0001 r0=0.0002 x0=0.0002 normamps=800.0
New Line.SW_FW6918 Phases=3 Bus1=SHP_HP03_9103_BSB029.1.2.3 Bus2=SHP_HP03_9103_BSB029_S.1.2.3 Length=0.001 Units=km r1=0.0001 x1=0.0001 r0=0.0002 x0=0.0002 normamps=800.0
New Line.SW_FP8005 Phases=3 Bus1=SHP_HP03_9194_BSB040.1.2.3 Bus2=SHP_HP03_9194_BSB040_S.1.2.3 Length=0.001 Units=km r1=0.0001 x1=0.0001 r0=0.0002 x0=0.0002 normamps=800.0
New Line.SW_FW3017 Phases=3 Bus1=SHP_HP03_9222_BSB029.1.2.3 Bus2=SHP_HP03_9222_BSB029_S.1.2.3 Length=0.001 Units=km r1=0.0001 x1=0.0001 r0=0.0002 x0=0.0002 normamps=800.0
New Line.SW_FT0394 Phases=3 Bus1=SHP_HP03_9006_BSB035.1.2.3 Bus2=SHP_HP03_9006_BSB035_S.1.2.3 Length=0.001 Units=km r1=0.0001 x1=0.0001 r0=0.0002 x0=0.0002 normamps=800.0
New Line.SW_FW1774 Phases=3 Bus1=SHP_HP03_9118_BSB029.1.2.3 Bus2=SHP_HP03_9118_BSB029_S.1.2.3 Length=0.001 Units=km r1=0.0001 x1=0.0001 r0=0.0002 x0=0.0002 normamps=800.0
New Line.SW_FW7009 Phases=3 Bus1=SHP_HP03_9248_BSB035.1.2.3 Bus2=SHP_HP03_9248_BSB035_S.1.2.3 Length=0.001 Units=km r1=0.0001 x1=0.0001 r0=0.0002 x0=0.0002 normamps=800.0
New Line.SW_FT0418 Phases=3 Bus1=SHP_HP03_9069_BSB27A.1.2.3 Bus2=SHP_HP03_9069_BSB27A_S.1.2.3 Length=0.001 Units=km r1=0.0001 x1=0.0001 r0=0.0002 x0=0.0002 normamps=800.0
New Line.SW_FA7101 Phases=3 Bus1=SHP_HP03_9225_BSB029.1.2.3 Bus2=SHP_HP03_9225_BSB029_S.1.2.3 Length=0.001 Units=km r1=0.0001 x1=0.0001 r0=0.0002 x0=0.0002 normamps=800.0
New Line.SW_FP5660 Phases=3 Bus1=SHP_HP03_9181_BSB025.1.2.3 Bus2=SHP_HP03_9181_BSB025_S.1.2.3 Length=0.001 Units=km r1=0.0001 x1=0.0001 r0=0.0002 x0=0.0002 normamps=800.0
New Line.SW_FT6598 Phases=3 Bus1=SHP_HP03_9012_BSB035.1.2.3 Bus2=SHP_HP03_9012_BSB035_S.1.2.3 Length=0.001 Units=km r1=0.0001 x1=0.0001 r0=0.0002 x0=0.0002 normamps=800.0
New Line.SW_FT0398 Phases=3 Bus1=SHP_HP03_9014_BSB034.1.2.3 Bus2=SHP_HP03_9014_BSB034_S.1.2.3 Length=0.001 Units=km r1=0.0001 x1=0.0001 r0=0.0002 x0=0.0002 normamps=800.0
New Line.SW_FT0396 Phases=3 Bus1=SHP_HP03_9013_BSB025.1.2.3 Bus2=SHP_HP03_9013_BSB025_S.1.2.3 Length=0.001 Units=km r1=0.0001 x1=0.0001 r0=0.0002 x0=0.0002 normamps=800.0
New Line.SW_FX4888 Phases=3 Bus1=SHP_HP03_9114_BSB029.1.2.3 Bus2=SHP_HP03_9114_BSB029_S.1.2.3 Length=0.001 Units=km r1=0.0001 x1=0.0001 r0=0.0002 x0=0.0002 normamps=800.0
New Line.SW_FW9358 Phases=3 Bus1=SHP_HP03_9077_BSB029.1.2.3 Bus2=SHP_HP03_9077_BSB029_S.1.2.3 Length=0.001 Units=km r1=0.0001 x1=0.0001 r0=0.0002 x0=0.0002 normamps=800.0
New Line.SW_FT0397 Phases=3 Bus1=SHP_HP03_9012_BSB034.1.2.3 Bus2=SHP_HP03_9012_BSB034_S.1.2.3 Length=0.001 Units=km r1=0.0001 x1=0.0001 r0=0.0002 x0=0.0002 normamps=800.0
New Line.SW_FW0206 Phases=3 Bus1=SHP_HP03_9010_BSB025.1.2.3 Bus2=SHP_HP03_9010_BSB025_S.1.2.3 Length=0.001 Units=km r1=0.0001 x1=0.0001 r0=0.0002 x0=0.0002 normamps=800.0
New Line.SW_FP7825 Phases=3 Bus1=SHP_HP03_9010_BSB034.1.2.3 Bus2=SHP_HP03_9010_BSB034_S.1.2.3 Length=0.001 Units=km r1=0.0001 x1=0.0001 r0=0.0002 x0=0.0002 normamps=800.0
New Line.SW_FZ5176 Phases=3 Bus1=SHP_HP03_9014_BSB035.1.2.3 Bus2=SHP_HP03_9014_BSB035_S.1.2.3 Length=0.001 Units=km r1=0.0001 x1=0.0001 r0=0.0002 x0=0.0002 normamps=800.0
New Line.SW_FZ5123 Phases=3 Bus1=SHP_HP03_9014_BSB035.1.2.3 Bus2=SHP_HP03_9014_BSB035_S.1.2.3 Length=0.001 Units=km r1=0.0001 x1=0.0001 r0=0.0002 x0=0.0002 normamps=800.0
New Line.SW_FT0403 Phases=3 Bus1=SHP_HP03_9008_BSB030.1.2.3 Bus2=SHP_HP03_9008_BSB030_S.1.2.3 Length=0.001 Units=km r1=0.0001 x1=0.0001 r0=0.0002 x0=0.0002 normamps=800.0
! Chave Aberta de Manobra: SW_FIC5685 Bus1=SHP_HP03_9186_BSB040 Bus2=SHP_HP03_9186_BSB040_S (NA)
New Line.SW_FA9630 Phases=3 Bus1=SHP_HP03_9318_BSB041.1.2.3 Bus2=SHP_HP03_9318_BSB041_S.1.2.3 Length=0.001 Units=km r1=0.0001 x1=0.0001 r0=0.0002 x0=0.0002 normamps=800.0
New Line.SW_FZ7230 Phases=1 Bus1=SHP_HP03_9318_BSB041.1 Bus2=SHP_HP03_9318_BSB041_S.1 Length=0.001 Units=km r1=0.0001 x1=0.0001 r0=0.0002 x0=0.0002 normamps=800.0
New Line.SW_FX4889 Phases=3 Bus1=SHP_HP03_9101_BSB029.1.2.3 Bus2=SHP_HP03_9101_BSB029_S.1.2.3 Length=0.001 Units=km r1=0.0001 x1=0.0001 r0=0.0002 x0=0.0002 normamps=800.0
New Line.SW_FZ3460 Phases=1 Bus1=SHP_HP03_9112_BSB029.1 Bus2=SHP_HP03_9112_BSB029_S.1 Length=0.001 Units=km r1=0.0001 x1=0.0001 r0=0.0002 x0=0.0002 normamps=800.0
New Line.SW_FX4946 Phases=3 Bus1=SHP_HP03_9251_BSB025.1.2.3 Bus2=SHP_HP03_9251_BSB025_S.1.2.3 Length=0.001 Units=km r1=0.0001 x1=0.0001 r0=0.0002 x0=0.0002 normamps=800.0
New Line.SW_FA2131 Phases=3 Bus1=SHP_HP03_9003_BSB035.1.2.3 Bus2=SHP_HP03_9003_BSB035_S.1.2.3 Length=0.001 Units=km r1=0.0001 x1=0.0001 r0=0.0002 x0=0.0002 normamps=800.0
New Line.SW_FX4890 Phases=3 Bus1=SHP_HP03_9116_BSB029.1.2.3 Bus2=SHP_HP03_9116_BSB029_S.1.2.3 Length=0.001 Units=km r1=0.0001 x1=0.0001 r0=0.0002 x0=0.0002 normamps=800.0
New Line.SW_FU0014 Phases=3 Bus1=SHP_HP03_9009_BSB025.1.2.3 Bus2=SHP_HP03_9009_BSB025_S.1.2.3 Length=0.001 Units=km r1=0.0001 x1=0.0001 r0=0.0002 x0=0.0002 normamps=800.0
New Line.SW_FP8277 Phases=1 Bus1=SHP_HP04_9199_BSB27A.1 Bus2=SHP_HP04_9199_BSB27A_S.1 Length=0.001 Units=km r1=0.0001 x1=0.0001 r0=0.0002 x0=0.0002 normamps=800.0
New Line.SW_FP6308 Phases=3 Bus1=SHP_HP03_9219_BSB029.1.2.3 Bus2=SHP_HP03_9219_BSB029_S.1.2.3 Length=0.001 Units=km r1=0.0001 x1=0.0001 r0=0.0002 x0=0.0002 normamps=800.0
New Line.SW_FT0411 Phases=3 Bus1=SHP_HP04_9051_BSB026.1.2.3 Bus2=SHP_HP04_9051_BSB026_S.1.2.3 Length=0.001 Units=km r1=0.0001 x1=0.0001 r0=0.0002 x0=0.0002 normamps=800.0
New Line.SW_FT0392 Phases=3 Bus1=SHP_HP03_9251_BSB035.1.2.3 Bus2=SHP_HP03_9251_BSB035_S.1.2.3 Length=0.001 Units=km r1=0.0001 x1=0.0001 r0=0.0002 x0=0.0002 normamps=800.0
New Line.SW_FA8008 Phases=3 Bus1=SHP_HP03_9002_BSB030.1.2.3 Bus2=SHP_HP03_9002_BSB030_S.1.2.3 Length=0.001 Units=km r1=0.0001 x1=0.0001 r0=0.0002 x0=0.0002 normamps=800.0
New Line.SW_FA1124 Phases=3 Bus1=SHP_HP03_9218_BSB029.1.2.3 Bus2=SHP_HP03_9218_BSB029_S.1.2.3 Length=0.001 Units=km r1=0.0001 x1=0.0001 r0=0.0002 x0=0.0002 normamps=800.0
New Line.SW_FP2732 Phases=3 Bus1=SHP_HP03_9005_BSB035.1.2.3 Bus2=SHP_HP03_9005_BSB035_S.1.2.3 Length=0.001 Units=km r1=0.0001 x1=0.0001 r0=0.0002 x0=0.0002 normamps=800.0
New Line.SW_FIC1806 Phases=3 Bus1=SHP_HP03_1962052523.1.2.3 Bus2=SHP_HP03_1962052523_S.1.2.3 Length=0.001 Units=km r1=0.0001 x1=0.0001 r0=0.0002 x0=0.0002 normamps=800.0
New Line.SW_FIC1807 Phases=3 Bus1=SHP_HP03_1962052523.1.2.3 Bus2=SHP_HP03_1962052523_S.1.2.3 Length=0.001 Units=km r1=0.0001 x1=0.0001 r0=0.0002 x0=0.0002 normamps=800.0
New Line.SW_FT0407_DP_43970 Phases=3 Bus1=SHP_HP03_9056_BSB027.1.2.3 Bus2=SHP_HP03_9056_BSB027_S.1.2.3 Length=0.001 Units=km r1=0.0001 x1=0.0001 r0=0.0002 x0=0.0002 normamps=800.0
New Line.SW_FIC6792 Phases=3 Bus1=SHP_HP04_419626_BSB.1.2.3 Bus2=SHP_HP04_419626_BSB_S.1.2.3 Length=0.001 Units=km r1=0.0001 x1=0.0001 r0=0.0002 x0=0.0002 normamps=800.0
New Line.SW_C11116_CHVPRI Phases=3 Bus1=SHP_HP03_PT_CH1_1545.1.2.3 Bus2=SHP_HP03_PT_CH1_1545_S.1.2.3 Length=0.001 Units=km r1=0.0001 x1=0.0001 r0=0.0002 x0=0.0002 normamps=800.0
New Line.SW_FIC1547_CHVPRI Phases=3 Bus1=SHP_HP03_PT_CH1_1546.1.2.3 Bus2=SHP_HP03_PT_CH1_1546_S.1.2.3 Length=0.001 Units=km r1=0.0001 x1=0.0001 r0=0.0002 x0=0.0002 normamps=800.0
New Line.SW_FIC67_CHVPRI Phases=3 Bus1=SHP_HP03_PT_CH1_67.1.2.3 Bus2=SHP_HP03_PT_CH1_67_S.1.2.3 Length=0.001 Units=km r1=0.0001 x1=0.0001 r0=0.0002 x0=0.0002 normamps=800.0
New Line.SW_C10924_CHVPRI Phases=3 Bus1=SHP_HP03_PT_CH1_68.1.2.3 Bus2=SHP_HP03_PT_CH1_68_S.1.2.3 Length=0.001 Units=km r1=0.0001 x1=0.0001 r0=0.0002 x0=0.0002 normamps=800.0
New Line.SW_C11244_CHVPRI Phases=3 Bus1=SHP_HP03_PT_CH1_69.1.2.3 Bus2=SHP_HP03_PT_CH1_69_S.1.2.3 Length=0.001 Units=km r1=0.0001 x1=0.0001 r0=0.0002 x0=0.0002 normamps=800.0
New Line.SW_C11243_CHVPRI Phases=3 Bus1=SHP_HP03_PT_CH1_70.1.2.3 Bus2=SHP_HP03_PT_CH1_70_S.1.2.3 Length=0.001 Units=km r1=0.0001 x1=0.0001 r0=0.0002 x0=0.0002 normamps=800.0
New Line.SW_RE2079_RL Phases=3 Bus1=SHP_HP04_419626_BSB.1.2.3 Bus2=SHP_HP04_419626_BSB_S.1.2.3 Length=0.001 Units=km r1=0.0001 x1=0.0001 r0=0.0002 x0=0.0002 normamps=800.0
New Line.SW_FX4940 Phases=3 Bus1=SHP_HP03_9237_BSB025.1.2.3 Bus2=SHP_HP03_9237_BSB025_S.1.2.3 Length=0.001 Units=km r1=0.0001 x1=0.0001 r0=0.0002 x0=0.0002 normamps=800.0
New Line.SW_FX4939 Phases=3 Bus1=SHP_HP03_9219_BSB025.1.2.3 Bus2=SHP_HP03_9219_BSB025_S.1.2.3 Length=0.001 Units=km r1=0.0001 x1=0.0001 r0=0.0002 x0=0.0002 normamps=800.0
