! OpenDSS Disconnecting Switches - Circuito TN08 (SE STN) | RUN_TAG: 20261019_093214
! Total de Chaves: 99 | Fechadas: 92 | Abertas: 7

! ==============================================================================
! CHAVES NORMALMENTE FECHADAS (P_N_OPE == 'F') - CONTINUIDADE PRIMARIA NOMINAL
! ==============================================================================
New Line.SW_FX9581 Phases=3 Bus1=STN_TN08_9003_CEI024.1.2.3 Bus2=STN_TN08_9003_CEI024_S.1.2.3 Switch=y r1=0.0001 x1=0.0001 r0=0.0001 x0=0.0001 Length=0.001 Units=m ! Estado=F 9003_CEI024
New Line.SW_FT3542 Phases=3 Bus1=STN_TN08_9169_CEI024.1.2.3 Bus2=STN_TN08_9169_CEI024_S.1.2.3 Switch=y r1=0.0001 x1=0.0001 r0=0.0001 x0=0.0001 Length=0.001 Units=m ! Estado=F 9169_CEI024
New Line.SW_FT3543 Phases=3 Bus1=STN_TN08_9165_CEI024.1.2.3 Bus2=STN_TN08_9165_CEI024_S.1.2.3 Switch=y r1=0.0001 x1=0.0001 r0=0.0001 x0=0.0001 Length=0.001 Units=m ! Estado=F 9165_CEI024
New Line.SW_FT3544 Phases=3 Bus1=STN_TN08_9160_CEI024.1.2.3 Bus2=STN_TN08_9160_CEI024_S.1.2.3 Switch=y r1=0.0001 x1=0.0001 r0=0.0001 x0=0.0001 Length=0.001 Units=m ! Estado=F 9160_CEI024
New Line.SW_FT3545 Phases=3 Bus1=STN_TN08_9157_CEI024.1.2.3 Bus2=STN_TN08_9157_CEI024_S.1.2.3 Switch=y r1=0.0001 x1=0.0001 r0=0.0001 x0=0.0001 Length=0.001 Units=m ! Estado=F 9157_CEI024
New Line.SW_FT3548 Phases=3 Bus1=STN_TN08_9010_CEI024.1.2.3 Bus2=STN_TN08_9010_CEI024_S.1.2.3 Switch=y r1=0.0001 x1=0.0001 r0=0.0001 x0=0.0001 Length=0.001 Units=m ! Estado=F 9010_CEI024
New Line.SW_FIC3388 Phases=3 Bus1=STN_TN08_9121_CEIRJ002_ATV.1.2.3 Bus2=STN_TN08_9121_CEIRJ002_ATV_S.1.2.3 Switch=y r1=0.0001 x1=0.0001 r0=0.0001 x0=0.0001 Length=0.001 Units=m ! Estado=F 9121_CEIRJ002_ATV
New Line.SW_FW2465 Phases=3 Bus1=STN_TN08_9159_CEI024.1.2.3 Bus2=STN_TN08_9159_CEI024_S.1.2.3 Switch=y r1=0.0001 x1=0.0001 r0=0.0001 x0=0.0001 Length=0.001 Units=m ! Estado=F 9159_CEI024
New Line.SW_FW2605 Phases=3 Bus1=STN_TN08_9158_CEI024.1.2.3 Bus2=STN_TN08_9158_CEI024_S.1.2.3 Switch=y r1=0.0001 x1=0.0001 r0=0.0001 x0=0.0001 Length=0.001 Units=m ! Estado=F 9158_CEI024
New Line.SW_FT3546 Phases=3 Bus1=STN_TN08_9001_CEI024.1.2.3 Bus2=STN_TN08_9001_CEI024_S.1.2.3 Switch=y r1=0.0001 x1=0.0001 r0=0.0001 x0=0.0001 Length=0.001 Units=m ! Estado=F 9001_CEI024
New Line.SW_FT3547 Phases=3 Bus1=STN_TN08_9005_CEI024.1.2.3 Bus2=STN_TN08_9005_CEI024_S.1.2.3 Switch=y r1=0.0001 x1=0.0001 r0=0.0001 x0=0.0001 Length=0.001 Units=m ! Estado=F 9005_CEI024
New Line.SW_FP1077 Phases=3 Bus1=STN_TN08_9123_CEIRJ002_ATV.1.2.3 Bus2=STN_TN08_9123_CEIRJ002_ATV_S.1.2.3 Switch=y r1=0.0001 x1=0.0001 r0=0.0001 x0=0.0001 Length=0.001 Units=m ! Estado=F 9123_CEIRJ002_ATV
New Line.SW_FP8577 Phases=3 Bus1=STN_TN08_9541_CEI024.1.2.3 Bus2=STN_TN08_9541_CEI024_S.1.2.3 Switch=y r1=0.0001 x1=0.0001 r0=0.0001 x0=0.0001 Length=0.001 Units=m ! Estado=F 9541_CEI024
New Line.SW_FZ0820 Phases=3 Bus1=STN_TN08_9695_CEI024.1.2.3 Bus2=STN_TN08_9695_CEI024_S.1.2.3 Switch=y r1=0.0001 x1=0.0001 r0=0.0001 x0=0.0001 Length=0.001 Units=m ! Estado=F 9695_CEI024
New Line.SW_FIC3372 Phases=3 Bus1=STN_TN08_9540_CEI024.1.2.3 Bus2=STN_TN08_9540_CEI024_S.1.2.3 Switch=y r1=0.0001 x1=0.0001 r0=0.0001 x0=0.0001 Length=0.001 Units=m ! Estado=F 9540_CEI024
New Line.SW_FT6388 Phases=3 Bus1=STN_TN08_9453_CEI024.1.2.3 Bus2=STN_TN08_9453_CEI024_S.1.2.3 Switch=y r1=0.0001 x1=0.0001 r0=0.0001 x0=0.0001 Length=0.001 Units=m ! Estado=F 9453_CEI024
New Line.SW_FZ2945 Phases=3 Bus1=STN_TN08_9546_CEI023.1.2.3 Bus2=STN_TN08_9546_CEI023_S.1.2.3 Switch=y r1=0.0001 x1=0.0001 r0=0.0001 x0=0.0001 Length=0.001 Units=m ! Estado=F 9546_CEI023
New Line.SW_FX1363 Phases=3 Bus1=STN_TN08_9552_CEI024.1.2.3 Bus2=STN_TN08_9552_CEI024_S.1.2.3 Switch=y r1=0.0001 x1=0.0001 r0=0.0001 x0=0.0001 Length=0.001 Units=m ! Estado=F 9552_CEI024
New Line.SW_FX3118 Phases=3 Bus1=STN_TN08_9687_CEI024.1.2.3 Bus2=STN_TN08_9687_CEI024_S.1.2.3 Switch=y r1=0.0001 x1=0.0001 r0=0.0001 x0=0.0001 Length=0.001 Units=m ! Estado=F 9687_CEI024
New Line.SW_FW8506 Phases=3 Bus1=STN_TN08_9689_CEI024.1.2.3 Bus2=STN_TN08_9689_CEI024_S.1.2.3 Switch=y r1=0.0001 x1=0.0001 r0=0.0001 x0=0.0001 Length=0.001 Units=m ! Estado=F 9689_CEI024
New Line.SW_FZ9235 Phases=3 Bus1=STN_TN08_9651_CEI024.1.2.3 Bus2=STN_TN08_9651_CEI024_S.1.2.3 Switch=y r1=0.0001 x1=0.0001 r0=0.0001 x0=0.0001 Length=0.001 Units=m ! Estado=F 9651_CEI024
New Line.SW_FX3270 Phases=3 Bus1=STN_TN08_9034_CEI024.1.2.3 Bus2=STN_TN08_9034_CEI024_S.1.2.3 Switch=y r1=0.0001 x1=0.0001 r0=0.0001 x0=0.0001 Length=0.001 Units=m ! Estado=F 9034_CEI024
New Line.SW_FA3554 Phases=3 Bus1=STN_TN08_9142_CEI024.1.2.3 Bus2=STN_TN08_9142_CEI024_S.1.2.3 Switch=y r1=0.0001 x1=0.0001 r0=0.0001 x0=0.0001 Length=0.001 Units=m ! Estado=F 9142_CEI024
New Line.SW_FT3868_DP_14500 Phases=3 Bus1=STN_TN08_9019_CEI023.1.2.3 Bus2=STN_TN08_9019_CEI023_S.1.2.3 Switch=y r1=0.0001 x1=0.0001 r0=0.0001 x0=0.0001 Length=0.001 Units=m ! Estado=F 9019_CEI023
New Line.SW_FZ0595 Phases=3 Bus1=STN_TN08_9258_CEI024.1.2.3 Bus2=STN_TN08_9258_CEI024_S.1.2.3 Switch=y r1=0.0001 x1=0.0001 r0=0.0001 x0=0.0001 Length=0.001 Units=m ! Estado=F 9258_CEI024
New Line.SW_FZ1048 Phases=3 Bus1=STN_TN08_9031_CEI003.1.2.3 Bus2=STN_TN08_9031_CEI003_S.1.2.3 Switch=y r1=0.0001 x1=0.0001 r0=0.0001 x0=0.0001 Length=0.001 Units=m ! Estado=F 9031_CEI003
New Line.SW_FA9357 Phases=3 Bus1=STN_TN08_9133_CEI006.1.2.3 Bus2=STN_TN08_9133_CEI006_S.1.2.3 Switch=y r1=0.0001 x1=0.0001 r0=0.0001 x0=0.0001 Length=0.001 Units=m ! Estado=F 9133_CEI006
New Line.SW_FIC3378 Phases=3 Bus1=STN_TN08_9574_CEI024.1.2.3 Bus2=STN_TN08_9574_CEI024_S.1.2.3 Switch=y r1=0.0001 x1=0.0001 r0=0.0001 x0=0.0001 Length=0.001 Units=m ! Estado=F 9574_CEI024
New Line.SW_FW6936 Phases=3 Bus1=STN_TN08_9217_CEI006.1.2.3 Bus2=STN_TN08_9217_CEI006_S.1.2.3 Switch=y r1=0.0001 x1=0.0001 r0=0.0001 x0=0.0001 Length=0.001 Units=m ! Estado=F 9217_CEI006
New Line.SW_FT3877 Phases=3 Bus1=STN_TN08_9132_CEI006.1.2.3 Bus2=STN_TN08_9132_CEI006_S.1.2.3 Switch=y r1=0.0001 x1=0.0001 r0=0.0001 x0=0.0001 Length=0.001 Units=m ! Estado=F 9132_CEI006
New Line.SW_FW2850 Phases=3 Bus1=STN_TN08_9214_CEI006.1.2.3 Bus2=STN_TN08_9214_CEI006_S.1.2.3 Switch=y r1=0.0001 x1=0.0001 r0=0.0001 x0=0.0001 Length=0.001 Units=m ! Estado=F 9214_CEI006
New Line.SW_FP5707 Phases=3 Bus1=STN_TN08_9027_CEI003.1.2.3 Bus2=STN_TN08_9027_CEI003_S.1.2.3 Switch=y r1=0.0001 x1=0.0001 r0=0.0001 x0=0.0001 Length=0.001 Units=m ! Estado=F 9027_CEI003
New Line.SW_FT3866 Phases=3 Bus1=STN_TN08_9028_CEI023.1.2.3 Bus2=STN_TN08_9028_CEI023_S.1.2.3 Switch=y r1=0.0001 x1=0.0001 r0=0.0001 x0=0.0001 Length=0.001 Units=m ! Estado=F 9028_CEI023
! ------------------------------------------------------------------------------
! CHAVE SECCIONADORA DO RAMAL DO HRC (HOSPITAL REGIONAL DE CEILANDIA)
! COD_ID: FW9093 | PAC_1: STN_TN08_9026_CEI003 <-> PAC_2: STN_TN08_9026_CEI003_S | Estado: F (Fechada)
! ------------------------------------------------------------------------------
New Line.SW_FW9093 Phases=3 Bus1=STN_TN08_9026_CEI003.1.2.3 Bus2=STN_TN08_9026_CEI003_S.1.2.3 Switch=y r1=0.0001 x1=0.0001 r0=0.0001 x0=0.0001 Length=0.001 Units=m ! HRC_FEEDER_SWITCH

New Line.SW_FT3677 Phases=3 Bus1=STN_TN08_9025_CEI024.1.2.3 Bus2=STN_TN08_9025_CEI024_S.1.2.3 Switch=y r1=0.0001 x1=0.0001 r0=0.0001 x0=0.0001 Length=0.001 Units=m ! Estado=F 9025_CEI024
New Line.SW_FT3861 Phases=3 Bus1=STN_TN08_9628_CEI024.1.2.3 Bus2=STN_TN08_9628_CEI024_S.1.2.3 Switch=y r1=0.0001 x1=0.0001 r0=0.0001 x0=0.0001 Length=0.001 Units=m ! Estado=F 9628_CEI024
New Line.SW_FT3678_DP_14820 Phases=3 Bus1=STN_TN08_9007_CEI06A.1.2.3 Bus2=STN_TN08_9007_CEI06A_S.1.2.3 Switch=y r1=0.0001 x1=0.0001 r0=0.0001 x0=0.0001 Length=0.001 Units=m ! Estado=F 9007_CEI06A
New Line.SW_FP6116 Phases=3 Bus1=STN_TN08_9028_CEI003.1.2.3 Bus2=STN_TN08_9028_CEI003_S.1.2.3 Switch=y r1=0.0001 x1=0.0001 r0=0.0001 x0=0.0001 Length=0.001 Units=m ! Estado=F 9028_CEI003
New Line.SW_FT3876 Phases=3 Bus1=STN_TN08_9100_CEI023.1.2.3 Bus2=STN_TN08_9100_CEI023_S.1.2.3 Switch=y r1=0.0001 x1=0.0001 r0=0.0001 x0=0.0001 Length=0.001 Units=m ! Estado=F 9100_CEI023
New Line.SW_FA9106 Phases=3 Bus1=STN_TN08_9156_CEI024.1.2.3 Bus2=STN_TN08_9156_CEI024_S.1.2.3 Switch=y r1=0.0001 x1=0.0001 r0=0.0001 x0=0.0001 Length=0.001 Units=m ! Estado=F 9156_CEI024
New Line.SW_FZ3273 Phases=3 Bus1=STN_TN08_9015_CEI024.1.2.3 Bus2=STN_TN08_9015_CEI024_S.1.2.3 Switch=y r1=0.0001 x1=0.0001 r0=0.0001 x0=0.0001 Length=0.001 Units=m ! Estado=F 9015_CEI024
New Line.SW_FZ4052 Phases=3 Bus1=STN_TN08_9208_CEI003.1.2.3 Bus2=STN_TN08_9208_CEI003_S.1.2.3 Switch=y r1=0.0001 x1=0.0001 r0=0.0001 x0=0.0001 Length=0.001 Units=m ! Estado=F 9208_CEI003
New Line.SW_FA2904 Phases=3 Bus1=STN_TN08_9016_CEI024.1.2.3 Bus2=STN_TN08_9016_CEI024_S.1.2.3 Switch=y r1=0.0001 x1=0.0001 r0=0.0001 x0=0.0001 Length=0.001 Units=m ! Estado=F 9016_CEI024
New Line.SW_FZ1692 Phases=3 Bus1=STN_TN08_9424_CEI024.1.2.3 Bus2=STN_TN08_9424_CEI024_S.1.2.3 Switch=y r1=0.0001 x1=0.0001 r0=0.0001 x0=0.0001 Length=0.001 Units=m ! Estado=F 9424_CEI024
New Line.SW_FW8013 Phases=3 Bus1=STN_TN08_9024_CEI003.1.2.3 Bus2=STN_TN08_9024_CEI003_S.1.2.3 Switch=y r1=0.0001 x1=0.0001 r0=0.0001 x0=0.0001 Length=0.001 Units=m ! Estado=F 9024_CEI003
New Line.SW_FP6856 Phases=3 Bus1=STN_TN08_9025_CEI003.1.2.3 Bus2=STN_TN08_9025_CEI003_S.1.2.3 Switch=y r1=0.0001 x1=0.0001 r0=0.0001 x0=0.0001 Length=0.001 Units=m ! Estado=F 9025_CEI003
New Line.SW_FIC0017 Phases=3 Bus1=STN_TN08_9133_CEI006.1.2.3 Bus2=STN_TN08_9133_CEI006_S.1.2.3 Switch=y r1=0.0001 x1=0.0001 r0=0.0001 x0=0.0001 Length=0.001 Units=m ! Estado=F 9133_CEI006
New Line.SW_FT6396 Phases=3 Bus1=STN_TN08_9091_CEI023.1.2.3 Bus2=STN_TN08_9091_CEI023_S.1.2.3 Switch=y r1=0.0001 x1=0.0001 r0=0.0001 x0=0.0001 Length=0.001 Units=m ! Estado=F 9091_CEI023
New Line.SW_FX2265 Phases=3 Bus1=STN_TN08_9090_CEI023.1.2.3 Bus2=STN_TN08_9090_CEI023_S.1.2.3 Switch=y r1=0.0001 x1=0.0001 r0=0.0001 x0=0.0001 Length=0.001 Units=m ! Estado=F 9090_CEI023
New Line.SW_FX3057 Phases=3 Bus1=STN_TN08_9418_CEI024.1.2.3 Bus2=STN_TN08_9418_CEI024_S.1.2.3 Switch=y r1=0.0001 x1=0.0001 r0=0.0001 x0=0.0001 Length=0.001 Units=m ! Estado=F 9418_CEI024
New Line.SW_FT3875 Phases=3 Bus1=STN_TN08_9095_CEI023.1.2.3 Bus2=STN_TN08_9095_CEI023_S.1.2.3 Switch=y r1=0.0001 x1=0.0001 r0=0.0001 x0=0.0001 Length=0.001 Units=m ! Estado=F 9095_CEI023
New Line.SW_FT3872 Phases=3 Bus1=STN_TN08_9606_CEI024.1.2.3 Bus2=STN_TN08_9606_CEI024_S.1.2.3 Switch=y r1=0.0001 x1=0.0001 r0=0.0001 x0=0.0001 Length=0.001 Units=m ! Estado=F 9606_CEI024
New Line.SW_FT3871 Phases=3 Bus1=STN_TN08_9137_CEI024.1.2.3 Bus2=STN_TN08_9137_CEI024_S.1.2.3 Switch=y r1=0.0001 x1=0.0001 r0=0.0001 x0=0.0001 Length=0.001 Units=m ! Estado=F 9137_CEI024
New Line.SW_FT3870 Phases=3 Bus1=STN_TN08_9600_CEI024.1.2.3 Bus2=STN_TN08_9600_CEI024_S.1.2.3 Switch=y r1=0.0001 x1=0.0001 r0=0.0001 x0=0.0001 Length=0.001 Units=m ! Estado=F 9600_CEI024
New Line.SW_FIC5234 Phases=3 Bus1=STN_TN08_9598_CEI024.1.2.3 Bus2=STN_TN08_9598_CEI024_S.1.2.3 Switch=y r1=0.0001 x1=0.0001 r0=0.0001 x0=0.0001 Length=0.001 Units=m ! Estado=F 9598_CEI024
New Line.SW_FW2608 Phases=3 Bus1=STN_TN08_9133_CEI024.1.2.3 Bus2=STN_TN08_9133_CEI024_S.1.2.3 Switch=y r1=0.0001 x1=0.0001 r0=0.0001 x0=0.0001 Length=0.001 Units=m ! Estado=F 9133_CEI024
New Line.SW_FW2733 Phases=3 Bus1=STN_TN08_9102_CEI023.1.2.3 Bus2=STN_TN08_9102_CEI023_S.1.2.3 Switch=y r1=0.0001 x1=0.0001 r0=0.0001 x0=0.0001 Length=0.001 Units=m ! Estado=F 9102_CEI023
New Line.SW_FW2849 Phases=3 Bus1=STN_TN08_9024_CEI024.1.2.3 Bus2=STN_TN08_9024_CEI024_S.1.2.3 Switch=y r1=0.0001 x1=0.0001 r0=0.0001 x0=0.0001 Length=0.001 Units=m ! Estado=F 9024_CEI024
New Line.SW_FIC5237 Phases=3 Bus1=STN_TN08_9212_CEI006.1.2.3 Bus2=STN_TN08_9212_CEI006_S.1.2.3 Switch=y r1=0.0001 x1=0.0001 r0=0.0001 x0=0.0001 Length=0.001 Units=m ! Estado=F 9212_CEI006
New Line.SW_FP7452 Phases=3 Bus1=STN_TN08_9124_CEI006.1.2.3 Bus2=STN_TN08_9124_CEI006_S.1.2.3 Switch=y r1=0.0001 x1=0.0001 r0=0.0001 x0=0.0001 Length=0.001 Units=m ! Estado=F 9124_CEI006
New Line.SW_FP6071 Phases=3 Bus1=STN_TN08_9221_CEI006.1.2.3 Bus2=STN_TN08_9221_CEI006_S.1.2.3 Switch=y r1=0.0001 x1=0.0001 r0=0.0001 x0=0.0001 Length=0.001 Units=m ! Estado=F 9221_CEI006
New Line.SW_FIC5240 Phases=3 Bus1=STN_TN08_9133_CEI006.1.2.3 Bus2=STN_TN08_9133_CEI006_S.1.2.3 Switch=y r1=0.0001 x1=0.0001 r0=0.0001 x0=0.0001 Length=0.001 Units=m ! Estado=F 9133_CEI006
New Line.SW_FZ4053 Phases=3 Bus1=STN_TN08_9120_CEI006.1.2.3 Bus2=STN_TN08_9120_CEI006_S.1.2.3 Switch=y r1=0.0001 x1=0.0001 r0=0.0001 x0=0.0001 Length=0.001 Units=m ! Estado=F 9120_CEI006
New Line.SW_FP0002 Phases=3 Bus1=STN_TN08_9211_CEI006.1.2.3 Bus2=STN_TN08_9211_CEI006_S.1.2.3 Switch=y r1=0.0001 x1=0.0001 r0=0.0001 x0=0.0001 Length=0.001 Units=m ! Estado=F 9211_CEI006
New Line.SW_FT3867_DP_30714 Phases=3 Bus1=STN_TN08_9024_CEI023.1.2.3 Bus2=STN_TN08_9024_CEI023_S.1.2.3 Switch=y r1=0.0001 x1=0.0001 r0=0.0001 x0=0.0001 Length=0.001 Units=m ! Estado=F 9024_CEI023
New Line.SW_FZ5994 Phases=3 Bus1=STN_TN08_9023_CEI023.1.2.3 Bus2=STN_TN08_9023_CEI023_S.1.2.3 Switch=y r1=0.0001 x1=0.0001 r0=0.0001 x0=0.0001 Length=0.001 Units=m ! Estado=F 9023_CEI023
New Line.SW_FT3829 Phases=3 Bus1=STN_TN08_9143_CEI024.1.2.3 Bus2=STN_TN08_9143_CEI024_S.1.2.3 Switch=y r1=0.0001 x1=0.0001 r0=0.0001 x0=0.0001 Length=0.001 Units=m ! Estado=F 9143_CEI024
New Line.SW_FA2017 Phases=3 Bus1=STN_TN08_9089_CEI023.1.2.3 Bus2=STN_TN08_9089_CEI023_S.1.2.3 Switch=y r1=0.0001 x1=0.0001 r0=0.0001 x0=0.0001 Length=0.001 Units=m ! Estado=F 9089_CEI023
New Line.SW_FX3120 Phases=3 Bus1=STN_TN08_9216_CEI006.1.2.3 Bus2=STN_TN08_9216_CEI006_S.1.2.3 Switch=y r1=0.0001 x1=0.0001 r0=0.0001 x0=0.0001 Length=0.001 Units=m ! Estado=F 9216_CEI006
New Line.SW_FT3549 Phases=3 Bus1=STN_TN08_9004_CEI06A.1.2.3 Bus2=STN_TN08_9004_CEI06A_S.1.2.3 Switch=y r1=0.0001 x1=0.0001 r0=0.0001 x0=0.0001 Length=0.001 Units=m ! Estado=F 9004_CEI06A
New Line.SW_FT3678_DP_43761 Phases=3 Bus1=STN_TN08_9026_CEI06A.1.2.3 Bus2=STN_TN08_9026_CEI06A_S.1.2.3 Switch=y r1=0.0001 x1=0.0001 r0=0.0001 x0=0.0001 Length=0.001 Units=m ! Estado=F 9026_CEI06A
New Line.SW_TN08_STN Phases=3 Bus1=TN_BA2138KV.1.2.3 Bus2=TN_ALTN08.1.2.3 Switch=y r1=0.0001 x1=0.0001 r0=0.0001 x0=0.0001 Length=0.001 Units=m ! Estado=F
New Line.SW_FA3860 Phases=3 Bus1=STN_TN08_9559_CEI024.1.2.3 Bus2=STN_TN08_9559_CEI024_S.1.2.3 Switch=y r1=0.0001 x1=0.0001 r0=0.0001 x0=0.0001 Length=0.001 Units=m ! Estado=F 9559_CEI024
New Line.SW_FA1161 Phases=3 Bus1=STN_TN08_9556_CEI024.1.2.3 Bus2=STN_TN08_9556_CEI024_S.1.2.3 Switch=y r1=0.0001 x1=0.0001 r0=0.0001 x0=0.0001 Length=0.001 Units=m ! Estado=F 9556_CEI024
New Line.SW_FX8985 Phases=3 Bus1=STN_TN08_9682_CEI024.1.2.3 Bus2=STN_TN08_9682_CEI024_S.1.2.3 Switch=y r1=0.0001 x1=0.0001 r0=0.0001 x0=0.0001 Length=0.001 Units=m ! Estado=F 9682_CEI024
New Line.SW_FX9218 Phases=3 Bus1=STN_TN08_9439_CEI024.1.2.3 Bus2=STN_TN08_9439_CEI024_S.1.2.3 Switch=y r1=0.0001 x1=0.0001 r0=0.0001 x0=0.0001 Length=0.001 Units=m ! Estado=F 9439_CEI024
New Line.SW_FIC3373 Phases=3 Bus1=STN_TN08_9560_CEI024.1.2.3 Bus2=STN_TN08_9560_CEI024_S.1.2.3 Switch=y r1=0.0001 x1=0.0001 r0=0.0001 x0=0.0001 Length=0.001 Units=m ! Estado=F 9560_CEI024
New Line.SW_FIC3374 Phases=3 Bus1=STN_TN08_9566_CEI024.1.2.3 Bus2=STN_TN08_9566_CEI024_S.1.2.3 Switch=y r1=0.0001 x1=0.0001 r0=0.0001 x0=0.0001 Length=0.001 Units=m ! Estado=F 9566_CEI024
New Line.SW_FU3536 Phases=3 Bus1=STN_TN08_9447_CEI024.1.2.3 Bus2=STN_TN08_9447_CEI024_S.1.2.3 Switch=y r1=0.0001 x1=0.0001 r0=0.0001 x0=0.0001 Length=0.001 Units=m ! Estado=F 9447_CEI024
New Line.SW_FZ5438 Phases=3 Bus1=STN_TN08_9437_CEI024.1.2.3 Bus2=STN_TN08_9437_CEI024_S.1.2.3 Switch=y r1=0.0001 x1=0.0001 r0=0.0001 x0=0.0001 Length=0.001 Units=m ! Estado=F 9437_CEI024
New Line.SW_FT3865 Phases=3 Bus1=STN_TN08_9567_CEI023.1.2.3 Bus2=STN_TN08_9567_CEI023_S.1.2.3 Switch=y r1=0.0001 x1=0.0001 r0=0.0001 x0=0.0001 Length=0.001 Units=m ! Estado=F 9567_CEI023
New Line.SW_FA3594 Phases=3 Bus1=STN_TN08_9005_CEI023.1.2.3 Bus2=STN_TN08_9005_CEI023_S.1.2.3 Switch=y r1=0.0001 x1=0.0001 r0=0.0001 x0=0.0001 Length=0.001 Units=m ! Estado=F 9005_CEI023
New Line.SW_FZ2944 Phases=3 Bus1=STN_TN08_9370_CEI023.1.2.3 Bus2=STN_TN08_9370_CEI023_S.1.2.3 Switch=y r1=0.0001 x1=0.0001 r0=0.0001 x0=0.0001 Length=0.001 Units=m ! Estado=F 9370_CEI023
New Line.SW_FU3670 Phases=3 Bus1=STN_TN08_9554_CEI024.1.2.3 Bus2=STN_TN08_9554_CEI024_S.1.2.3 Switch=y r1=0.0001 x1=0.0001 r0=0.0001 x0=0.0001 Length=0.001 Units=m ! Estado=F 9554_CEI024
New Line.SW_FT3863 Phases=3 Bus1=STN_TN08_9557_CEI023.1.2.3 Bus2=STN_TN08_9557_CEI023_S.1.2.3 Switch=y r1=0.0001 x1=0.0001 r0=0.0001 x0=0.0001 Length=0.001 Units=m ! Estado=F 9557_CEI023
New Line.SW_FT5703 Phases=3 Bus1=STN_TN08_9555_CEI023.1.2.3 Bus2=STN_TN08_9555_CEI023_S.1.2.3 Switch=y r1=0.0001 x1=0.0001 r0=0.0001 x0=0.0001 Length=0.001 Units=m ! Estado=F 9555_CEI023
New Line.SW_FT4051_DP_29553 Phases=3 Bus1=STN_TN08_9002_CEI023.1.2.3 Bus2=STN_TN08_9002_CEI023_S.1.2.3 Switch=y r1=0.0001 x1=0.0001 r0=0.0001 x0=0.0001 Length=0.001 Units=m ! Estado=F 9002_CEI023
New Line.SW_FIC5236 Phases=3 Bus1=STN_TN08_9568_CEI024.1.2.3 Bus2=STN_TN08_9568_CEI024_S.1.2.3 Switch=y r1=0.0001 x1=0.0001 r0=0.0001 x0=0.0001 Length=0.001 Units=m ! Estado=F 9568_CEI024
New Line.SW_FZ5095 Phases=3 Bus1=STN_TN08_9697_CEI024.1.2.3 Bus2=STN_TN08_9697_CEI024_S.1.2.3 Switch=y r1=0.0001 x1=0.0001 r0=0.0001 x0=0.0001 Length=0.001 Units=m ! Estado=F 9697_CEI024
New Line.SW_FT3862 Phases=3 Bus1=STN_TN08_9552_CEI023.1.2.3 Bus2=STN_TN08_9552_CEI023_S.1.2.3 Switch=y r1=0.0001 x1=0.0001 r0=0.0001 x0=0.0001 Length=0.001 Units=m ! Estado=F 9552_CEI023
New Line.SW_FT3864 Phases=3 Bus1=STN_TN08_9562_CEI023.1.2.3 Bus2=STN_TN08_9562_CEI023_S.1.2.3 Switch=y r1=0.0001 x1=0.0001 r0=0.0001 x0=0.0001 Length=0.001 Units=m ! Estado=F 9562_CEI023
New Line.SW_FT4782_DP_43387 Phases=3 Bus1=STN_TN08_9216_TAG20A.1.2.3 Bus2=STN_TN08_9216_TAG20A_S.1.2.3 Switch=y r1=0.0001 x1=0.0001 r0=0.0001 x0=0.0001 Length=0.001 Units=m ! Estado=F 9216_TAG20A

! ==============================================================================
! CHAVES NORMALMENTE ABERTAS (P_N_OPE == 'A') - INTERLIGACOES E CONTINGENCIA N-1
! ==============================================================================
New Line.SW_FA3749 Phases=3 Bus1=STN_TN08_9063_CEIRJ002_ATV.1.2.3 Bus2=STN_TN08_9063_CEIRJ002_ATV_S.1.2.3 Switch=y r1=0.0001 x1=0.0001 r0=0.0001 x0=0.0001 Length=0.001 Units=m ! Estado=A (Normalmente Aberta) 9063_CEIRJ002_ATV
Open Line.SW_FA3749 term=1
New Line.SW_FA8278 Phases=3 Bus1=STN_TN08_9539_CEI024.1.2.3 Bus2=STN_TN08_9539_CEI024_S.1.2.3 Switch=y r1=0.0001 x1=0.0001 r0=0.0001 x0=0.0001 Length=0.001 Units=m ! Estado=A (Normalmente Aberta) 9539_CEI024
Open Line.SW_FA8278 term=1
New Line.SW_FA9011 Phases=3 Bus1=STN_TN08_9690_CEI024.1.2.3 Bus2=STN_TN08_9690_CEI024_S.1.2.3 Switch=y r1=0.0001 x1=0.0001 r0=0.0001 x0=0.0001 Length=0.001 Units=m ! Estado=A (Normalmente Aberta) 9690_CEI024
Open Line.SW_FA9011 term=1
New Line.SW_FA3843 Phases=3 Bus1=STN_TN08_9624_CEI024.1.2.3 Bus2=STN_TN08_9624_CEI024_S.1.2.3 Switch=y r1=0.0001 x1=0.0001 r0=0.0001 x0=0.0001 Length=0.001 Units=m ! Estado=A (Normalmente Aberta) 9624_CEI024
Open Line.SW_FA3843 term=1
New Line.SW_FA3555 Phases=3 Bus1=STN_TN08_9026_CEI024.1.2.3 Bus2=STN_TN08_9026_CEI024_S.1.2.3 Switch=y r1=0.0001 x1=0.0001 r0=0.0001 x0=0.0001 Length=0.001 Units=m ! Estado=A (Normalmente Aberta) 9026_CEI024
Open Line.SW_FA3555 term=1
New Line.SW_FC3502 Phases=3 Bus1=STN_TN08_9009_CEI06A.1.2.3 Bus2=STN_TN08_9009_CEI06A_S.1.2.3 Switch=y r1=0.0001 x1=0.0001 r0=0.0001 x0=0.0001 Length=0.001 Units=m ! Estado=A (Normalmente Aberta) 9009_CEI06A
Open Line.SW_FC3502 term=1
New Line.SW_FA3578 Phases=3 Bus1=STN_TN08_9568_CEI023.1.2.3 Bus2=STN_TN08_9568_CEI023_S.1.2.3 Switch=y r1=0.0001 x1=0.0001 r0=0.0001 x0=0.0001 Length=0.001 Units=m ! Estado=A (Normalmente Aberta) 9568_CEI023
Open Line.SW_FA3578 term=1
