! OpenDSS Transformers - Circuito CN07 (SE SCN) | RUN_TAG: 20261019_124919
! Total de Transformadores MT/BT: 77

New Transformer.FT3927 Phases=3 Windings=2 XHL=1.900 %loadloss=1.667 %noloadloss=0.433
~ Wdg=1 Bus=SCN_CN07_9033_CEI031.1.2.3 kV=13.8 kVA=30.0 Conn=Delta %r=0.890
~ Wdg=2 Bus=FT3927_9033_CEI031.1.2.3.0 kV=0.380 kVA=30.0 Conn=Wye %r=0.890
New Transformer.FT3909 Phases=3 Windings=2 XHL=2.960 %loadloss=1.967 %noloadloss=0.500
~ Wdg=1 Bus=SCN_CN07_9036_CEIRJ002.1.2.3 kV=13.8 kVA=15.0 Conn=Delta %r=0.890
~ Wdg=2 Bus=FT3909_9036_CEIRJ002.1.2.3.0 kV=0.440 kVA=15.0 Conn=Wye %r=0.890
New Transformer.FZ1324 Phases=3 Windings=2 XHL=2.170 %loadloss=1.340 %noloadloss=0.340
~ Wdg=1 Bus=SCN_CN07_9250_CEI026.1.2.3 kV=13.8 kVA=75.0 Conn=Delta %r=0.710
~ Wdg=2 Bus=FZ1324_9250_CEI026.1.2.3.0 kV=0.380 kVA=75.0 Conn=Wye %r=0.710
New Transformer.FT3897 Phases=3 Windings=2 XHL=2.620 %loadloss=2.500 %noloadloss=0.650
~ Wdg=1 Bus=SCN_CN07_9854_CEI026.1.2.3 kV=13.8 kVA=20.0 Conn=Delta %r=1.010
~ Wdg=2 Bus=FT3897_9854_CEI026.1.2.3.0 kV=0.380 kVA=20.0 Conn=Wye %r=1.010
New Transformer.FT3896 Phases=3 Windings=2 XHL=2.140 %loadloss=1.522 %noloadloss=0.378
~ Wdg=1 Bus=SCN_CN07_9806_CEI026.1.2.3 kV=13.8 kVA=45.0 Conn=Delta %r=0.795
~ Wdg=2 Bus=FT3896_9806_CEI026.1.2.3.0 kV=0.380 kVA=45.0 Conn=Wye %r=0.795
New Transformer.FT3898 Phases=3 Windings=2 XHL=2.170 %loadloss=1.340 %noloadloss=0.340
~ Wdg=1 Bus=SCN_CN07_9258_CEI026.1.2.3 kV=13.8 kVA=75.0 Conn=Delta %r=0.710
~ Wdg=2 Bus=FT3898_9258_CEI026.1.2.3.0 kV=0.380 kVA=75.0 Conn=Wye %r=0.710
New Transformer.FT3908 Phases=3 Windings=2 XHL=2.170 %loadloss=1.340 %noloadloss=0.340
~ Wdg=1 Bus=SCN_CN07_9078_CEI031.1.2.3 kV=13.8 kVA=75.0 Conn=Delta %r=0.710
~ Wdg=2 Bus=FT3908_9078_CEI031.1.2.3.0 kV=0.380 kVA=75.0 Conn=Wye %r=0.710
New Transformer.FT3899 Phases=3 Windings=2 XHL=1.900 %loadloss=2.000 %noloadloss=0.520
~ Wdg=1 Bus=SCN_CN07_9010_CEI13B.1.2.3 kV=13.8 kVA=25.0 Conn=Delta %r=0.890
~ Wdg=2 Bus=FT3899_9010_CEI13B.1.2.3.0 kV=0.440 kVA=25.0 Conn=Wye %r=0.890
New Transformer.FZ0787 Phases=3 Windings=2 XHL=2.170 %loadloss=1.340 %noloadloss=0.340
~ Wdg=1 Bus=SCN_CN07_9086_CEI031.1.2.3 kV=13.8 kVA=75.0 Conn=Delta %r=0.710
~ Wdg=2 Bus=FZ0787_9086_CEI031.1.2.3.0 kV=0.380 kVA=75.0 Conn=Wye %r=0.710
New Transformer.FZ7264 Phases=3 Windings=2 XHL=2.170 %loadloss=1.340 %noloadloss=0.340
~ Wdg=1 Bus=SCN_CN07_9511_CEI026.1.2.3 kV=13.8 kVA=75.0 Conn=Delta %r=0.710
~ Wdg=2 Bus=FZ7264_9511_CEI026.1.2.3.0 kV=0.380 kVA=75.0 Conn=Wye %r=0.710
New Transformer.FT3895 Phases=3 Windings=2 XHL=2.140 %loadloss=1.522 %noloadloss=0.378
~ Wdg=1 Bus=SCN_CN07_9500_CEI026.1.2.3 kV=13.8 kVA=45.0 Conn=Delta %r=0.795
~ Wdg=2 Bus=FT3895_9500_CEI026.1.2.3.0 kV=0.380 kVA=45.0 Conn=Wye %r=0.795
New Transformer.FZ7829 Phases=3 Windings=2 XHL=2.170 %loadloss=1.340 %noloadloss=0.340
~ Wdg=1 Bus=SCN_CN07_9034_CEI013.1.2.3 kV=13.8 kVA=75.0 Conn=Delta %r=0.710
~ Wdg=2 Bus=FZ7829_9034_CEI013.1.2.3.0 kV=0.380 kVA=75.0 Conn=Wye %r=0.710
New Transformer.FX8569 Phases=3 Windings=2 XHL=2.620 %loadloss=2.500 %noloadloss=0.650
~ Wdg=1 Bus=SCN_CN07_9143_CEI280_ATV.1.2.3 kV=13.8 kVA=20.0 Conn=Delta %r=1.010
~ Wdg=2 Bus=FX8569_9143_CEI280_ATV.1.2.3.0 kV=0.380 kVA=20.0 Conn=Wye %r=1.010
New Transformer.FP0824 Phases=3 Windings=2 XHL=2.170 %loadloss=1.333 %noloadloss=0.347
~ Wdg=1 Bus=SCN_CN07_9810_CEI026.1.2.3 kV=13.8 kVA=112.5 Conn=Delta %r=0.710
~ Wdg=2 Bus=FP0824_9810_CEI026.1.2.3.0 kV=0.380 kVA=112.5 Conn=Wye %r=0.710
New Transformer.FZ7263 Phases=3 Windings=2 XHL=2.170 %loadloss=1.340 %noloadloss=0.340
~ Wdg=1 Bus=SCN_CN07_9527_CEI026.1.2.3 kV=13.8 kVA=75.0 Conn=Delta %r=0.710
~ Wdg=2 Bus=FZ7263_9527_CEI026.1.2.3.0 kV=0.380 kVA=75.0 Conn=Wye %r=0.710
New Transformer.FZ6245 Phases=3 Windings=2 XHL=2.170 %loadloss=1.340 %noloadloss=0.340
~ Wdg=1 Bus=SCN_CN07_9065_CEI013.1.2.3 kV=13.8 kVA=75.0 Conn=Delta %r=0.710
~ Wdg=2 Bus=FZ6245_9065_CEI013.1.2.3.0 kV=0.380 kVA=75.0 Conn=Wye %r=0.710
New Transformer.C11202_SUBT Phases=3 Windings=2 XHL=3.810 %loadloss=0.101 %noloadloss=0.026
~ Wdg=1 Bus=SCN_CN07_PT_TF_1364.1.2.3 kV=13.8 kVA=1000.0 Conn=Delta %r=0.840
~ Wdg=2 Bus=C11202_SUBT_PT_TF_1364.1.2.3.0 kV=0.380 kVA=1000.0 Conn=Wye %r=0.840
New Transformer.C11203_DP_1365_SUBT Phases=3 Windings=2 XHL=3.810 %loadloss=0.101 %noloadloss=0.026
~ Wdg=1 Bus=SCN_CN07_PT_TF_1365.1.2.3 kV=13.8 kVA=1000.0 Conn=Delta %r=0.840
~ Wdg=2 Bus=C11203_DP_1365_SUBT_PT_TF_1365.1.2.3.0 kV=0.380 kVA=1000.0 Conn=Wye %r=0.840
New Transformer.C11204_SUBT Phases=3 Windings=2 XHL=3.810 %loadloss=0.101 %noloadloss=0.026
~ Wdg=1 Bus=SCN_CN07_PT_TF_1366.1.2.3 kV=13.8 kVA=1000.0 Conn=Delta %r=0.840
~ Wdg=2 Bus=C11204_SUBT_PT_TF_1366.1.2.3.0 kV=0.380 kVA=1000.0 Conn=Wye %r=0.840
New Transformer.FT3789 Phases=3 Windings=2 XHL=2.170 %loadloss=1.127 %noloadloss=0.280
~ Wdg=1 Bus=SCN_CN07_9002_CEI035.1.2.3 kV=13.8 kVA=150.0 Conn=Delta %r=0.710
~ Wdg=2 Bus=FT3789_9002_CEI035.1.2.3.0 kV=0.380 kVA=150.0 Conn=Wye %r=0.710
New Transformer.FZ0969 Phases=3 Windings=2 XHL=2.170 %loadloss=1.218 %noloadloss=0.298
~ Wdg=1 Bus=SCN_CN07_9009_CEI035.1.2.3 kV=13.8 kVA=112.5 Conn=Delta %r=0.710
~ Wdg=2 Bus=FZ0969_9009_CEI035.1.2.3.0 kV=0.380 kVA=112.5 Conn=Wye %r=0.710
New Transformer.FT3768 Phases=3 Windings=2 XHL=2.170 %loadloss=1.218 %noloadloss=0.298
~ Wdg=1 Bus=SCN_CN07_9048_CEI041.1.2.3 kV=13.8 kVA=112.5 Conn=Delta %r=0.710
~ Wdg=2 Bus=FT3768_9048_CEI041.1.2.3.0 kV=0.380 kVA=112.5 Conn=Wye %r=0.710
New Transformer.FT3772 Phases=3 Windings=2 XHL=2.170 %loadloss=1.218 %noloadloss=0.298
~ Wdg=1 Bus=SCN_CN07_9060_CEI041.1.2.3 kV=13.8 kVA=112.5 Conn=Delta %r=0.710
~ Wdg=2 Bus=FT3772_9060_CEI041.1.2.3.0 kV=0.380 kVA=112.5 Conn=Wye %r=0.710
New Transformer.FM1169 Phases=3 Windings=2 XHL=2.170 %loadloss=1.340 %noloadloss=0.340
~ Wdg=1 Bus=SCN_CN07_9146_CEI041.1.2.3 kV=13.8 kVA=75.0 Conn=Delta %r=0.710
~ Wdg=2 Bus=FM1169_9146_CEI041.1.2.3.0 kV=0.380 kVA=75.0 Conn=Wye %r=0.710
New Transformer.FT3920 Phases=3 Windings=2 XHL=2.170 %loadloss=1.340 %noloadloss=0.340
~ Wdg=1 Bus=SCN_CN07_9147_CEI054.1.2.3 kV=13.8 kVA=75.0 Conn=Delta %r=0.710
~ Wdg=2 Bus=FT3920_9147_CEI054.1.2.3.0 kV=0.380 kVA=75.0 Conn=Wye %r=0.710
New Transformer.FT3894 Phases=3 Windings=2 XHL=2.140 %loadloss=1.522 %noloadloss=0.378
~ Wdg=1 Bus=SCN_CN07_9549_CEI027.1.2.3 kV=13.8 kVA=45.0 Conn=Delta %r=0.795
~ Wdg=2 Bus=FT3894_9549_CEI027.1.2.3.0 kV=0.380 kVA=45.0 Conn=Wye %r=0.795
New Transformer.FT3890 Phases=3 Windings=2 XHL=2.170 %loadloss=1.340 %noloadloss=0.340
~ Wdg=1 Bus=SCN_CN07_9818_CEI053.1.2.3 kV=13.8 kVA=75.0 Conn=Delta %r=0.710
~ Wdg=2 Bus=FT3890_9818_CEI053.1.2.3.0 kV=0.380 kVA=75.0 Conn=Wye %r=0.710
New Transformer.FT3887 Phases=3 Windings=2 XHL=2.170 %loadloss=1.340 %noloadloss=0.340
~ Wdg=1 Bus=SCN_CN07_9316_CEI035.1.2.3 kV=13.8 kVA=75.0 Conn=Delta %r=0.710
~ Wdg=2 Bus=FT3887_9316_CEI035.1.2.3.0 kV=0.380 kVA=75.0 Conn=Wye %r=0.710
New Transformer.FT3778 Phases=3 Windings=2 XHL=2.170 %loadloss=1.340 %noloadloss=0.340
~ Wdg=1 Bus=SCN_CN07_9215_CEI038.1.2.3 kV=13.8 kVA=75.0 Conn=Delta %r=0.710
~ Wdg=2 Bus=FT3778_9215_CEI038.1.2.3.0 kV=0.380 kVA=75.0 Conn=Wye %r=0.710
New Transformer.FT3776 Phases=3 Windings=2 XHL=2.170 %loadloss=1.340 %noloadloss=0.340
~ Wdg=1 Bus=SCN_CN07_9238_CEI038.1.2.3 kV=13.8 kVA=75.0 Conn=Delta %r=0.710
~ Wdg=2 Bus=FT3776_9238_CEI038.1.2.3.0 kV=0.380 kVA=75.0 Conn=Wye %r=0.710
New Transformer.FT3788 Phases=3 Windings=2 XHL=2.170 %loadloss=1.218 %noloadloss=0.298
~ Wdg=1 Bus=SCN_CN07_9268_CEI035.1.2.3 kV=13.8 kVA=112.5 Conn=Delta %r=0.710
~ Wdg=2 Bus=FT3788_9268_CEI035.1.2.3.0 kV=0.380 kVA=112.5 Conn=Wye %r=0.710
New Transformer.FT3884 Phases=3 Windings=2 XHL=2.170 %loadloss=1.340 %noloadloss=0.340
~ Wdg=1 Bus=SCN_CN07_9269_CEI041.1.2.3 kV=13.8 kVA=75.0 Conn=Delta %r=0.710
~ Wdg=2 Bus=FT3884_9269_CEI041.1.2.3.0 kV=0.380 kVA=75.0 Conn=Wye %r=0.710
New Transformer.FT3782 Phases=3 Windings=2 XHL=2.170 %loadloss=1.218 %noloadloss=0.298
~ Wdg=1 Bus=SCN_CN07_9168_CEI038.1.2.3 kV=13.8 kVA=112.5 Conn=Delta %r=0.710
~ Wdg=2 Bus=FT3782_9168_CEI038.1.2.3.0 kV=0.380 kVA=112.5 Conn=Wye %r=0.710
New Transformer.FT3918 Phases=3 Windings=2 XHL=2.170 %loadloss=1.218 %noloadloss=0.298
~ Wdg=1 Bus=SCN_CN07_9168_CEI054.1.2.3 kV=13.8 kVA=112.5 Conn=Delta %r=0.710
~ Wdg=2 Bus=FT3918_9168_CEI054.1.2.3.0 kV=0.380 kVA=112.5 Conn=Wye %r=0.710
New Transformer.FT3781 Phases=3 Windings=2 XHL=2.170 %loadloss=1.218 %noloadloss=0.298
~ Wdg=1 Bus=SCN_CN07_9171_CEI038.1.2.3 kV=13.8 kVA=112.5 Conn=Delta %r=0.710
~ Wdg=2 Bus=FT3781_9171_CEI038.1.2.3.0 kV=0.380 kVA=112.5 Conn=Wye %r=0.710
New Transformer.FM1383 Phases=3 Windings=2 XHL=2.170 %loadloss=1.127 %noloadloss=0.280
~ Wdg=1 Bus=SCN_CN07_9192_CEI038.1.2.3 kV=13.8 kVA=150.0 Conn=Delta %r=0.710
~ Wdg=2 Bus=FM1383_9192_CEI038.1.2.3.0 kV=0.380 kVA=150.0 Conn=Wye %r=0.710
New Transformer.FT3779 Phases=3 Windings=2 XHL=2.170 %loadloss=1.218 %noloadloss=0.298
~ Wdg=1 Bus=SCN_CN07_9195_CEI038.1.2.3 kV=13.8 kVA=112.5 Conn=Delta %r=0.710
~ Wdg=2 Bus=FT3779_9195_CEI038.1.2.3.0 kV=0.380 kVA=112.5 Conn=Wye %r=0.710
New Transformer.FT3916 Phases=3 Windings=2 XHL=2.140 %loadloss=1.522 %noloadloss=0.378
~ Wdg=1 Bus=SCN_CN07_9106_CEI32A.1.2.3 kV=13.8 kVA=45.0 Conn=Delta %r=0.795
~ Wdg=2 Bus=FT3916_9106_CEI32A.1.2.3.0 kV=0.380 kVA=45.0 Conn=Wye %r=0.795
New Transformer.FM1066 Phases=3 Windings=2 XHL=2.140 %loadloss=1.522 %noloadloss=0.378
~ Wdg=1 Bus=SCN_CN07_9108_CEI038.1.2.3 kV=13.8 kVA=45.0 Conn=Delta %r=0.795
~ Wdg=2 Bus=FM1066_9108_CEI038.1.2.3.0 kV=0.380 kVA=45.0 Conn=Wye %r=0.795
New Transformer.FT3915 Phases=3 Windings=2 XHL=2.620 %loadloss=2.500 %noloadloss=0.650
~ Wdg=1 Bus=SCN_CN07_9070_CEI32A.1.2.3 kV=13.8 kVA=20.0 Conn=Delta %r=1.010
~ Wdg=2 Bus=FT3915_9070_CEI32A.1.2.3.0 kV=0.380 kVA=20.0 Conn=Wye %r=1.010
New Transformer.FT3769 Phases=3 Windings=2 XHL=2.170 %loadloss=1.340 %noloadloss=0.340
~ Wdg=1 Bus=SCN_CN07_9051_CEI041.1.2.3 kV=13.8 kVA=75.0 Conn=Delta %r=0.710
~ Wdg=2 Bus=FT3769_9051_CEI041.1.2.3.0 kV=0.380 kVA=75.0 Conn=Wye %r=0.710
New Transformer.FT3771 Phases=3 Windings=2 XHL=2.170 %loadloss=1.218 %noloadloss=0.298
~ Wdg=1 Bus=SCN_CN07_9057_CEI041.1.2.3 kV=13.8 kVA=112.5 Conn=Delta %r=0.710
~ Wdg=2 Bus=FT3771_9057_CEI041.1.2.3.0 kV=0.380 kVA=112.5 Conn=Wye %r=0.710
New Transformer.FT3773 Phases=3 Windings=2 XHL=2.170 %loadloss=1.218 %noloadloss=0.298
~ Wdg=1 Bus=SCN_CN07_9063_CEI041.1.2.3 kV=13.8 kVA=112.5 Conn=Delta %r=0.710
~ Wdg=2 Bus=FT3773_9063_CEI041.1.2.3.0 kV=0.380 kVA=112.5 Conn=Wye %r=0.710
New Transformer.FT3910 Phases=3 Windings=2 XHL=2.170 %loadloss=1.340 %noloadloss=0.340
~ Wdg=1 Bus=SCN_CN07_9040_CEI031.1.2.3 kV=13.8 kVA=75.0 Conn=Delta %r=0.710
~ Wdg=2 Bus=FT3910_9040_CEI031.1.2.3.0 kV=0.380 kVA=75.0 Conn=Wye %r=0.710
New Transformer.FZ4255 Phases=3 Windings=2 XHL=2.620 %loadloss=2.500 %noloadloss=0.650
~ Wdg=1 Bus=SCN_CN07_9491_CEI027.1.2.3 kV=13.8 kVA=20.0 Conn=Delta %r=1.010
~ Wdg=2 Bus=FZ4255_9491_CEI027.1.2.3.0 kV=0.380 kVA=20.0 Conn=Wye %r=1.010
New Transformer.FT3767 Phases=3 Windings=2 XHL=2.170 %loadloss=1.340 %noloadloss=0.340
~ Wdg=1 Bus=SCN_CN07_9045_CEI041.1.2.3 kV=13.8 kVA=75.0 Conn=Delta %r=0.710
~ Wdg=2 Bus=FT3767_9045_CEI041.1.2.3.0 kV=0.380 kVA=75.0 Conn=Wye %r=0.710
New Transformer.FT3893 Phases=3 Windings=2 XHL=2.170 %loadloss=1.340 %noloadloss=0.340
~ Wdg=1 Bus=SCN_CN07_9367_CEI027.1.2.3 kV=13.8 kVA=75.0 Conn=Delta %r=0.710
~ Wdg=2 Bus=FT3893_9367_CEI027.1.2.3.0 kV=0.380 kVA=75.0 Conn=Wye %r=0.710
New Transformer.FZ0867 Phases=3 Windings=2 XHL=2.170 %loadloss=1.127 %noloadloss=0.280
~ Wdg=1 Bus=SCN_CN07_9207_CEI041.1.2.3 kV=13.8 kVA=150.0 Conn=Delta %r=0.710
~ Wdg=2 Bus=FZ0867_9207_CEI041.1.2.3.0 kV=0.380 kVA=150.0 Conn=Wye %r=0.710
New Transformer.FX1397 Phases=3 Windings=2 XHL=2.170 %loadloss=1.340 %noloadloss=0.340
~ Wdg=1 Bus=SCN_CN07_9091_CEIRJ001_ATV.1.2.3 kV=13.8 kVA=75.0 Conn=Delta %r=0.710
~ Wdg=2 Bus=FX1397_9091_CEIRJ001_ATV.1.2.3.0 kV=0.380 kVA=75.0 Conn=Wye %r=0.710
New Transformer.FZ0786 Phases=3 Windings=2 XHL=2.170 %loadloss=1.218 %noloadloss=0.298
~ Wdg=1 Bus=SCN_CN07_9218_CEI038.1.2.3 kV=13.8 kVA=112.5 Conn=Delta %r=0.710
~ Wdg=2 Bus=FZ0786_9218_CEI038.1.2.3.0 kV=0.380 kVA=112.5 Conn=Wye %r=0.710
New Transformer.FT3792 Phases=3 Windings=2 XHL=2.170 %loadloss=1.340 %noloadloss=0.340
~ Wdg=1 Bus=SCN_CN07_9019_CEI035.1.2.3 kV=13.8 kVA=75.0 Conn=Delta %r=0.710
~ Wdg=2 Bus=FT3792_9019_CEI035.1.2.3.0 kV=0.380 kVA=75.0 Conn=Wye %r=0.710
New Transformer.FT3786 Phases=3 Windings=2 XHL=2.170 %loadloss=1.218 %noloadloss=0.298
~ Wdg=1 Bus=SCN_CN07_9238_CEI035.1.2.3 kV=13.8 kVA=112.5 Conn=Delta %r=0.710
~ Wdg=2 Bus=FT3786_9238_CEI035.1.2.3.0 kV=0.380 kVA=112.5 Conn=Wye %r=0.710
New Transformer.FIC1348 Phases=3 Windings=2 XHL=2.170 %loadloss=1.218 %noloadloss=0.298
~ Wdg=1 Bus=SCN_CN07_9240_CEI041.1.2.3 kV=13.8 kVA=112.5 Conn=Delta %r=0.710
~ Wdg=2 Bus=FIC1348_9240_CEI041.1.2.3.0 kV=0.380 kVA=112.5 Conn=Wye %r=0.710
New Transformer.FX5059 Phases=3 Windings=2 XHL=2.170 %loadloss=1.340 %noloadloss=0.340
~ Wdg=1 Bus=SCN_CN07_9141_CEI054.1.2.3 kV=13.8 kVA=75.0 Conn=Delta %r=0.710
~ Wdg=2 Bus=FX5059_9141_CEI054.1.2.3.0 kV=0.380 kVA=75.0 Conn=Wye %r=0.710
New Transformer.FZ3124 Phases=3 Windings=2 XHL=2.170 %loadloss=1.340 %noloadloss=0.340
~ Wdg=1 Bus=SCN_CN07_9143_CEI038.1.2.3 kV=13.8 kVA=75.0 Conn=Delta %r=0.710
~ Wdg=2 Bus=FZ3124_9143_CEI038.1.2.3.0 kV=0.380 kVA=75.0 Conn=Wye %r=0.710
New Transformer.FT3787 Phases=3 Windings=2 XHL=2.170 %loadloss=1.218 %noloadloss=0.298
~ Wdg=1 Bus=SCN_CN07_9254_CEI035.1.2.3 kV=13.8 kVA=112.5 Conn=Delta %r=0.710
~ Wdg=2 Bus=FT3787_9254_CEI035.1.2.3.0 kV=0.380 kVA=112.5 Conn=Wye %r=0.710
New Transformer.FP4076 Phases=3 Windings=2 XHL=1.900 %loadloss=1.817 %noloadloss=0.500
~ Wdg=1 Bus=SCN_CN07_9319_CEI035.1.2.3 kV=13.8 kVA=30.0 Conn=Delta %r=0.890
~ Wdg=2 Bus=FP4076_9319_CEI035.1.2.3.0 kV=0.380 kVA=30.0 Conn=Wye %r=0.890
New Transformer.FIC1318 Phases=3 Windings=2 XHL=1.900 %loadloss=1.667 %noloadloss=0.433
~ Wdg=1 Bus=SCN_CN07_9141_CEI051.1.2.3 kV=13.8 kVA=30.0 Conn=Delta %r=0.890
~ Wdg=2 Bus=FIC1318_9141_CEI051.1.2.3.0 kV=0.380 kVA=30.0 Conn=Wye %r=0.890
New Transformer.FT3886 Phases=3 Windings=2 XHL=2.170 %loadloss=1.340 %noloadloss=0.340
~ Wdg=1 Bus=SCN_CN07_9133_CEI038.1.2.3 kV=13.8 kVA=75.0 Conn=Delta %r=0.710
~ Wdg=2 Bus=FT3886_9133_CEI038.1.2.3.0 kV=0.380 kVA=75.0 Conn=Wye %r=0.710
New Transformer.FT3889 Phases=3 Windings=2 XHL=2.140 %loadloss=1.522 %noloadloss=0.378
~ Wdg=1 Bus=SCN_CN07_9805_CEI053.1.2.3 kV=13.8 kVA=45.0 Conn=Delta %r=0.795
~ Wdg=2 Bus=FT3889_9805_CEI053.1.2.3.0 kV=0.380 kVA=45.0 Conn=Wye %r=0.795
New Transformer.FT3891 Phases=3 Windings=2 XHL=2.620 %loadloss=2.500 %noloadloss=0.650
~ Wdg=1 Bus=SCN_CN07_9812_CEI053.1.2.3 kV=13.8 kVA=20.0 Conn=Delta %r=1.010
~ Wdg=2 Bus=FT3891_9812_CEI053.1.2.3.0 kV=0.380 kVA=20.0 Conn=Wye %r=1.010
New Transformer.FT3913 Phases=3 Windings=2 XHL=1.900 %loadloss=1.667 %noloadloss=0.433
~ Wdg=1 Bus=SCN_CN07_9055_CEI32A.1.2.3 kV=13.8 kVA=30.0 Conn=Delta %r=0.890
~ Wdg=2 Bus=FT3913_9055_CEI32A.1.2.3.0 kV=0.380 kVA=30.0 Conn=Wye %r=0.890
New Transformer.FT3912 Phases=3 Windings=2 XHL=2.960 %loadloss=1.800 %noloadloss=0.450
~ Wdg=1 Bus=SCN_CN07_9044_CEI32A.1.2.3 kV=13.8 kVA=10.0 Conn=Delta %r=0.890
~ Wdg=2 Bus=FT3912_9044_CEI32A.1.2.3.0 kV=0.440 kVA=10.0 Conn=Wye %r=0.890
New Transformer.FT3885 Phases=3 Windings=2 XHL=2.170 %loadloss=1.340 %noloadloss=0.340
~ Wdg=1 Bus=SCN_CN07_9156_CEI038.1.2.3 kV=13.8 kVA=75.0 Conn=Delta %r=0.710
~ Wdg=2 Bus=FT3885_9156_CEI038.1.2.3.0 kV=0.380 kVA=75.0 Conn=Wye %r=0.710
New Transformer.FT3917 Phases=3 Windings=2 XHL=2.960 %loadloss=1.600 %noloadloss=0.400
~ Wdg=1 Bus=SCN_CN07_9111_CEI32A.1.2.3 kV=13.8 kVA=15.0 Conn=Delta %r=0.890
~ Wdg=2 Bus=FT3917_9111_CEI32A.1.2.3.0 kV=0.440 kVA=15.0 Conn=Wye %r=0.890
New Transformer.FT3770 Phases=3 Windings=2 XHL=2.170 %loadloss=1.218 %noloadloss=0.298
~ Wdg=1 Bus=SCN_CN07_9054_CEI041.1.2.3 kV=13.8 kVA=112.5 Conn=Delta %r=0.710
~ Wdg=2 Bus=FT3770_9054_CEI041.1.2.3.0 kV=0.380 kVA=112.5 Conn=Wye %r=0.710
New Transformer.FT3892 Phases=3 Windings=2 XHL=1.900 %loadloss=1.667 %noloadloss=0.433
~ Wdg=1 Bus=SCN_CN07_9849_CEI053.1.2.3 kV=13.8 kVA=30.0 Conn=Delta %r=0.890
~ Wdg=2 Bus=FT3892_9849_CEI053.1.2.3.0 kV=0.380 kVA=30.0 Conn=Wye %r=0.890
New Transformer.FP4501 Phases=3 Windings=2 XHL=2.170 %loadloss=1.233 %noloadloss=0.323
~ Wdg=1 Bus=SCN_CN07_9267_CEI041.1.2.3 kV=13.8 kVA=150.0 Conn=Delta %r=0.710
~ Wdg=2 Bus=FP4501_9267_CEI041.1.2.3.0 kV=0.380 kVA=150.0 Conn=Wye %r=0.710
New Transformer.FT1938 Phases=3 Windings=2 XHL=2.170 %loadloss=1.340 %noloadloss=0.340
~ Wdg=1 Bus=SCN_CN07_9547_CEI027.1.2.3 kV=13.8 kVA=75.0 Conn=Delta %r=0.710
~ Wdg=2 Bus=FT1938_9547_CEI027.1.2.3.0 kV=0.380 kVA=75.0 Conn=Wye %r=0.710
New Transformer.FP0808 Phases=3 Windings=2 XHL=2.140 %loadloss=1.667 %noloadloss=0.433
~ Wdg=1 Bus=SCN_CN07_9579_CEI027.1.2.3 kV=13.8 kVA=45.0 Conn=Delta %r=0.795
~ Wdg=2 Bus=FP0808_9579_CEI027.1.2.3.0 kV=0.380 kVA=45.0 Conn=Wye %r=0.795
New Transformer.FT1934 Phases=3 Windings=2 XHL=2.140 %loadloss=1.522 %noloadloss=0.378
~ Wdg=1 Bus=SCN_CN07_9583_CEI027.1.2.3 kV=13.8 kVA=45.0 Conn=Delta %r=0.795
~ Wdg=2 Bus=FT1934_9583_CEI027.1.2.3.0 kV=0.380 kVA=45.0 Conn=Wye %r=0.795
New Transformer.FT3883 Phases=3 Windings=2 XHL=2.170 %loadloss=1.127 %noloadloss=0.280
~ Wdg=1 Bus=SCN_CN07_9279_CEI041.1.2.3 kV=13.8 kVA=150.0 Conn=Delta %r=0.710
~ Wdg=2 Bus=FT3883_9279_CEI041.1.2.3.0 kV=0.380 kVA=150.0 Conn=Wye %r=0.710
New Transformer.FT3888 Phases=3 Windings=2 XHL=2.620 %loadloss=2.500 %noloadloss=0.650
~ Wdg=1 Bus=SCN_CN07_9281_CEI035.1.2.3 kV=13.8 kVA=20.0 Conn=Delta %r=1.010
~ Wdg=2 Bus=FT3888_9281_CEI035.1.2.3.0 kV=0.380 kVA=20.0 Conn=Wye %r=1.010
New Transformer.FT3761 Phases=3 Windings=2 XHL=2.170 %loadloss=1.060 %noloadloss=0.249
~ Wdg=1 Bus=SCN_CN07_9192_CEI041.1.2.3 kV=13.8 kVA=225.0 Conn=Delta %r=0.710
~ Wdg=2 Bus=FT3761_9192_CEI041.1.2.3.0 kV=0.380 kVA=225.0 Conn=Wye %r=0.710
New Transformer.FT3763 Phases=3 Windings=2 XHL=2.170 %loadloss=1.127 %noloadloss=0.280
~ Wdg=1 Bus=SCN_CN07_9222_CEI041.1.2.3 kV=13.8 kVA=150.0 Conn=Delta %r=0.710
~ Wdg=2 Bus=FT3763_9222_CEI041.1.2.3.0 kV=0.380 kVA=150.0 Conn=Wye %r=0.710
New Transformer.C11360_SUBT Phases=3 Windings=2 XHL=3.810 %loadloss=0.101 %noloadloss=0.026
~ Wdg=1 Bus=SCN_CN07_PT_TF_1376.1.2.3 kV=13.8 kVA=1000.0 Conn=Delta %r=0.840
~ Wdg=2 Bus=C11360_SUBT_PT_TF_1376.1.2.3.0 kV=0.380 kVA=1000.0 Conn=Wye %r=0.840
New Transformer.C11361_SUBT Phases=3 Windings=2 XHL=3.810 %loadloss=0.101 %noloadloss=0.026
~ Wdg=1 Bus=SCN_CN07_PT_TF_1377.1.2.3 kV=13.8 kVA=1000.0 Conn=Delta %r=0.840
~ Wdg=2 Bus=C11361_SUBT_PT_TF_1377.1.2.3.0 kV=0.380 kVA=1000.0 Conn=Wye %r=0.840
