! OpenDSS Transformers - Subestacao SHP (HP03 / HP04) | RUN_TAG: 20261019_163920
! Transformadores MT/BT: 54

New Transformer.FT0397 Phases=3 Windings=2 XHL=2.170 %loadloss=1.340 %noloadloss=0.340
~ Wdg=1 Bus=SHP_HP03_9067_BSBRJ012_ATV.1.2.3 kV=13.8 kVA=75.0 Conn=Delta %r=0.710
~ Wdg=2 Bus=FT0397_9067_BSBRJ012_ATV.1.2.3.0 kV=0.380 kVA=75.0 Conn=Wye %r=0.710
New Transformer.FF2256 Phases=3 Windings=2 XHL=2.960 %loadloss=1.967 %noloadloss=0.500
~ Wdg=1 Bus=SHP_HP03_9117_BSB029.1.2.3 kV=13.8 kVA=15.0 Conn=Delta %r=0.890
~ Wdg=2 Bus=FF2256_9117_BSB029.1.2.3.0 kV=0.440 kVA=15.0 Conn=Wye %r=0.890
New Transformer.FP6342 Phases=3 Windings=2 XHL=2.170 %loadloss=1.160 %noloadloss=0.289
~ Wdg=1 Bus=SHP_HP04_9025_BSB27A.1.2.3 kV=13.8 kVA=225.0 Conn=Delta %r=0.710
~ Wdg=2 Bus=FP6342_9025_BSB27A.1.2.3.0 kV=0.380 kVA=225.0 Conn=Wye %r=0.710
New Transformer.FT0411 Phases=3 Windings=2 XHL=1.900 %loadloss=1.667 %noloadloss=0.433
~ Wdg=1 Bus=SHP_HP04_9051_BSB026.1.2.3 kV=13.8 kVA=30.0 Conn=Delta %r=0.890
~ Wdg=2 Bus=FT0411_9051_BSB026.1.2.3.0 kV=0.380 kVA=30.0 Conn=Wye %r=0.890
New Transformer.FZ6744 Phases=3 Windings=2 XHL=2.960 %loadloss=1.600 %noloadloss=0.400
~ Wdg=1 Bus=SHP_HP04_9041_BSB026.1.2.3 kV=13.8 kVA=15.0 Conn=Delta %r=0.890
~ Wdg=2 Bus=FZ6744_9041_BSB026.1.2.3.0 kV=0.440 kVA=15.0 Conn=Wye %r=0.890
New Transformer.FP7825 Phases=3 Windings=2 XHL=2.170 %loadloss=1.333 %noloadloss=0.347
~ Wdg=1 Bus=SHP_HP03_9010_BSB034.1.2.3 kV=13.8 kVA=112.5 Conn=Delta %r=0.710
~ Wdg=2 Bus=FP7825_9010_BSB034.1.2.3.0 kV=0.380 kVA=112.5 Conn=Wye %r=0.710
New Transformer.FT0396 Phases=3 Windings=2 XHL=2.620 %loadloss=2.500 %noloadloss=0.650
~ Wdg=1 Bus=SHP_HP03_9013_BSB025.1.2.3 kV=13.8 kVA=20.0 Conn=Delta %r=1.010
~ Wdg=2 Bus=FT0396_9013_BSB025.1.2.3.0 kV=0.380 kVA=20.0 Conn=Wye %r=1.010
New Transformer.FA7351 Phases=3 Windings=2 XHL=2.960 %loadloss=1.600 %noloadloss=0.400
~ Wdg=1 Bus=SHP_HP04_9338_BSB025.1.2.3 kV=13.8 kVA=15.0 Conn=Delta %r=0.890
~ Wdg=2 Bus=FA7351_9338_BSB025.1.2.3.0 kV=0.440 kVA=15.0 Conn=Wye %r=0.890
New Transformer.FIC0525 Phases=3 Windings=2 XHL=2.140 %loadloss=1.522 %noloadloss=0.378
~ Wdg=1 Bus=SHP_HP03_9004_BSB030.1.2.3 kV=13.8 kVA=45.0 Conn=Delta %r=0.795
~ Wdg=2 Bus=FIC0525_9004_BSB030.1.2.3.0 kV=0.380 kVA=45.0 Conn=Wye %r=0.795
New Transformer.FT0395 Phases=3 Windings=2 XHL=2.170 %loadloss=1.340 %noloadloss=0.340
~ Wdg=1 Bus=SHP_HP03_9007_BSB034.1.2.3 kV=13.8 kVA=75.0 Conn=Delta %r=0.710
~ Wdg=2 Bus=FT0395_9007_BSB034.1.2.3.0 kV=0.380 kVA=75.0 Conn=Wye %r=0.710
New Transformer.FT0403 Phases=3 Windings=2 XHL=2.620 %loadloss=2.500 %noloadloss=0.650
~ Wdg=1 Bus=SHP_HP03_9008_BSB030.1.2.3 kV=13.8 kVA=20.0 Conn=Delta %r=1.010
~ Wdg=2 Bus=FT0403_9008_BSB030.1.2.3.0 kV=0.380 kVA=20.0 Conn=Wye %r=1.010
New Transformer.FT0383 Phases=3 Windings=2 XHL=2.620 %loadloss=2.500 %noloadloss=0.650
~ Wdg=1 Bus=SHP_HP04_9146_BSB029.1.2.3 kV=13.8 kVA=20.0 Conn=Delta %r=1.010
~ Wdg=2 Bus=FT0383_9146_BSB029.1.2.3.0 kV=0.380 kVA=20.0 Conn=Wye %r=1.010
New Transformer.FZ3311 Phases=3 Windings=2 XHL=2.620 %loadloss=2.500 %noloadloss=0.650
~ Wdg=1 Bus=SHP_HP04_9141_BSB029.1.2.3 kV=13.8 kVA=20.0 Conn=Delta %r=1.010
~ Wdg=2 Bus=FZ3311_9141_BSB029.1.2.3.0 kV=0.380 kVA=20.0 Conn=Wye %r=1.010
New Transformer.FX4946 Phases=3 Windings=2 XHL=2.620 %loadloss=2.500 %noloadloss=0.650
~ Wdg=1 Bus=SHP_HP03_9251_BSB025.1.2.3 kV=13.8 kVA=20.0 Conn=Delta %r=1.010
~ Wdg=2 Bus=FX4946_9251_BSB025.1.2.3.0 kV=0.380 kVA=20.0 Conn=Wye %r=1.010
New Transformer.FT4721 Phases=3 Windings=2 XHL=2.960 %loadloss=1.800 %noloadloss=0.450
~ Wdg=1 Bus=SHP_HP03_9264_BSB025.1.2.3 kV=13.8 kVA=10.0 Conn=Delta %r=0.890
~ Wdg=2 Bus=FT4721_9264_BSB025.1.2.3.0 kV=0.440 kVA=10.0 Conn=Wye %r=0.890
New Transformer.FT0390 Phases=3 Windings=2 XHL=1.900 %loadloss=1.667 %noloadloss=0.433
~ Wdg=1 Bus=SHP_HP03_9174_BSB040.1.2.3 kV=13.8 kVA=30.0 Conn=Delta %r=0.890
~ Wdg=2 Bus=FT0390_9174_BSB040.1.2.3.0 kV=0.380 kVA=30.0 Conn=Wye %r=0.890
New Transformer.FX4888 Phases=3 Windings=2 XHL=2.960 %loadloss=1.967 %noloadloss=0.500
~ Wdg=1 Bus=SHP_HP03_9114_BSB029.1.2.3 kV=13.8 kVA=15.0 Conn=Delta %r=0.890
~ Wdg=2 Bus=FX4888_9114_BSB029.1.2.3.0 kV=0.440 kVA=15.0 Conn=Wye %r=0.890
New Transformer.FT2676 Phases=3 Windings=2 XHL=2.620 %loadloss=2.500 %noloadloss=0.650
~ Wdg=1 Bus=SHP_HP04_9029_BSB27A.1.2.3 kV=13.8 kVA=20.0 Conn=Delta %r=1.010
~ Wdg=2 Bus=FT2676_9029_BSB27A.1.2.3.0 kV=0.380 kVA=20.0 Conn=Wye %r=1.010
New Transformer.FT0418 Phases=3 Windings=2 XHL=2.620 %loadloss=2.500 %noloadloss=0.650
~ Wdg=1 Bus=SHP_HP03_9069_BSB27A.1.2.3 kV=13.8 kVA=20.0 Conn=Delta %r=1.010
~ Wdg=2 Bus=FT0418_9069_BSB27A.1.2.3.0 kV=0.380 kVA=20.0 Conn=Wye %r=1.010
New Transformer.FT0407 Phases=3 Windings=2 XHL=2.620 %loadloss=2.500 %noloadloss=0.650
~ Wdg=1 Bus=SHP_HP03_9056_BSB027.1.2.3 kV=13.8 kVA=20.0 Conn=Delta %r=1.010
~ Wdg=2 Bus=FT0407_9056_BSB027.1.2.3.0 kV=0.380 kVA=20.0 Conn=Wye %r=1.010
New Transformer.FT0410 Phases=3 Windings=2 XHL=2.960 %loadloss=1.967 %noloadloss=0.500
~ Wdg=1 Bus=SHP_HP04_9058_BSB026.1.2.3 kV=13.8 kVA=15.0 Conn=Delta %r=0.890
~ Wdg=2 Bus=FT0410_9058_BSB026.1.2.3.0 kV=0.440 kVA=15.0 Conn=Wye %r=0.890
New Transformer.FZ1927 Phases=3 Windings=2 XHL=2.960 %loadloss=1.967 %noloadloss=0.500
~ Wdg=1 Bus=SHP_HP04_9061_BSB027.1.2.3 kV=13.8 kVA=15.0 Conn=Delta %r=0.890
~ Wdg=2 Bus=FZ1927_9061_BSB027.1.2.3.0 kV=0.440 kVA=15.0 Conn=Wye %r=0.890
New Transformer.FZ3460 Phases=3 Windings=2 XHL=2.960 %loadloss=1.900 %noloadloss=0.600
~ Wdg=1 Bus=SHP_HP03_9168_BSB029.1.2.3 kV=13.8 kVA=5.0 Conn=Delta %r=0.890
~ Wdg=2 Bus=FZ3460_9168_BSB029.1.2.3.0 kV=0.440 kVA=5.0 Conn=Wye %r=0.890
New Transformer.FZ5921 Phases=3 Windings=2 XHL=2.960 %loadloss=1.967 %noloadloss=0.500
~ Wdg=1 Bus=SHP_HP03_9108_BSB028.1.2.3 kV=13.8 kVA=15.0 Conn=Delta %r=0.890
~ Wdg=2 Bus=FZ5921_9108_BSB028.1.2.3.0 kV=0.440 kVA=15.0 Conn=Wye %r=0.890
New Transformer.FP6075 Phases=3 Windings=2 XHL=2.170 %loadloss=1.333 %noloadloss=0.347
~ Wdg=1 Bus=SHP_HP03_9104_BSB029.1.2.3 kV=13.8 kVA=112.5 Conn=Delta %r=0.710
~ Wdg=2 Bus=FP6075_9104_BSB029.1.2.3.0 kV=0.380 kVA=112.5 Conn=Wye %r=0.710
New Transformer.FP2743 Phases=3 Windings=2 XHL=2.140 %loadloss=1.522 %noloadloss=0.378
~ Wdg=1 Bus=SHP_HP03_9181_BSB27A.1.2.3 kV=13.8 kVA=45.0 Conn=Delta %r=0.795
~ Wdg=2 Bus=FP2743_9181_BSB27A.1.2.3.0 kV=0.380 kVA=45.0 Conn=Wye %r=0.795
New Transformer.FT0391 Phases=3 Windings=2 XHL=2.170 %loadloss=1.340 %noloadloss=0.340
~ Wdg=1 Bus=SHP_HP03_9179_BSB040.1.2.3 kV=13.8 kVA=75.0 Conn=Delta %r=0.710
~ Wdg=2 Bus=FT0391_9179_BSB040.1.2.3.0 kV=0.380 kVA=75.0 Conn=Wye %r=0.710
New Transformer.FP6355 Phases=3 Windings=2 XHL=2.170 %loadloss=1.233 %noloadloss=0.323
~ Wdg=1 Bus=SHP_HP03_9201_BSB040.1.2.3 kV=13.8 kVA=150.0 Conn=Delta %r=0.710
~ Wdg=2 Bus=FP6355_9201_BSB040.1.2.3.0 kV=0.380 kVA=150.0 Conn=Wye %r=0.710
New Transformer.FT0413 Phases=3 Windings=2 XHL=2.960 %loadloss=1.967 %noloadloss=0.500
~ Wdg=1 Bus=SHP_HP04_9426_BSB025.1.2.3 kV=13.8 kVA=15.0 Conn=Delta %r=0.890
~ Wdg=2 Bus=FT0413_9426_BSB025.1.2.3.0 kV=0.440 kVA=15.0 Conn=Wye %r=0.890
New Transformer.FT0412 Phases=3 Windings=2 XHL=2.960 %loadloss=1.967 %noloadloss=0.500
~ Wdg=1 Bus=SHP_HP04_9435_BSB025.1.2.3 kV=13.8 kVA=15.0 Conn=Delta %r=0.890
~ Wdg=2 Bus=FT0412_9435_BSB025.1.2.3.0 kV=0.440 kVA=15.0 Conn=Wye %r=0.890
New Transformer.FT0409 Phases=3 Windings=2 XHL=2.960 %loadloss=1.967 %noloadloss=0.500
~ Wdg=1 Bus=SHP_HP04_9438_BSB025.1.2.3 kV=13.8 kVA=15.0 Conn=Delta %r=0.890
~ Wdg=2 Bus=FT0409_9438_BSB025.1.2.3.0 kV=0.440 kVA=15.0 Conn=Wye %r=0.890
New Transformer.FT0408 Phases=3 Windings=2 XHL=2.620 %loadloss=2.500 %noloadloss=0.650
~ Wdg=1 Bus=SHP_HP04_9442_BSB025.1.2.3 kV=13.8 kVA=20.0 Conn=Delta %r=1.010
~ Wdg=2 Bus=FT0408_9442_BSB025.1.2.3.0 kV=0.380 kVA=20.0 Conn=Wye %r=1.010
New Transformer.FT0393 Phases=3 Windings=2 XHL=2.170 %loadloss=1.340 %noloadloss=0.340
~ Wdg=1 Bus=SHP_HP03_9004_BSB035.1.2.3 kV=13.8 kVA=75.0 Conn=Delta %r=0.710
~ Wdg=2 Bus=FT0393_9004_BSB035.1.2.3.0 kV=0.380 kVA=75.0 Conn=Wye %r=0.710
New Transformer.FP2732 Phases=3 Windings=2 XHL=2.170 %loadloss=1.467 %noloadloss=0.393
~ Wdg=1 Bus=SHP_HP03_9005_BSB035.1.2.3 kV=13.8 kVA=75.0 Conn=Delta %r=0.710
~ Wdg=2 Bus=FP2732_9005_BSB035.1.2.3.0 kV=0.380 kVA=75.0 Conn=Wye %r=0.710
New Transformer.FT0398 Phases=3 Windings=2 XHL=2.960 %loadloss=1.967 %noloadloss=0.500
~ Wdg=1 Bus=SHP_HP03_9014_BSB034.1.2.3 kV=13.8 kVA=15.0 Conn=Delta %r=0.890
~ Wdg=2 Bus=FT0398_9014_BSB034.1.2.3.0 kV=0.440 kVA=15.0 Conn=Wye %r=0.890
New Transformer.FT5362 Phases=3 Windings=2 XHL=2.170 %loadloss=1.218 %noloadloss=0.298
~ Wdg=1 Bus=SHP_HP03_9028_BSB025.1.2.3 kV=13.8 kVA=112.5 Conn=Delta %r=0.710
~ Wdg=2 Bus=FT5362_9028_BSB025.1.2.3.0 kV=0.380 kVA=112.5 Conn=Wye %r=0.710
New Transformer.FW9358 Phases=3 Windings=2 XHL=2.140 %loadloss=1.522 %noloadloss=0.378
~ Wdg=1 Bus=SHP_HP03_9078_BSB029.1.2.3 kV=13.8 kVA=45.0 Conn=Delta %r=0.795
~ Wdg=2 Bus=FW9358_9078_BSB029.1.2.3.0 kV=0.380 kVA=45.0 Conn=Wye %r=0.795
New Transformer.FP2738 Phases=3 Windings=2 XHL=1.900 %loadloss=1.667 %noloadloss=0.433
~ Wdg=1 Bus=SHP_HP03_9195_BSB040.1.2.3 kV=13.8 kVA=30.0 Conn=Delta %r=0.890
~ Wdg=2 Bus=FP2738_9195_BSB040.1.2.3.0 kV=0.380 kVA=30.0 Conn=Wye %r=0.890
New Transformer.FX4889 Phases=3 Windings=2 XHL=2.960 %loadloss=1.967 %noloadloss=0.500
~ Wdg=1 Bus=SHP_HP03_9101_BSB029.1.2.3 kV=13.8 kVA=15.0 Conn=Delta %r=0.890
~ Wdg=2 Bus=FX4889_9101_BSB029.1.2.3.0 kV=0.440 kVA=15.0 Conn=Wye %r=0.890
New Transformer.FX5361 Phases=3 Windings=2 XHL=2.170 %loadloss=1.060 %noloadloss=0.249
~ Wdg=1 Bus=SHP_HP03_9119_BSB029.1.2.3 kV=13.8 kVA=225.0 Conn=Delta %r=0.710
~ Wdg=2 Bus=FX5361_9119_BSB029.1.2.3.0 kV=0.380 kVA=225.0 Conn=Wye %r=0.710
New Transformer.FT0402 Phases=3 Windings=2 XHL=2.620 %loadloss=2.500 %noloadloss=0.650
~ Wdg=1 Bus=SHP_HP03_9138_BSBRJ001B_ATV.1.2.3 kV=13.8 kVA=20.0 Conn=Delta %r=1.010
~ Wdg=2 Bus=FT0402_9138_BSBRJ001B_ATV.1.2.3.0 kV=0.380 kVA=20.0 Conn=Wye %r=1.010
New Transformer.FP5660 Phases=3 Windings=2 XHL=2.170 %loadloss=1.467 %noloadloss=0.393
~ Wdg=1 Bus=SHP_HP03_9181_BSB025.1.2.3 kV=13.8 kVA=75.0 Conn=Delta %r=0.710
~ Wdg=2 Bus=FP5660_9181_BSB025.1.2.3.0 kV=0.380 kVA=75.0 Conn=Wye %r=0.710
New Transformer.FT0406 Phases=3 Windings=2 XHL=2.960 %loadloss=1.967 %noloadloss=0.500
~ Wdg=1 Bus=SHP_HP03_9212_BSB029.1.2.3 kV=13.8 kVA=15.0 Conn=Delta %r=0.890
~ Wdg=2 Bus=FT0406_9212_BSB029.1.2.3.0 kV=0.440 kVA=15.0 Conn=Wye %r=0.890
New Transformer.FT4518 Phases=3 Windings=2 XHL=2.960 %loadloss=1.800 %noloadloss=0.450
~ Wdg=1 Bus=SHP_HP03_9283_BSB025.1.2.3 kV=13.8 kVA=10.0 Conn=Delta %r=0.890
~ Wdg=2 Bus=FT4518_9283_BSB025.1.2.3.0 kV=0.440 kVA=10.0 Conn=Wye %r=0.890
New Transformer.FZ7230 Phases=3 Windings=2 XHL=2.960 %loadloss=1.900 %noloadloss=0.600
~ Wdg=1 Bus=SHP_HP03_9318_BSB041.1.2.3 kV=13.8 kVA=5.0 Conn=Delta %r=0.890
~ Wdg=2 Bus=FZ7230_9318_BSB041.1.2.3.0 kV=0.440 kVA=5.0 Conn=Wye %r=0.890
New Transformer.FICT206 Phases=3 Windings=2 XHL=2.960 %loadloss=2.100 %noloadloss=0.700
~ Wdg=1 Bus=SHP_HP03_1962052523.1.2.3 kV=13.8 kVA=5.0 Conn=Delta %r=0.890
~ Wdg=2 Bus=FICT206_1962052523.1.2.3.0 kV=0.440 kVA=5.0 Conn=Wye %r=0.890
New Transformer.FIC6291_SUBT Phases=3 Windings=2 XHL=3.340 %loadloss=0.990 %noloadloss=0.233
~ Wdg=1 Bus=SHP_HP03_PT_TF_67.1.2.3 kV=13.8 kVA=300.0 Conn=Delta %r=0.835
~ Wdg=2 Bus=FIC6291_SUBT_PT_TF_67.1.2.3.0 kV=0.380 kVA=300.0 Conn=Wye %r=0.835
New Transformer.C11116_SUBT Phases=3 Windings=2 XHL=3.810 %loadloss=0.101 %noloadloss=0.026
~ Wdg=1 Bus=SHP_HP03_PT_TF_1552.1.2.3 kV=13.8 kVA=1000.0 Conn=Delta %r=0.840
~ Wdg=2 Bus=C11116_SUBT_PT_TF_1552.1.2.3.0 kV=0.380 kVA=1000.0 Conn=Wye %r=0.840
New Transformer.FIC6464_SUBT Phases=3 Windings=2 XHL=3.810 %loadloss=0.101 %noloadloss=0.026
~ Wdg=1 Bus=SHP_HP03_PT_TF_1553.1.2.3 kV=13.8 kVA=1000.0 Conn=Delta %r=0.840
~ Wdg=2 Bus=FIC6464_SUBT_PT_TF_1553.1.2.3.0 kV=0.380 kVA=1000.0 Conn=Wye %r=0.840
New Transformer.C10924_SUBT Phases=3 Windings=2 XHL=3.810 %loadloss=0.101 %noloadloss=0.026
~ Wdg=1 Bus=SHP_HP03_PT_TF_68.1.2.3 kV=13.8 kVA=1000.0 Conn=Delta %r=0.840
~ Wdg=2 Bus=C10924_SUBT_PT_TF_68.1.2.3.0 kV=0.380 kVA=1000.0 Conn=Wye %r=0.840
New Transformer.C11244_SUBT Phases=3 Windings=2 XHL=3.810 %loadloss=0.101 %noloadloss=0.026
~ Wdg=1 Bus=SHP_HP03_PT_TF_69.1.2.3 kV=13.8 kVA=1000.0 Conn=Delta %r=0.840
~ Wdg=2 Bus=C11244_SUBT_PT_TF_69.1.2.3.0 kV=0.380 kVA=1000.0 Conn=Wye %r=0.840
New Transformer.C11243_SUBT Phases=3 Windings=2 XHL=3.810 %loadloss=0.101 %noloadloss=0.026
~ Wdg=1 Bus=SHP_HP03_PT_TF_70.1.2.3 kV=13.8 kVA=1000.0 Conn=Delta %r=0.840
~ Wdg=2 Bus=C11243_SUBT_PT_TF_70.1.2.3.0 kV=0.380 kVA=1000.0 Conn=Wye %r=0.840
New Transformer.FX4939 Phases=3 Windings=2 XHL=2.620 %loadloss=2.500 %noloadloss=0.650
~ Wdg=1 Bus=SHP_HP03_9219_BSB025.1.2.3 kV=13.8 kVA=20.0 Conn=Delta %r=1.010
~ Wdg=2 Bus=FX4939_9219_BSB025.1.2.3.0 kV=0.380 kVA=20.0 Conn=Wye %r=1.010
New Transformer.FX4940 Phases=3 Windings=2 XHL=2.620 %loadloss=2.500 %noloadloss=0.650
~ Wdg=1 Bus=SHP_HP03_9237_BSB025.1.2.3 kV=13.8 kVA=20.0 Conn=Delta %r=1.010
~ Wdg=2 Bus=FX4940_9237_BSB025.1.2.3.0 kV=0.380 kVA=20.0 Conn=Wye %r=1.010
