! OpenDSS Transformers - Circuito TN08 (SE STN) | RUN_TAG: 20261018_134703
! Total de Transformadores de Distribuicao MT/BT: 60

New Transformer.FT3544 Phases=3 Windings=2 XHL=2.170 %loadloss=1.127 %noloadloss=0.280
~ Wdg=1 Bus=STN_TN08_9160_CEI024.1.2.3 kV=13.8 kVA=150.0 Conn=Delta %r=0.710
~ Wdg=2 Bus=FT3544_9160_CEI024.1.2.3.0 kV=0.380 kVA=150.0 Conn=Wye %r=0.710
New Transformer.FT3545 Phases=3 Windings=2 XHL=2.960 %loadloss=1.967 %noloadloss=0.500
~ Wdg=1 Bus=STN_TN08_9157_CEI024.1.2.3 kV=13.8 kVA=15.0 Conn=Delta %r=0.890
~ Wdg=2 Bus=FT3545_9157_CEI024.1.2.3.0 kV=0.440 kVA=15.0 Conn=Wye %r=0.890
New Transformer.FT3543 Phases=3 Windings=2 XHL=2.960 %loadloss=1.967 %noloadloss=0.500
~ Wdg=1 Bus=STN_TN08_9165_CEI024.1.2.3 kV=13.8 kVA=15.0 Conn=Delta %r=0.890
~ Wdg=2 Bus=FT3543_9165_CEI024.1.2.3.0 kV=0.440 kVA=15.0 Conn=Wye %r=0.890
New Transformer.FT3542 Phases=3 Windings=2 XHL=2.960 %loadloss=1.967 %noloadloss=0.500
~ Wdg=1 Bus=STN_TN08_9169_CEI024.1.2.3 kV=13.8 kVA=15.0 Conn=Delta %r=0.890
~ Wdg=2 Bus=FT3542_9169_CEI024.1.2.3.0 kV=0.440 kVA=15.0 Conn=Wye %r=0.890
New Transformer.FT3546 Phases=3 Windings=2 XHL=2.170 %loadloss=1.218 %noloadloss=0.298
~ Wdg=1 Bus=STN_TN08_9001_CEI024.1.2.3 kV=13.8 kVA=112.5 Conn=Delta %r=0.710
~ Wdg=2 Bus=FT3546_9001_CEI024.1.2.3.0 kV=0.380 kVA=112.5 Conn=Wye %r=0.710
New Transformer.FX9581 Phases=3 Windings=2 XHL=2.170 %loadloss=1.127 %noloadloss=0.280
~ Wdg=1 Bus=STN_TN08_9003_CEI024.1.2.3 kV=13.8 kVA=150.0 Conn=Delta %r=0.710
~ Wdg=2 Bus=FX9581_9003_CEI024.1.2.3.0 kV=0.380 kVA=150.0 Conn=Wye %r=0.710
New Transformer.FT3547 Phases=3 Windings=2 XHL=2.170 %loadloss=1.127 %noloadloss=0.280
~ Wdg=1 Bus=STN_TN08_9005_CEI024.1.2.3 kV=13.8 kVA=150.0 Conn=Delta %r=0.710
~ Wdg=2 Bus=FT3547_9005_CEI024.1.2.3.0 kV=0.380 kVA=150.0 Conn=Wye %r=0.710
New Transformer.FW2605 Phases=3 Windings=2 XHL=2.170 %loadloss=1.340 %noloadloss=0.340
~ Wdg=1 Bus=STN_TN08_9121_CEIRJ002_ATV.1.2.3 kV=13.8 kVA=75.0 Conn=Delta %r=0.710
~ Wdg=2 Bus=FW2605_9121_CEIRJ002_ATV.1.2.3.0 kV=0.380 kVA=75.0 Conn=Wye %r=0.710
New Transformer.FT3548 Phases=3 Windings=2 XHL=2.960 %loadloss=1.967 %noloadloss=0.500
~ Wdg=1 Bus=STN_TN08_9010_CEI024.1.2.3 kV=13.8 kVA=15.0 Conn=Delta %r=0.890
~ Wdg=2 Bus=FT3548_9010_CEI024.1.2.3.0 kV=0.440 kVA=15.0 Conn=Wye %r=0.890
New Transformer.FZ2945 Phases=3 Windings=2 XHL=2.170 %loadloss=1.340 %noloadloss=0.340
~ Wdg=1 Bus=STN_TN08_9546_CEI023.1.2.3 kV=13.8 kVA=75.0 Conn=Delta %r=0.710
~ Wdg=2 Bus=FZ2945_9546_CEI023.1.2.3.0 kV=0.380 kVA=75.0 Conn=Wye %r=0.710
New Transformer.FX1363 Phases=3 Windings=2 XHL=2.960 %loadloss=1.967 %noloadloss=0.500
~ Wdg=1 Bus=STN_TN08_9552_CEI024.1.2.3 kV=13.8 kVA=15.0 Conn=Delta %r=0.890
~ Wdg=2 Bus=FX1363_9552_CEI024.1.2.3.0 kV=0.440 kVA=15.0 Conn=Wye %r=0.890
New Transformer.FZ9235 Phases=3 Windings=2 XHL=2.170 %loadloss=1.060 %noloadloss=0.249
~ Wdg=1 Bus=STN_TN08_9651_CEI024.1.2.3 kV=13.8 kVA=225.0 Conn=Delta %r=0.710
~ Wdg=2 Bus=FZ9235_9651_CEI024.1.2.3.0 kV=0.380 kVA=225.0 Conn=Wye %r=0.710
New Transformer.FZ0820 Phases=3 Windings=2 XHL=2.170 %loadloss=1.340 %noloadloss=0.340
~ Wdg=1 Bus=STN_TN08_9695_CEI024.1.2.3 kV=13.8 kVA=75.0 Conn=Delta %r=0.710
~ Wdg=2 Bus=FZ0820_9695_CEI024.1.2.3.0 kV=0.380 kVA=75.0 Conn=Wye %r=0.710
New Transformer.FT6388 Phases=3 Windings=2 XHL=2.170 %loadloss=1.218 %noloadloss=0.298
~ Wdg=1 Bus=STN_TN08_9453_CEI024.1.2.3 kV=13.8 kVA=112.5 Conn=Delta %r=0.710
~ Wdg=2 Bus=FT6388_9453_CEI024.1.2.3.0 kV=0.380 kVA=112.5 Conn=Wye %r=0.710
New Transformer.FX3118 Phases=3 Windings=2 XHL=2.170 %loadloss=1.340 %noloadloss=0.340
~ Wdg=1 Bus=STN_TN08_9687_CEI024.1.2.3 kV=13.8 kVA=75.0 Conn=Delta %r=0.710
~ Wdg=2 Bus=FX3118_9687_CEI024.1.2.3.0 kV=0.380 kVA=75.0 Conn=Wye %r=0.710
New Transformer.FP8577 Phases=3 Windings=2 XHL=2.170 %loadloss=1.160 %noloadloss=0.289
~ Wdg=1 Bus=STN_TN08_9118_CEIRJ002_ATV.1.2.3 kV=13.8 kVA=225.0 Conn=Delta %r=0.710
~ Wdg=2 Bus=FP8577_9118_CEIRJ002_ATV.1.2.3.0 kV=0.380 kVA=225.0 Conn=Wye %r=0.710
New Transformer.FZ4944 Phases=3 Windings=2 XHL=2.960 %loadloss=1.967 %noloadloss=0.500
~ Wdg=1 Bus=STN_TN08_9540_CEI024.1.2.3 kV=13.8 kVA=15.0 Conn=Delta %r=0.890
~ Wdg=2 Bus=FZ4944_9540_CEI024.1.2.3.0 kV=0.440 kVA=15.0 Conn=Wye %r=0.890
New Transformer.FT3877 Phases=3 Windings=2 XHL=2.170 %loadloss=1.340 %noloadloss=0.340
~ Wdg=1 Bus=STN_TN08_9200_CEI003.1.2.3 kV=13.8 kVA=75.0 Conn=Delta %r=0.710
~ Wdg=2 Bus=FT3877_9200_CEI003.1.2.3.0 kV=0.380 kVA=75.0 Conn=Wye %r=0.710
New Transformer.FT3549 Phases=3 Windings=2 XHL=2.170 %loadloss=1.127 %noloadloss=0.280
~ Wdg=1 Bus=STN_TN08_9004_CEI06A.1.2.3 kV=13.8 kVA=150.0 Conn=Delta %r=0.710
~ Wdg=2 Bus=FT3549_9004_CEI06A.1.2.3.0 kV=0.380 kVA=150.0 Conn=Wye %r=0.710
New Transformer.FZ5994 Phases=3 Windings=2 XHL=2.170 %loadloss=1.340 %noloadloss=0.340
~ Wdg=1 Bus=STN_TN08_9023_CEI023.1.2.3 kV=13.8 kVA=75.0 Conn=Delta %r=0.710
~ Wdg=2 Bus=FZ5994_9023_CEI023.1.2.3.0 kV=0.380 kVA=75.0 Conn=Wye %r=0.710
New Transformer.FT3866 Phases=3 Windings=2 XHL=2.170 %loadloss=1.127 %noloadloss=0.280
~ Wdg=1 Bus=STN_TN08_9028_CEI023.1.2.3 kV=13.8 kVA=150.0 Conn=Delta %r=0.710
~ Wdg=2 Bus=FT3866_9028_CEI023.1.2.3.0 kV=0.380 kVA=150.0 Conn=Wye %r=0.710
New Transformer.FZ4053 Phases=3 Windings=2 XHL=2.170 %loadloss=1.127 %noloadloss=0.280
~ Wdg=1 Bus=STN_TN08_9120_CEI006.1.2.3 kV=13.8 kVA=150.0 Conn=Delta %r=0.710
~ Wdg=2 Bus=FZ4053_9120_CEI006.1.2.3.0 kV=0.380 kVA=150.0 Conn=Wye %r=0.710
New Transformer.FZ4052 Phases=3 Windings=2 XHL=2.170 %loadloss=1.218 %noloadloss=0.298
~ Wdg=1 Bus=STN_TN08_9208_CEI003.1.2.3 kV=13.8 kVA=112.5 Conn=Delta %r=0.710
~ Wdg=2 Bus=FZ4052_9208_CEI003.1.2.3.0 kV=0.380 kVA=112.5 Conn=Wye %r=0.710
New Transformer.FZ1692 Phases=3 Windings=2 XHL=2.170 %loadloss=1.127 %noloadloss=0.280
~ Wdg=1 Bus=STN_TN08_9424_CEI024.1.2.3 kV=13.8 kVA=150.0 Conn=Delta %r=0.710
~ Wdg=2 Bus=FZ1692_9424_CEI024.1.2.3.0 kV=0.380 kVA=150.0 Conn=Wye %r=0.710
New Transformer.FT3872 Phases=3 Windings=2 XHL=2.170 %loadloss=1.060 %noloadloss=0.249
~ Wdg=1 Bus=STN_TN08_9606_CEI024.1.2.3 kV=13.8 kVA=225.0 Conn=Delta %r=0.710
~ Wdg=2 Bus=FT3872_9606_CEI024.1.2.3.0 kV=0.380 kVA=225.0 Conn=Wye %r=0.710
New Transformer.FT3870 Phases=3 Windings=2 XHL=2.960 %loadloss=1.967 %noloadloss=0.500
~ Wdg=1 Bus=STN_TN08_9600_CEI024.1.2.3 kV=13.8 kVA=15.0 Conn=Delta %r=0.890
~ Wdg=2 Bus=FT3870_9600_CEI024.1.2.3.0 kV=0.440 kVA=15.0 Conn=Wye %r=0.890
New Transformer.FX3057 Phases=3 Windings=2 XHL=2.170 %loadloss=1.127 %noloadloss=0.280
~ Wdg=1 Bus=STN_TN08_9418_CEI024.1.2.3 kV=13.8 kVA=150.0 Conn=Delta %r=0.710
~ Wdg=2 Bus=FX3057_9418_CEI024.1.2.3.0 kV=0.380 kVA=150.0 Conn=Wye %r=0.710
New Transformer.FX3120 Phases=3 Windings=2 XHL=2.170 %loadloss=1.127 %noloadloss=0.280
~ Wdg=1 Bus=STN_TN08_9216_CEI006.1.2.3 kV=13.8 kVA=150.0 Conn=Delta %r=0.710
~ Wdg=2 Bus=FX3120_9216_CEI006.1.2.3.0 kV=0.380 kVA=150.0 Conn=Wye %r=0.710
New Transformer.FT3871 Phases=3 Windings=2 XHL=2.170 %loadloss=1.127 %noloadloss=0.280
~ Wdg=1 Bus=STN_TN08_9137_CEI024.1.2.3 kV=13.8 kVA=150.0 Conn=Delta %r=0.710
~ Wdg=2 Bus=FT3871_9137_CEI024.1.2.3.0 kV=0.380 kVA=150.0 Conn=Wye %r=0.710
New Transformer.FT3829 Phases=3 Windings=2 XHL=2.170 %loadloss=1.218 %noloadloss=0.298
~ Wdg=1 Bus=STN_TN08_9143_CEI024.1.2.3 kV=13.8 kVA=112.5 Conn=Delta %r=0.710
~ Wdg=2 Bus=FT3829_9143_CEI024.1.2.3.0 kV=0.380 kVA=112.5 Conn=Wye %r=0.710
New Transformer.FX2265 Phases=3 Windings=2 XHL=2.960 %loadloss=1.967 %noloadloss=0.500
~ Wdg=1 Bus=STN_TN08_9090_CEI023.1.2.3 kV=13.8 kVA=15.0 Conn=Delta %r=0.890
~ Wdg=2 Bus=FX2265_9090_CEI023.1.2.3.0 kV=0.440 kVA=15.0 Conn=Wye %r=0.890
New Transformer.FT6396 Phases=3 Windings=2 XHL=2.170 %loadloss=1.218 %noloadloss=0.298
~ Wdg=1 Bus=STN_TN08_9091_CEI023.1.2.3 kV=13.8 kVA=112.5 Conn=Delta %r=0.710
~ Wdg=2 Bus=FT6396_9091_CEI023.1.2.3.0 kV=0.380 kVA=112.5 Conn=Wye %r=0.710
New Transformer.FT3875 Phases=3 Windings=2 XHL=2.170 %loadloss=1.127 %noloadloss=0.280
~ Wdg=1 Bus=STN_TN08_9095_CEI023.1.2.3 kV=13.8 kVA=150.0 Conn=Delta %r=0.710
~ Wdg=2 Bus=FT3875_9095_CEI023.1.2.3.0 kV=0.380 kVA=150.0 Conn=Wye %r=0.710
New Transformer.FT3677 Phases=3 Windings=2 XHL=2.170 %loadloss=1.127 %noloadloss=0.280
~ Wdg=1 Bus=STN_TN08_9025_CEI024.1.2.3 kV=13.8 kVA=150.0 Conn=Delta %r=0.710
~ Wdg=2 Bus=FT3677_9025_CEI024.1.2.3.0 kV=0.380 kVA=150.0 Conn=Wye %r=0.710
New Transformer.FZ1048 Phases=3 Windings=2 XHL=2.170 %loadloss=1.127 %noloadloss=0.280
~ Wdg=1 Bus=STN_TN08_9031_CEI003.1.2.3 kV=13.8 kVA=150.0 Conn=Delta %r=0.710
~ Wdg=2 Bus=FZ1048_9031_CEI003.1.2.3.0 kV=0.380 kVA=150.0 Conn=Wye %r=0.710
New Transformer.FZ3273 Phases=3 Windings=2 XHL=2.960 %loadloss=1.967 %noloadloss=0.500
~ Wdg=1 Bus=STN_TN08_9015_CEI024.1.2.3 kV=13.8 kVA=15.0 Conn=Delta %r=0.890
~ Wdg=2 Bus=FZ3273_9015_CEI024.1.2.3.0 kV=0.440 kVA=15.0 Conn=Wye %r=0.890
New Transformer.FT3678 Phases=3 Windings=2 XHL=2.620 %loadloss=2.500 %noloadloss=0.650
~ Wdg=1 Bus=STN_TN08_9026_CEI06A.1.2.3 kV=13.8 kVA=20.0 Conn=Delta %r=1.010
~ Wdg=2 Bus=FT3678_9026_CEI06A.1.2.3.0 kV=0.380 kVA=20.0 Conn=Wye %r=1.010
New Transformer.FT3672 Phases=3 Windings=2 XHL=2.170 %loadloss=1.127 %noloadloss=0.280
~ Wdg=1 Bus=STN_TN08_9212_CEI006.1.2.3 kV=13.8 kVA=150.0 Conn=Delta %r=0.710
~ Wdg=2 Bus=FT3672_9212_CEI006.1.2.3.0 kV=0.380 kVA=150.0 Conn=Wye %r=0.710
New Transformer.FT3861 Phases=3 Windings=2 XHL=2.960 %loadloss=1.967 %noloadloss=0.500
~ Wdg=1 Bus=STN_TN08_9628_CEI024.1.2.3 kV=13.8 kVA=15.0 Conn=Delta %r=0.890
~ Wdg=2 Bus=FT3861_9628_CEI024.1.2.3.0 kV=0.440 kVA=15.0 Conn=Wye %r=0.890
New Transformer.FZ0595 Phases=3 Windings=2 XHL=2.960 %loadloss=1.967 %noloadloss=0.500
~ Wdg=1 Bus=STN_TN08_9258_CEI024.1.2.3 kV=13.8 kVA=15.0 Conn=Delta %r=0.890
~ Wdg=2 Bus=FZ0595_9258_CEI024.1.2.3.0 kV=0.440 kVA=15.0 Conn=Wye %r=0.890
New Transformer.FP6856 Phases=3 Windings=2 XHL=2.170 %loadloss=1.233 %noloadloss=0.323
~ Wdg=1 Bus=STN_TN08_9025_CEI003.1.2.3 kV=13.8 kVA=150.0 Conn=Delta %r=0.710
~ Wdg=2 Bus=FP6856_9025_CEI003.1.2.3.0 kV=0.380 kVA=150.0 Conn=Wye %r=0.710
New Transformer.FP5707 Phases=3 Windings=2 XHL=2.170 %loadloss=1.160 %noloadloss=0.289
~ Wdg=1 Bus=STN_TN08_9027_CEI003.1.2.3 kV=13.8 kVA=225.0 Conn=Delta %r=0.710
~ Wdg=2 Bus=FP5707_9027_CEI003.1.2.3.0 kV=0.380 kVA=225.0 Conn=Wye %r=0.710
New Transformer.FP6116 Phases=3 Windings=2 XHL=2.170 %loadloss=1.160 %noloadloss=0.289
~ Wdg=1 Bus=STN_TN08_9028_CEI003.1.2.3 kV=13.8 kVA=225.0 Conn=Delta %r=0.710
~ Wdg=2 Bus=FP6116_9028_CEI003.1.2.3.0 kV=0.380 kVA=225.0 Conn=Wye %r=0.710
New Transformer.FT3876 Phases=3 Windings=2 XHL=2.170 %loadloss=1.218 %noloadloss=0.298
~ Wdg=1 Bus=STN_TN08_9258_CEI003.1.2.3 kV=13.8 kVA=112.5 Conn=Delta %r=0.710
~ Wdg=2 Bus=FT3876_9258_CEI003.1.2.3.0 kV=0.380 kVA=112.5 Conn=Wye %r=0.710
New Transformer.FX3270 Phases=3 Windings=2 XHL=2.960 %loadloss=1.967 %noloadloss=0.500
~ Wdg=1 Bus=STN_TN08_9034_CEI024.1.2.3 kV=13.8 kVA=15.0 Conn=Delta %r=0.890
~ Wdg=2 Bus=FX3270_9034_CEI024.1.2.3.0 kV=0.440 kVA=15.0 Conn=Wye %r=0.890
New Transformer.FIC1383 Phases=3 Windings=2 XHL=2.170 %loadloss=1.127 %noloadloss=0.280
~ Wdg=1 Bus=STN_TN08_9574_CEI024.1.2.3 kV=13.8 kVA=150.0 Conn=Delta %r=0.710
~ Wdg=2 Bus=FIC1383_9574_CEI024.1.2.3.0 kV=0.380 kVA=150.0 Conn=Wye %r=0.710
New Transformer.FT3862 Phases=3 Windings=2 XHL=2.960 %loadloss=1.967 %noloadloss=0.500
~ Wdg=1 Bus=STN_TN08_9552_CEI023.1.2.3 kV=13.8 kVA=15.0 Conn=Delta %r=0.890
~ Wdg=2 Bus=FT3862_9552_CEI023.1.2.3.0 kV=0.440 kVA=15.0 Conn=Wye %r=0.890
New Transformer.FT3863 Phases=3 Windings=2 XHL=2.170 %loadloss=1.127 %noloadloss=0.280
~ Wdg=1 Bus=STN_TN08_9557_CEI023.1.2.3 kV=13.8 kVA=150.0 Conn=Delta %r=0.710
~ Wdg=2 Bus=FT3863_9557_CEI023.1.2.3.0 kV=0.380 kVA=150.0 Conn=Wye %r=0.710
New Transformer.FT3864 Phases=3 Windings=2 XHL=2.170 %loadloss=1.127 %noloadloss=0.280
~ Wdg=1 Bus=STN_TN08_9562_CEI023.1.2.3 kV=13.8 kVA=150.0 Conn=Delta %r=0.710
~ Wdg=2 Bus=FT3864_9562_CEI023.1.2.3.0 kV=0.380 kVA=150.0 Conn=Wye %r=0.710
New Transformer.FT3865 Phases=3 Windings=2 XHL=2.170 %loadloss=1.127 %noloadloss=0.280
~ Wdg=1 Bus=STN_TN08_9567_CEI023.1.2.3 kV=13.8 kVA=150.0 Conn=Delta %r=0.710
~ Wdg=2 Bus=FT3865_9567_CEI023.1.2.3.0 kV=0.380 kVA=150.0 Conn=Wye %r=0.710
New Transformer.FX8985 Phases=3 Windings=2 XHL=2.170 %loadloss=1.340 %noloadloss=0.340
~ Wdg=1 Bus=STN_TN08_9682_CEI024.1.2.3 kV=13.8 kVA=75.0 Conn=Delta %r=0.710
~ Wdg=2 Bus=FX8985_9682_CEI024.1.2.3.0 kV=0.380 kVA=75.0 Conn=Wye %r=0.710
New Transformer.FZ5095 Phases=3 Windings=2 XHL=2.170 %loadloss=1.218 %noloadloss=0.298
~ Wdg=1 Bus=STN_TN08_9697_CEI024.1.2.3 kV=13.8 kVA=112.5 Conn=Delta %r=0.710
~ Wdg=2 Bus=FZ5095_9697_CEI024.1.2.3.0 kV=0.380 kVA=112.5 Conn=Wye %r=0.710
New Transformer.FZ2944 Phases=3 Windings=2 XHL=2.170 %loadloss=1.340 %noloadloss=0.340
~ Wdg=1 Bus=STN_TN08_9370_CEI023.1.2.3 kV=13.8 kVA=75.0 Conn=Delta %r=0.710
~ Wdg=2 Bus=FZ2944_9370_CEI023.1.2.3.0 kV=0.380 kVA=75.0 Conn=Wye %r=0.710
New Transformer.FZ5438 Phases=3 Windings=2 XHL=2.170 %loadloss=1.218 %noloadloss=0.298
~ Wdg=1 Bus=STN_TN08_9437_CEI024.1.2.3 kV=13.8 kVA=112.5 Conn=Delta %r=0.710
~ Wdg=2 Bus=FZ5438_9437_CEI024.1.2.3.0 kV=0.380 kVA=112.5 Conn=Wye %r=0.710
New Transformer.FX9218 Phases=3 Windings=2 XHL=2.960 %loadloss=1.967 %noloadloss=0.500
~ Wdg=1 Bus=STN_TN08_9439_CEI024.1.2.3 kV=13.8 kVA=15.0 Conn=Delta %r=0.890
~ Wdg=2 Bus=FX9218_9439_CEI024.1.2.3.0 kV=0.440 kVA=15.0 Conn=Wye %r=0.890
New Transformer.FT3869 Phases=3 Windings=2 XHL=2.170 %loadloss=1.127 %noloadloss=0.280
~ Wdg=1 Bus=STN_TN08_9014_CEI023.1.2.3 kV=13.8 kVA=150.0 Conn=Delta %r=0.710
~ Wdg=2 Bus=FT3869_9014_CEI023.1.2.3.0 kV=0.380 kVA=150.0 Conn=Wye %r=0.710
New Transformer.FT3860 Phases=3 Windings=2 XHL=2.960 %loadloss=1.967 %noloadloss=0.500
~ Wdg=1 Bus=STN_TN08_9566_CEI024.1.2.3 kV=13.8 kVA=15.0 Conn=Delta %r=0.890
~ Wdg=2 Bus=FT3860_9566_CEI024.1.2.3.0 kV=0.440 kVA=15.0 Conn=Wye %r=0.890
New Transformer.FT5703 Phases=3 Windings=2 XHL=2.170 %loadloss=1.060 %noloadloss=0.249
~ Wdg=1 Bus=STN_TN08_9555_CEI023.1.2.3 kV=13.8 kVA=225.0 Conn=Delta %r=0.710
~ Wdg=2 Bus=FT5703_9555_CEI023.1.2.3.0 kV=0.380 kVA=225.0 Conn=Wye %r=0.710
New Transformer.FZ0819 Phases=3 Windings=2 XHL=2.170 %loadloss=1.340 %noloadloss=0.340
~ Wdg=1 Bus=STN_TN08_9560_CEI024.1.2.3 kV=13.8 kVA=75.0 Conn=Delta %r=0.710
~ Wdg=2 Bus=FZ0819_9560_CEI024.1.2.3.0 kV=0.380 kVA=75.0 Conn=Wye %r=0.710
New Transformer.FT4782 Phases=3 Windings=2 XHL=2.170 %loadloss=1.340 %noloadloss=0.340
~ Wdg=1 Bus=STN_TN08_9216_TAG20A.1.2.3 kV=13.8 kVA=75.0 Conn=Delta %r=0.710
~ Wdg=2 Bus=FT4782_9216_TAG20A.1.2.3.0 kV=0.380 kVA=75.0 Conn=Wye %r=0.710
